Simulations: Version=201
  DataStore
  Simulation (disabled)
    Clock: Start=1980-01-01; End=1990-01-01
    Summary SummaryFile
    Weather
      FileName=/home/juice/programming/research/Gym_APSIM/Gym_APSIM/TestFiles/emerald.met
    SoilArbitrator
    Zone Field: Area=1; Slope=0; AspectAngle=0; Altitude=50
      Report: EventNames=[Maize].Harvesting
        VariableNames:
          [Maize].Phenology.ThermalTime
          [Maize].Phenology.CurrentStageName
          [Maize].AboveGround.Wt
          [Maize].AboveGround.N
          [Maize].Grain.Total.Wt*10 as Yield
          [Maize].Grain.Size
          [Maize].Grain.Number
          [Maize].Grain.Total.Wt
          [Maize].Grain.Total.N
          [Maize].Total.Wt
          [Maize].Structure.FinalLeafNumber
      Soil: ASCOrder=Vertosol; ASCSubOrder=Black; SoilType=Black Vertosol; Site=Emerald; NearestTown=Emerald; Region=Central Highlands; State=Queensland; Country=Australia; ApsoilNumber=911; Latitude=-23.5211; Longitude=148.123; YearOfSampling=0; DataSource=Collected by Brett Cocks (CES) for NVT.; Comments=Clay -
        Physical
          Thickness  ParticleSizeSand  ParticleSizeSilt  ParticleSizeClay  Rocks  BD     AirDry  LL15   DUL    SAT
          150        5                 65                30                0      1.422  0.062   0.124  0.384  0.434
          150        5                 65                30                0      1.431  0.118   0.148  0.379  0.429
          300        5                 65                30                0      1.46   0.153   0.153  0.353  0.403
          300        5                 65                30                0      1.44   0.153   0.153  0.365  0.415
          300        5                 65                30                0      1.416  0.153   0.153  0.387  0.437
          300        5                 65                30                0      1.394  0.153   0.153  0.401  0.451
          300        5                 65                30                0      1.407  0.153   0.153  0.396  0.446
          BD, DUL source: Field measured and checked for sensibility
          AirDry, LL15, SAT source: Unknown source or quality of data
          Rocks, ParticleSizeSand, ParticleSizeSilt, ParticleSizeClay source: Calculated
          SoilCrop wheatSoil: LL=[0.124, 0.148, 0.153, 0.165, 0.232, 0.291, 0.349]; KL=[0.06, 0.06, 0.06, 0.04, 0.04, 0.02, 0.01]; XF=[1, 1, 1, 1, 1, 1, 1]
            LL source: Field measured and checked for sensibility
          SoilCrop SCRUMSoil: same as Simulation.Field.Soil.Physical.wheatSoil
          SoilCrop SorghumSoil: LL=[0.124, 0.148, 0.153, 0.28, 0.312, 0.341, 0.35]; KL=[0.07, 0.07, 0.07, 0.05, 0.05, 0.04, 0.03]; XF=[1, 1, 1, 1, 1, 1, 1]
            LL, KL, XF source: Estimated
          SoilCrop CottonSoil: LL=[0.124, 0.148, 0.153, 0.267, 0.299, 0.327, 0.346]; KL=[0.1, 0.1, 0.1, 0.1, 0.09, 0.07, 0.05]; XF=[1, 1, 1, 1, 1, 1, 1]
            LL, KL, XF source: Estimated
          SoilCrop maizeSoil: same as Simulation.Field.Soil.Physical.wheatSoil
        WaterBalance SoilWater: SummerDate=1-Nov; SummerU=6; SummerCona=3.5; WinterDate=1-Apr; WinterU=2; WinterCona=2; DiffusConst=40; DiffusSlope=16; Salb=0.12; CN2Bare=73; CNRed=20; CNCov=0.8; PSIDul=-100; Thickness=[150, 150, 300, 300, 300, 300, 300]; SWCON=[0.3, 0.3, 0.3, 0.3, 0.3, 0.3, 0.3]
        Organic: FOMCNRatio=40; CarbonUnits=Total
          Thickness  Carbon  SoilCNRatio  FBiom  FInert  FOM
          150        1.24    12           0.04   0.4     347.129
          150        1.24    12           0.02   0.5     270.344
          300        1.25    12           0.02   0.7     163.972
          300        1.1     12           0.02   1       99.454
          300        0.71    12           0.01   1       60.322
          300        0.34    12           0.01   1       36.587
          300        0.34    12           0.01   1       22.191
        Chemical: PHUnits=Water
          Thickness  PH   EC   CEC
          150        7.7  0.2  11.135
          150        8.3  0.3  11.135
          300        8.5  0.5  11.1575
          300        8.6  0.8  10.82
          300        8.2  1    9.9425
          300        7.6  1.3  9.11
          300        7.7  1.3  9.11
          EC, CL, PH source: Unknown source or quality of data
          CEC source: Calculated
        Nutrient
        Solute NO3: Thickness=[300]; InitialValues=[100]; InitialValuesUnits=kg/ha; WaterTableConcentration=0; D0=0; DepthConstant=0; MaxDepthSoluteAccessible=0; RunoffEffectivenessAtMovingSolute=0; MaxEffectiveRunoff=0
        Solute NH4: Thickness=[600]; InitialValues=[0]; InitialValuesUnits=ppm; WaterTableConcentration=0; D0=0; DepthConstant=0; MaxDepthSoluteAccessible=0; RunoffEffectivenessAtMovingSolute=0; MaxEffectiveRunoff=0
        Solute Urea: Thickness=[150, 150, 300, 300, 300, 300, 300]; InitialValues=[0, 0, 0, 0, 0, 0, 0]; InitialValuesUnits=kg/ha; WaterTableConcentration=0; D0=0; DepthConstant=0; MaxDepthSoluteAccessible=0; RunoffEffectivenessAtMovingSolute=0; MaxEffectiveRunoff=0
        Water: Thickness=[150, 150, 300, 300, 300, 300, 300]; InitialValues=[0.174, 0.193, 0.192, 0.194, 0.198, 0.201, 0.2]; FilledFromTop=false
        SoilTemperature CERESSoilTemperature
        CERESSoilTemperature Temperature
      Fertiliser
      Irrigation
      SurfaceOrganicMatter: InitialResidueName=wheat_stubble; InitialResidueType=wheat; InitialResidueMass=500; InitialStandingFraction=0; InitialCPR=0; InitialCNR=100
      Plant Maize
      MicroClimate: a_interception=0; b_interception=1; c_interception=0; d_interception=0; SoilHeatFluxFraction=0.4; MinimumHeightDiffForNewLayer=0; NightInterceptionFraction=0.5; ReferenceHeight=2
      Manager ZMQ-SowingRule
        StartDate = 1-nov
        EndDate = 30-dec
        MinESW = 100
        MinRain = 0
        RainDays = 7
        CultivarName = sc401
        SowingDepth = 30
        RowSpacing = 1000
        Population = 6
```csharp
using APSIM.Numerics;
using Models.Climate;
using APSIM.Shared.Utilities;
using Models.Utilities;
using Models.Soils.Nutrients;
using Models.Soils;
using Models.PMF;
using Models.Core;
using System;
using System.Linq;
using Models.Interfaces;

namespace Models
{
    [Serializable]
    public class Script : Model
    {
        [Link] private Clock Clock;
        [Link] private Fertiliser Fertiliser;
        [Link] private Summary Summary;
        [Link(ByName = true)] private Plant Maize;
        [Link] private Soil Soil;
        private Accumulator accumulatedRain;
        [Link]
        private ISoilWater waterBalance;
        
        [Description("Start of sowing window (d-mmm)")]
        public string StartDate { get; set;}
        [Description("End of sowing window (d-mmm)")]
        public string EndDate { get; set;}
        [Description("Minimum extractable soil water for sowing (mm)")]
        public double MinESW { get; set;}
        [Description("Accumulated rainfall required for sowing (mm)")]
        public double MinRain { get; set;}
        [Description("Duration of rainfall accumulation (d)")]
        public int RainDays { get; set;}
        [Description("Cultivar to be sown")]
        [Display(Type=DisplayType.CultivarName, PlantName = "Wheat")]
        public string CultivarName { get; set;}
        [Description("Sowing depth (mm)")]
        public double SowingDepth { get; set;}        
        [Description("Row spacing (mm)")]
        public double RowSpacing { get; set;}    
        [Description("Plant population (/m2)")]
        public double Population { get; set;}    
        
        
        [EventSubscribe("StartOfSimulation")]
        private void OnSimulationCommencing(object sender, EventArgs e)
        {
            accumulatedRain = new Accumulator(this, "[Weather].Rain", RainDays);
        }
        

        [EventSubscribe("DoManagement")]
        private void OnDoManagement(object sender, EventArgs e)
        {
            accumulatedRain.Update();
            
            if (DateUtilities.WithinDates(StartDate,Clock.Today,EndDate) &&
                !Maize.IsAlive &&
                MathUtilities.Sum(waterBalance.ESW) > MinESW &&
                accumulatedRain.Sum > MinRain)
            {
               Maize.Sow(population:Population, cultivar:CultivarName, depth:SowingDepth, rowSpacing:RowSpacing);    
            }
        }
    }
}
```
      Manager ZMQ-Manager
```csharp
using APSIM.Core;
using APSIM.Shared.Utilities;
using Models.Utilities;
using Models.Soils;
using Models.Climate;
using Models.Functions;
using Models.PMF.Struct;
using Models.PMF.Phen;
using Models.PMF;
using Models.Core;
using System;
using System.Linq;
using Models.Soils.Nutrients;

namespace Models
{
    [Serializable]
    public class Script : Model, IStructureDependency
    {
        [Link] private Simulation simulation;
        [Link] private Clock Clock;
        [Link] private Weather Weather;
        [Link] private Fertiliser Fertiliser;
        [Link] private Plant Maize;
        [Link (ByName = true)] private HoldFunction FinalLeafNumber;
        [Link (ByName=true)] private NFlow Denitrification;
        public IStructure Structure { private get; set; }
            
        public double cumsumfert {get ; set;}
        
        

        [EventSubscribe("StartOfSimulation")]
        private void OnSimulationCommencing(object sender, EventArgs e)
        {
           cumsumfert = 0;
        }
        
        [EventSubscribe("EndOfDay")]
        private void OnEndOfDay(object sender, EventArgs e) {
            var applied = Fertiliser.NitrogenApplied;
            if (applied > 0)
               cumsumfert += applied; 
        }
        
        public double dap {
        get {
           var daysSinceStart = (Clock.Today.Date - Clock.StartDate).TotalDays;
           return( daysSinceStart);
        }
        set {}}
        

        public double istage {
        get {
           if (Maize.IsAlive) {
             return( Maize.Phenology.IndexFromPhaseName(Maize.Phenology.CurrentPhaseName) );
           }
           return (-1);
        }
        set {}}

        public double vstage {
        get {
           if (Maize.IsAlive) {
              var fln = ((IFunction)Structure.Get("[Maize].Structure.FinalLeafNumber", relativeTo: simulation)).Value();
              return( fln );
           }
           return (-1);
        }
        set {}}

        public double dnit {
        get {
           double dnit = Denitrification.Value.Sum();
           return (dnit);
        }
        set {}}



    }
}
```
      Manager ZMQ-Synchroniser
        Identifier = <undefined>
```csharp
using APSIM.Core;
using APSIM.Shared.Utilities;
using NetMQ.Sockets;
using NetMQ;
using Models.Storage;
using System.Collections.Generic;
using System.IO;
using MessagePack;
using Models.Functions;
using Models.Utilities;
using Models.Soils.Nutrients;
using Models.Surface;
using Models.Soils;
using Models.PMF;
using Models.Interfaces;
using Models.Core;
using System;
using System.Linq;

namespace Models
{
    [Serializable]
    public class Script : Model, IStructureDependency
    {
        [Link] private Clock clock;
        [Link] private Simulation simulation;
        [Link] private Summary Summary;
        [NonSerialized]
        private RequestSocket connection;
        public IStructure Structure { private get; set; }
        
        [Description("Identifier")]
        public string Identifier { get; set;}

            
        

        [EventSubscribe("StartOfSimulation")]
        private void OnSimulationCommencing(object sender, EventArgs e)
        {
           if (Identifier == "<undefined>") {
               Console.WriteLine("Need an endpoint to connect to");
               Summary.WriteMessage(this, "Need an endpoint to connect to", MessageType.Error);
               return;
           } 
           Identifier = "tcp://" + Identifier;
           Console.WriteLine(Identifier);
           connection = new RequestSocket(Identifier);
           connection.SendFrame("connect");
           var msg = connection.ReceiveFrameString(); 
           if (msg != "ok") { throw new Exception("Expected ok"); }
        }
        
        [EventSubscribe("EndOfDay")]
        private void OnEndOfDay(object sender, EventArgs e)
        {
           if (connection == null) { return; }
           bool moreToDo = true;
           connection.SendFrame("paused");
           while (moreToDo) {
             var msg = connection.ReceiveMultipartMessage();
             //Console.WriteLine("Got {0} parts, first = {1}", msg.FrameCount, msg[0].ConvertToString()); 
             if (msg.FrameCount <= 0) { continue ; }
              
             var command = msg[0].ConvertToString();
             if (command == "resume") { 
                moreToDo = false;
                
             } else if (command == "do" && msg.FrameCount >= 2) {
                 onDoCommand(msg);
                 connection.SendFrame("ok");
                 
             } else if (command == "set" && msg.FrameCount == 3) {
                 // set an apsim variable. 
                 //  arg 1 is the variable path (eg "[Nutrient].NO3.kgha"), 
                 //  arg 2 is the packed object                
                string variableName = MessagePackSerializer.Deserialize<string>( msg[1].Buffer );
                
                // See what type the apsim variable is
                var myType = Structure.Get(variableName, relativeTo: simulation).GetType();
                //Console.WriteLine("Got set {0}, my type is {1}", variableName, myType);
                
                object value = MessagePackSerializer.Deserialize<object>( msg[2].Buffer );
                //Console.WriteLine("Got set {0} of incoming type {1}", variableName, value.GetType());
                if (value.GetType().IsArray != myType.IsArray) 
                   throw new Exception("Array/scalar mismatch for " + variableName);
                    
                if (myType.IsArray) {
                   Type myElementType = myType.GetElementType();
                   Object[] values = (value as object[]);
                   if (isNumeric(myElementType)) {
                      var myValues = Array.ConvertAll(values, (e) => (double) e);
                      Structure.Set(variableName, myValues, relativeTo: simulation);
                   } else if (isInteger(myElementType)) {
                      var myValues = Array.ConvertAll(values, (e) => (int) e);
                      Structure.Set(variableName, myValues, relativeTo: simulation);
                   } else if (isString(myElementType)) {
                      var myValues = Array.ConvertAll(values, (e) => (string) e);
                      Structure.Set(variableName, myValues, relativeTo: simulation);
                   } else {
                      throw new Exception("Don't know what to do setting a " + myElementType + " variable");
                   }
                
                   //Type myElementType = myType.GetElementType();
                   //var values = Array.ConvertAll((object[])value, (e) => Convert.ChangeType(e, myElementType)) as System.Array;
                   //Console.WriteLine("Doing set {0} of type {1} ({2}) = ", variableName, 
                   //                  values.GetType(), values.GetType().GetElementType(),  
                   //                  values.GetValue(0).ToString());
                   //Structure.Set(variableName, values, relativeTo: simulation);
                } else {
                   Structure.Set(variableName, Convert.ChangeType(value, myType), relativeTo: simulation);
                }
                connection.SendFrame("ok");
                
             } else if (command == "get" && msg.FrameCount == 2) {
                string variableName = MessagePackSerializer.Deserialize<string>( msg[1].Buffer );
                object value = Structure.Get(variableName, relativeTo: simulation);
                if (value is IFunction function)
                    value = function.Value();
                else if (value != null && (value.GetType().IsArray || value.GetType().IsClass))
                {
                   try
                   {
                       value = ReflectionUtilities.Clone(value);
                   }
                   catch (Exception err)
                   {
                       throw new Exception($"Cannot report variable \"{variableName}\": Variable is a non-reportable type: \"{value?.GetType()?.Name}\".", err);
                   }
                }
                //Console.WriteLine("Got get '{0}' of type '{1}'", variableName, value?.GetType()); 
             
                byte[] bytes;
                if (value != null) {
                   bytes = MessagePackSerializer.Serialize(value);
                } else {
                   Console.WriteLine("Sending NA"); 
                   bytes = MessagePackSerializer.Serialize("NA"); // fixme. Probably a better way to do this
                } 

                connection.SendFrame(bytes);
             } else {
                throw new Exception("Expected resume/get/set, not '" + command + "'");
             }
           }
        }
        
        [Link] Clock Clock;
        [Link] ISoilWater SoilWater;
        [Link] Nutrient Nutrient;
        [Link] Fertiliser Fertiliser;
        [Link] Irrigation Irrigation;
        [Link] SurfaceOrganicMatter SOM;
        [Link] Report Report;

        // Handle a command:
        // addFertiliser "amount" <double> "type" <string>
        // sowCrop "cropName" <string> "cultivarName" <string> "population" <double> "sowingDepth" <double> "rowSpacing" <double> 
        // harvestCrop "cropName" <string>
        // applyIrrigation "amount" <double>
        // tillage "type" <string : (chisel|disc|planter|burn)>
        // terminate
        
        public void onDoCommand(NetMQMessage msg) {
             // msg[0] is "do"
             var cmd = MessagePackSerializer.Deserialize<string>( msg[1].Buffer);
             if (cmd == "addFertiliser") {
                 double FertAmount = 0;
                 string FertType = "";
                 for (int i = 2; i < msg.FrameCount; i += 2 ) {
                    var vname = MessagePackSerializer.Deserialize<string>( msg[i].Buffer);
                    if ( vname == "amount" ) {
                        FertAmount = MessagePackSerializer.Deserialize<double>( msg[i + 1].Buffer);
                    } else if ( vname == "type" ) {
                        FertType = MessagePackSerializer.Deserialize<string>( msg[i + 1].Buffer);
                    }
                 }
                 if (FertAmount > 0) {
                    Console.WriteLine("Fertilized {0}", FertAmount); 
                    Fertiliser.Apply(amount: FertAmount, type: "NO3N" /* fixme */);
                 }
             } else if (cmd == "sowCrop") {
                 string cropName = "";
                 string cultivarName = "default";
                 double population = 5;
                 double sowingDepth = 50;
                 double rowSpacing = 1000;
                 for (int i = 2; i < msg.FrameCount; i += 2 ) {
                    var vname = MessagePackSerializer.Deserialize<string>( msg[i].Buffer);
                    if ( vname == "cropName" ) {
                        cropName = MessagePackSerializer.Deserialize<string>( msg[i + 1].Buffer);
                    } else  if ( vname == "cultivarName" ) {
                        cultivarName = MessagePackSerializer.Deserialize<string>( msg[i + 1].Buffer);
                    } else if ( vname == "population" ) {
                        population = MessagePackSerializer.Deserialize<double>( msg[i + 1].Buffer);
                    } else if ( vname == "sowingDepth" ) {
                        sowingDepth = MessagePackSerializer.Deserialize<double>( msg[i + 1].Buffer);
                    } else if ( vname == "rowSpacing" ) {
                        rowSpacing = MessagePackSerializer.Deserialize<double>( msg[i + 1].Buffer);
                    }
                 }
                 if (cropName != "") {
                    Plant crop = Structure.GetObject("[" + cropName + "]")?.Value as Plant;
                    if (crop == null) { throw new Exception("Cant find a component called  '" + cropName + "' to sow"); } 
                    crop.Sow(population:population, cultivar:cultivarName, depth:sowingDepth, rowSpacing:rowSpacing);
                    Console.WriteLine("Sowed a {0} crop", cropName); 
                 }    
             } else if (cmd == "harvestCrop") {
                 string cropName = "";
                 for (int i = 2; i < msg.FrameCount; i += 2 ) {
                    var vname = MessagePackSerializer.Deserialize<string>( msg[i].Buffer);
                    if ( vname == "cropName" ) {
                        cropName = MessagePackSerializer.Deserialize<string>( msg[i + 1].Buffer);
                    }
                 }
                 if (cropName != "") {
                    Plant crop = Structure.GetObject("[" + cropName + "]")?.Value as Plant;
                    if (crop == null) { throw new Exception("Cant find a component called  '" + cropName + "' to harvest"); }
                    crop.Harvest();
                    Console.WriteLine("Harvested a {0} crop", cropName); 
                    crop.EndCrop();
                 } 
             } else if (cmd == "applyIrrigation") {
                 double irrigAmount = 0;
                 for (int i = 2; i < msg.FrameCount; i += 2 ) {
                    var vname = MessagePackSerializer.Deserialize<string>( msg[i].Buffer);
                    if ( vname == "amount" ) {
                        irrigAmount = MessagePackSerializer.Deserialize<double>( msg[i + 1].Buffer);
                    }
                 }
                 if (irrigAmount > 0) {
                    Irrigation.Apply(amount:irrigAmount, willRunoff:true);
                    Console.WriteLine("Irrigated {0} ", irrigAmount, "mm"); 
                 }
                 
             } else if (cmd == "tillage") {
                 string implementName = "";
                 for (int i = 2; i < msg.FrameCount; i += 2 ) {
                    var vname = MessagePackSerializer.Deserialize<string>( msg[i].Buffer);
                    if ( vname == "type" ) {
                        implementName = MessagePackSerializer.Deserialize<string>( msg[i + 1].Buffer);
                    }
                 }
                 if ( TillageTypes.ContainsKey(implementName) ) {
                    TillageType tillageType = TillageTypes[implementName];
                    SOM.Incorporate(tillageType.fraction, tillageType.depth);
                    Console.WriteLine("Tilled with a {0}", implementName); 
                 } else {
                    throw new Exception("Cant find a tillage method called  '" + implementName + "' to till with");
                 }
             } else if (cmd == "do_rewind") {
                 Console.WriteLine("Resetting"); 
                 SoilWater.Reset();
                 Nutrient.Reset();
                 SOM.Reset();
                 clock.Today = clock.StartDate.AddDays(-1);
                 
                 //Report.OnCompleted(this, null); // requires changing Models/Report.cs to allow public access
                 Summary.WriteSummaryToTextFiles(storage, "SummaryMessages.html", false);
             
             } else if (cmd == "terminate") {
                 clock.EndDate = clock.StartDate;
             }
        }
        [Link] IDataStore storage;
        
        private class TillageType {
           public double fraction;
           public double depth;
        }
        [NonSerialized]
        private static readonly Dictionary<string, TillageType> TillageTypes = new Dictionary<string, TillageType> { 
           {"chisel", new TillageType { fraction = 0.5, depth = 100 }},
           {"disc", new TillageType { fraction =  0.5, depth = 200 }},
           {"planter", new TillageType { fraction = 0.1, depth = 50 }}, 
           {"burn", new TillageType { fraction = 1.0, depth = 0}}
        };

        [EventSubscribe("EndOfSimulation")]
        private void OnSimulationEnding(object sender, EventArgs e)
        {
            if (connection == null) { return; }
            
            connection.SendFrame("finished");
            var msg = connection.ReceiveFrameString(); 
            if (msg != "ok") { throw new Exception("Expected ok at end"); }
            connection.Close();
            
            Console.WriteLine("Simulation Ending");
        }
        static bool isNumeric(Type type) {
                         switch (Type.GetTypeCode(type))
                            {
                                case TypeCode.Double:
                                case TypeCode.Single:
                                   return true;
                            }
                            return false;
                        }
                        static bool isInteger(Type type) {
                         switch (Type.GetTypeCode(type))
                            {
                                case TypeCode.Int16:
                                case TypeCode.Int32:
                                case TypeCode.Int64:
                                case TypeCode.UInt16:
                                case TypeCode.UInt32:
                                case TypeCode.UInt64:
                                   return true;
                            }
                            return false;
                        }
                        static bool isString(Type type) {
                         switch (Type.GetTypeCode(type))
                            {
                                case TypeCode.String:
                                   return true;
                            }
                            return false;
                        }       
   }
}
```
  Folder Replacements (disabled)
    Plant Oats: PlantType=Wheat
      Memo Introduction
        _Allan Peake, Hamish Brown, Rob Zyskowski, Edmar I. Teixeira, Neil Huth_

        The APSIM oats model has been developed using the Plant Modelling Framework (PMF) of [brown_plant_2014]. This new framework provides a library of plant organ and process submodels that can be coupled, at runtime, to construct a model in much the same way that models can be coupled to construct a simulation. This means that dynamic composition of lower level process and organ classes (e.g. photosynthesis, leaf) into larger constructions (e.g. maize, wheat, sorghum) can be achieved by the model developer without additional coding.

        The oats model consists of:

        * a phenology model to simulate development through sequential growth phases
        * a structure model to simulate plant morphology
        * a collection of organs to simulate the various plant parts
        * an arbitrator to allocate resources (N, biomass) to the various plant organs

        This work builds upon an earlier APSIM Oats model that was constructed in 2007 and then published at the Australian Agronomy Conference in 2008 using data from Gatton, Tarlee and Pinery ([unkovich_development_2008]). However numerous changes have been made in the APSIM NextGen version, so simulations run under APSIM 7.10 and previous versions will give different predictions when run with APSIM NextGen.

        The Oats model is broadly based on APSIM Wheat models such as NWheat ([Asseng200225], [KeatingNWheat]), NWheatS ([Asseng1998163]), Cropmod-Wheat ([Wang2002GenericCropModel]), and the earlier versions developed within the Plant Modelling Framework ([brown_plant_2014]).
      OrganArbitrator Arbitrator
        BiomassTypeArbitrator DMArbitration
          Folder PotentialPartitioningMethods
            ReallocationMethod
            AllocateFixationMethod
            RetranslocationMethod
            SendPotentialDMAllocationsMethod
          Folder AllocationMethods
            NutrientConstrainedAllocationMethod
            DryMatterAllocationsMethod
          RelativeAllocation ArbitrationMethod
        BiomassTypeArbitrator NArbitration
          Folder PotentialPartitioningMethods
            ReallocationMethod
          Folder ActualPartitioningMethods
            AllocateFixationMethod
            RetranslocationMethod
          Folder AllocationMethods
            NitrogenAllocationsMethod
          RelativeAllocation ArbitrationMethod
          AllocateUptakesMethod
        WaterUptakeMethod
        NitrogenUptakeMethod
      Phenology
        Memo
          Oat crops exhibit a range of developmental responses to environment and these are strongly influences by genotype characteristics.
          Temperature effects development increasing development rates and decreasing phase durations as temperatures increase.  These effects are captured by thermal time.  However, Oat crops also exhibit vernalisation and photoperiod sensitivities in their Vegetative phase and further photoperiod sensitivity in the EarlyReproductive phase.  Photoperiod responses are seen as a reduction in the length of a phase for a photoperiod sensitive genotype in response to a longer photoperiod.  Vernalisation responses are more complicated as they are driven by temperature but interact with photoperiod.  For vernalisation sensitive varieties (Winter types) exposure to cool temperatures or short photoperiods during the Vegetative phase will reduce the thermal time duration of the vegetative phase.

          As used in the APSIM wheat model, we draw on the Kirby Framework to capture these vernalisation and photoperiod responses.  This framework assumes that the timing of anthesis is a result of the timing of flag leaf and an additional thermal time passage from there to anthesis.  It also assumes the timing of flag leaf is a result of the Final Leaf Number which sets a target, and leaf appearance rate, which sets the rate of progress toward this target.  Leaf appearance rate is a function of Thermal time and a genotype specific Phyllochron which changes with Haun stage as described by [Jamieson_LeafAppearance_1995].

          Final Leaf Number (FLN) is modelled as the sum of three numbers:

          FLN = MinLeafNumber + VernalLeaves + PhotoLeaves

          Where MinLeafNumber is the number of leaves that a wheat crop will produce when vernalisation is satisified early in the crops duration (before 2nd true leaf) and it is grown in a long photoperiod.  VernalLeaves are the number of leaves that are added due to vernalisation effects.  For insensitive varieties this will always be zero but this is potentially a larger number for sensitivie varieties and the number progresively decreases as the crop encounters more vernalisation.  PhotoLeaves are the number of leaves that are added to the minimum leaf number as a result of short day exposure.  For insensitive varieties this will be zero but is potential larger for more sensitivie varieties and decreases as day length increases.  More detailed explinations of the components of phenology are provided below.
        DivideFunction MeanTemp
          AddFunction TempSum
            VariableReference MaxT: VariableName=[Weather].MaxT
            VariableReference MinT: VariableName=[Weather].MinT
          Constant Two: FixedValue=2
        SubDailyInterpolation ThermalTime: agregationMethod=0
          XYPairs Response: X=[0, 30, 40]; Y=[0, 30, 0]
          Memo
            Thermal time determines the rate of developmental progress through many of the crops phases and is used by organs to determing potential growth rates.
          ThreeHourAirTemperature InterpolationMethod
        MultiplyFunction DailyVernalisation
          Memo
            Vernalisation responses are based on those described by [Brown_Anthesis_2013].   Vernalisation is assumed to be related to the expression of the Vrn1 Gene.  Its experssion is accumulated daily and daily upregulation as a function of development (DeltaHaunStage) and a TempResponseProfile that declines exponentially from a maximum at 1^o^C to zero at 0^o^C and at 20^o^C.
          VariableReference DeltaHaunStage: VariableName=[Structure].DeltaHaunStage
          SubDailyInterpolation TempResponseProfile: agregationMethod=0
            XYPairs Response
              X=[0, 1, 2, 3, 4, 5, 6, 7, 8, 9, 10, 11, 12, 13, 14, 15, 16, 17, 18, 19, 20, 30, 32]
              Y=[0, 1.205, 1.037, 0.893, 0.768, 0.661, 0.569, 0.49, 0.422, 0.363, 0.312, 0.269, 0.231, 0.199, 0.171, 0.148, 0.127, 0.109, 0.094, 0.081, 0, 0, -0.5]
            ThreeHourAirTemperature InterpolationMethod
        PhotoperiodFunction Photoperiod: Twilight=-6; DayLength=0
        PhaseLookup PerceivedPhotoPeriod
          PhaseLookupValue ApexBelowGround: Start=Germination; End=Emergence
            Constant Photoperiod: FixedValue=0; Units=h
          PhaseLookupValue ApexAboveGround: Start=Emergence; End=HarvestRipe
            VariableReference Photoperiod: VariableName=[Phenology].Photoperiod
        MinimumFunction Vrn1
          Memo
            Vrn1 accumulation begins when Vrn4 experssion is down-regulated to zero and stops, assuming vernalisation saturation, at a value of 1
          Constant Saturation: FixedValue=1; Units=Relative Experssion
          AccumulateFunction CurrentExpression: StartStageName=Germination; EndStageName=TerminalSpikelet; FractionRemovedOnCut=0; FractionRemovedOnHarvest=0; FractionRemovedOnGraze=0; FractionRemovedOnPrune=0
            LessThanFunction Vernalisation
              VariableReference If_Vrn4: VariableName=[Phenology].Vrn4
              VariableReference IsLessThanLag: VariableName=[Phenology].VernLag
              Constant Return_Zero: FixedValue=0
              VariableReference elseReturn_Vernalisation: VariableName=[Phenology].DailyVernalisation
        MinimumFunction Vrn4
          VariableReference MaxExpression: VariableName=[Phenology].VernLag
          AccumulateFunction CurrentExpression: StartStageName=Germination; EndStageName=TerminalSpikelet; FractionRemovedOnCut=0; FractionRemovedOnHarvest=0; FractionRemovedOnGraze=0; FractionRemovedOnPrune=0
            VariableReference VernalisationConditioning: VariableName=[Phenology].DailyVernalisation
        Constant MinimumLeafNumber: FixedValue=7; Units=Leaves
          Memo
            Number of leaves the plant will produce when fully vernalised early and grown in long photoperiod
        Constant VrnSensitivity: FixedValue=0; Units=Leaves
          Memo
            The difference between Inherent earlyness leaf number and the number of leaves produced when the plant is unvernalised and grown in long photoperiod
        Constant VernLag: FixedValue=1; Units=Unitless
          Memo
            The amount of vernalising temperature required before vernalisation response will be evident.  Value of relative to the amount offl vernalisation temperature required from the end of the lag until vernalisation saturation.  A value of 0 means there is no lag, a value of 1 means the lag is the same (in vernal time) as the vernalisation requirement and a value of 2 means the lag is twice as long as the vernalisation response phase
        Constant PpSensitivity: FixedValue=3; Units=Leaves
          Memo
            The reduction in leaf number going from 8 to 16 h Pp
        Constant EarlyReproductivePpSensitivity: FixedValue=3
          Memo
            The phyllochrons duration for the plant to go from flag leaf ligual appearance at 16 h Pp compared to the phyllochron duration for the same phase at 8 h Pp.
        Constant EarlyReproductiveLongDayBase: FixedValue=3
          Memo
            The phyllochrons duration for the plant to go from flag leaf ligual appearance at 16 h Pp.
        GerminatingPhase Germinating: Start=Sowing; End=Germination; IsEmerged=false
          Constant MinSoilTemperature: FixedValue=0
        EmergingPhase Emerging: Start=Germination; End=Emergence; IsEmerged=false; TTForTimeStep=0
          VariableReference ThermalTime: VariableName=[Phenology].ThermalTime
          AddFunction Target
            Constant ShootLag: FixedValue=40
            MultiplyFunction DepthxRate
              VariableReference SowingDepth: VariableName=[Plant].SowingData.Depth
              Constant ShootRate: FixedValue=4
        GenericPhase Vegetative: Start=Emergence; End=TerminalSpikelet; IsEmerged=true
          Memo
            The duration of the vegetative phase is set by a target Haun Stage for the occurence of Terminal Spikelet and the rate of leaf appearance.
          VariableReference Progression: VariableName=[Phenology].ThermalTime
          MultiplyFunction Target
            VariableReference Phyllochron: VariableName=[Structure].MeanPhyllochron
            VariableReference HSTS: VariableName=[Structure].HaunStageTerminalSpikelet
          Memo Memo1
            HaunStageTerminalSpiklet decreases as vernalisation is accumulated and as photoperiod extends, capturing the effect of these responses on the duration of the Vegetative phase
        LeafAppearancePhase StemElongation: Start=TerminalSpikelet; End=FlagLeaf; IsEmerged=true
          Memo
            The Final leaf number is fixed at Terminal Spikelet and leaves contune to appear at a rate set by thermal time and phyllochron until flag leaf liguale appears and this phase is completed.
          VariableReference ThermalTime: VariableName=[Phenology].ThermalTime
          VariableReference FinalLeafNumber: VariableName=[Structure].FinalLeafNumber
          ExpressionFunction LeafNumber
            Expression=[Leaf].ExpandedCohortNo + [Leaf].NextExpandingLeafProportion
          VariableReference FullyExpandedLeafNo: VariableName=[Leaf].ExpandedCohortNo
          VariableReference InitialisedLeafNumber: VariableName=[Leaf].InitialisedCohortNo
        GenericPhase EarlyReproductive: Start=FlagLeaf; End=Flowering; IsEmerged=true
          VariableReference Progression: VariableName=[Phenology].ThermalTime
          MultiplyFunction Target
            VariableReference Phyllochron: VariableName=[Structure].Phyllochron.BasePhyllochron
            AddFunction Phyllochrons
              VariableReference LongDayBase: VariableName=[Phenology].EarlyReproductiveLongDayBase
              MultiplyFunction IncreaseDueToShortPhotoPeriod
                LinearInterpolationFunction PhotoPeriodResponse
                  XYPairs: X=[11, 16]; Y=[1, 0]
                  VariableReference XValue: VariableName=[Phenology].Photoperiod
                VariableReference PpSensitivity: VariableName=[Phenology].EarlyReproductivePpSensitivity
        GenericPhase GrainDevelopment: Start=Flowering; End=StartGrainFill; IsEmerged=true
          Constant Target: FixedValue=20
          VariableReference Progression: VariableName=[Phenology].ThermalTime
        GenericPhase GrainFilling: Start=StartGrainFill; End=EndGrainFill; IsEmerged=true
          Constant Target: FixedValue=650
          VariableReference Progression: VariableName=[Phenology].ThermalTime
        GenericPhase Maturing: Start=EndGrainFill; End=Maturity; IsEmerged=true
          Constant Target: FixedValue=30
          VariableReference Progression: VariableName=[Phenology].ThermalTime
        GenericPhase Ripening: Start=Maturity; End=HarvestRipe; IsEmerged=true
          Constant Target: FixedValue=100
          VariableReference Progression: VariableName=[Phenology].ThermalTime
        EndPhase ReadyForHarvesting: Start=HarvestRipe; End=Unused; IsEmerged=true
          VariableReference ThermalTime: VariableName=[Phenology].ThermalTime
        ZadokPMF Zadok
        OnEventFunction FlagLeafDAS: SetEvent=FlagLeaf; ReSetEvent=never
          Memo
            A function is used to provide the date of flag leaf (fully emerged) as days after sowing(DAS).
          Constant PreEventValue: FixedValue=0
          VariableReference PostEventValue: VariableName=[Plant].DaysAfterSowing
        OnEventFunction FloweringDAS: SetEvent=Flowering; ReSetEvent=never
          Memo
            A function is used to provide flowering date as days after sowing(DAS).
          Constant PreEventValue: FixedValue=0
          VariableReference PostEventValue: VariableName=[Plant].DaysAfterSowing
        OnEventFunction MaturityDAS: SetEvent=Maturity; ReSetEvent=never
          Memo
            A function is used to provide maturity date as days after sowing(DAS).
          Constant PreEventValue: FixedValue=0
          VariableReference PostEventValue: VariableName=[Plant].DaysAfterSowing
      Structure: CohortInitialisationStage=Germination; LeafInitialisationStage=Emergence
        VariableReference ThermalTime: VariableName=[Phenology].ThermalTime
        MultiplyFunction Phyllochron
          Memo Rational
            This is the thermal time between the emergence of leaf tips.  The model used here is based on [Jamieson_SIRIUS_1998] where leaf appearace could be described by a base phyllochron determined between leaves 2 and 7 and a phyllochron that was 70% of base phyllochron for leaves < 2 and 130% of base phyllochron for leaves > 7
          LinearInterpolationFunction LeafStageFactor
            XYPairs: X=[0, 2, 3, 6, 8, 11, 12]; Y=[0.75, 0.75, 1, 1, 1.4, 1.4, 1.4]
              Memo
                Changing 4th line from 7:1 to 6:1.
                Leaf appearance rate calibrated using data from Gatton 2007 for Taipan and Coolibah
            VariableReference XValue: VariableName=[Leaf].AppearedCohortNo
          Constant BasePhyllochron: FixedValue=90; Units=oC.d
          LinearInterpolationFunction PhotoPeriodEffect
            XYPairs: X=[8, 12, 14]; Y=[1.6, 1, 1]
            VariableReference XValue: VariableName=[Phenology].Photoperiod
        MultiplyFunction BranchingRate
          Memo
            Potential branching rate is determined by the commonly observed pattern of tillering in wheat, in which each tiller emerges with the third leaf on its parent axis (e.g. first tiller emerges at the same time as the third leaf on the main stem, the first secondary tiller appears with the third leaf on tiller 1).  This is described as a simple function of main stem leaf number. This function is varied occasionally between Oat cultivars due to the wide range of plant habits.
          PhaseLookup PotentialBranchingRate
            PhaseLookupValue Vegetative: Start=Emergence; End=TerminalSpikelet
              LinearInterpolationFunction PotentialBranchingRate
                XYPairs: X=[1, 2, 3, 4, 5, 6, 7, 8]; Y=[0, 0, 1, 2, 4, 7, 12, 20]
                VariableReference XValue: VariableName=[Structure].LeafTipsAppeared
            PhaseLookupValue Reproductive: Start=TerminalSpikelet; End=HarvestRipe
              Constant Zero: FixedValue=0
          MinimumFunction StressFactors
            LinearInterpolationFunction NitrogenEffect
              Memo
                Inadequate Nitrogen supply is assumed to affect tillering prior to any effect on photosynthesis or leaf size.
              XYPairs: X=[0.5, 1]; Y=[0, 1]
              VariableReference XValue: VariableName=[Arbitrator].FN
            LinearInterpolationFunction CoverEffect
              Memo
                Tillering is said to cease once a threshold fraction of incoming radiation has been achieved.  This captures shading effects on tillering described by [evers2006cessation].
              XYPairs: X=[0, 0.1, 0.5]; Y=[1, 1, 0]
              VariableReference XValue: VariableName=[Leaf].CoverTotal
            LinearInterpolationFunction WaterStressEffect
              XYPairs: X=[0, 1]; Y=[0, 1]
              VariableReference XValue: VariableName=[Root].WaterTensionFactor
        PhaseLookup BranchMortality
          PhaseLookupValue MortalityPhase: Start=TerminalSpikelet; End=Flowering
            MultiplyFunction Mortality
              LinearInterpolationFunction MortalityPerDegDay
                XYPairs: X=[0, 0.005]; Y=[0.002, 0]
                VariableReference XValue: VariableName=[Structure].MeanTillerGrowthRate
              VariableReference ThermalTime: VariableName=[Phenology].ThermalTime
        HeightFunction HeightModel
          LinearInterpolationFunction PotentialHeight
            XYPairs: X=[3, 3.8, 5, 6]; Y=[20, 300, 1100, 1200]
            VariableReference XValue: VariableName=[Phenology].Stage
          LinearInterpolationFunction WaterStress
            XYPairs: X=[0.3, 1]; Y=[0, 1]
            VariableReference XValue: VariableName=[Oats].Leaf.Fw
        MovingAverageFunction MeanTillerGrowthRate: NumberOfDays=5; StageToStartMovingAverage=Emergence
          Memo
            This is calculated to represent the supply of asslimilate to individual tillers over the past 5 days to use as an index to determine tiller mortality.  When tiller numbers are high or total crop assimilate supply is small there will not be enough assimilate to maintain all of the tillers so the model will senesce some.
          DivideFunction TillerGrowthRate
            VariableReference DailyGrowth: VariableName=[Arbitrator].DM.TotalFixationSupply
            VariableReference ThermalTime: VariableName=[Phenology].ThermalTime
            VariableReference StemPopulation: VariableName=[Structure].TotalStemPopn
        MovingAverageFunction MeanPhyllochron: NumberOfDays=300; StageToStartMovingAverage=Emergence
          VariableReference Phyllochron: VariableName=[Structure].Phyllochron
        HoldFunction FinalLeafNumber: WhenToHold=TerminalSpikelet
          AddFunction FinalNodeNumber
            VariableReference MinLeafNumber: VariableName=[Phenology].MinimumLeafNumber
            MultiplyFunction VernalLeaves
              VariableReference UnVernalisedLeaves: VariableName=[Phenology].VrnSensitivity
              SubtractFunction VernalisationReductionFactor
                Constant One: FixedValue=1
                VariableReference RelativeVrn1Expression: VariableName=[Phenology].Vrn1
            MultiplyFunction PhotoPLeaves
              VariableReference ShortPpLeaves: VariableName=[Phenology].PpSensitivity
              LinearInterpolationFunction PhotoPeriodReductionFactor
                XYPairs: X=[10, 16]; Y=[1, 0]
                VariableReference XValue: VariableName=[Phenology].Photoperiod
        ExpressionFunction HaunStageTerminalSpikelet: Expression=([Structure].FinalLeafNumber - 2.85)/1.1
          Memo
            The Haun stage at which Terminal Spikelet occurs is determined from final leaf number using the approach described in [Brown_Anthesis_2013].
        AddFunction HaunStage
          VariableReference AppearedLeaves: VariableName=[Leaf].ExpandedCohortNo
          VariableReference ProportionOfExpandingLeaf: VariableName=[Leaf].NextExpandingLeafProportion
        Constant StemSenescenceAge: FixedValue=0
      ReproductiveOrgan Grain: GrowthRespiration=0; MaintenanceRespiration=0; RipeStage=Ripe
        Biomass Live
        Biomass Dead
        Memo
          As with Barley, Oats grain is typically harvested by farmers still in its husk (i.e. the palea and lemma remain attached to the kernel/caryopsis), while the kernel proper is typically smaller than a wheat grain grown under similar conditions. For simplicity (and in the absence of an extensive grain-oats data set) the Oats model uses the same grain size model as wheat, with the assumption that the weight of the oats kernel includes the weight of the husk (which is not included within kernel weight in the wheat model).

          Grain number prediction is also derived directly from the wheat model, estimated as a constant number of grains (default=26) per unit of stem+spike dry matter at anthesis. This approach has known limitations and investigation is underway to improve this function in the future.
        HoldFunction NumberFunction: WhenToHold=Flowering
          MultiplyFunction GrainNumber
            Constant GrainsPerGramOfStem: FixedValue=26; Units=grains
            VariableReference StemMass: VariableName=[StemPlusPanicle].Wt
        Constant InitialGrainProportion: FixedValue=0.05
          Constant InitialGrainProportion: FixedValue=0.05
        Constant MaximumPotentialGrainSize: FixedValue=0.032; Units=g
        PhaseLookup DMDemandFunction
          PhaseLookupValue InitialPhase: Start=Flowering; End=StartGrainFill
            FillingRateFunction
              VariableReference NumberFunction: VariableName=[Grain].NumberFunction
              VariableReference FillingDuration: VariableName=[Phenology].GrainDevelopment.Target
              VariableReference ThermalTime: VariableName=[Phenology].ThermalTime
              MultiplyFunction PotentialSizeIncrement
                VariableReference InitialProportion: VariableName=[Grain].InitialGrainProportion
                VariableReference MaximumSize: VariableName=[Grain].MaximumPotentialGrainSize
          PhaseLookupValue LinearPhase: Start=StartGrainFill; End=EndGrainFill
            FillingRateFunction
              VariableReference NumberFunction: VariableName=[Grain].NumberFunction
              VariableReference FillingDuration: VariableName=[Phenology].GrainFilling.Target
              VariableReference ThermalTime: VariableName=[Phenology].ThermalTime
              MultiplyFunction PotentialSizeIncrement
                SubtractFunction ProportionLinearPhase
                  Constant One: FixedValue=1
                  VariableReference InitialProportion: VariableName=[Grain].InitialGrainProportion
                VariableReference MaximumSize: VariableName=[Grain].MaximumPotentialGrainSize
        Constant MinimumNConc: FixedValue=0.0123
        Constant MaxNConcDailyGrowth: FixedValue=0.03
        Constant MaximumNConc: FixedValue=0.03
        PhaseLookup NFillingRate
          PhaseLookupValue GrainFilling: Start=FlagLeaf; End=EndGrainFill
            FillingRateFunction
              VariableReference NumberFunction: VariableName=[Grain].NumberFunction
              AddFunction FillingDuration
                VariableReference FloweringToGrainFilling: VariableName=[Phenology].GrainDevelopment.Target
                VariableReference GrainFilling: VariableName=[Phenology].GrainFilling.Target
              VariableReference ThermalTime: VariableName=[Phenology].ThermalTime
              MultiplyFunction PotentialSizeIncrement
                VariableReference MaximumSize: VariableName=[Grain].MaximumPotentialGrainSize
                VariableReference MaximumNConc: VariableName=[Grain].MaximumNConc
        Constant WaterContent: FixedValue=0.12
        AccumulateFunction AccumThermalTime: StartStageName=FlagLeaf; EndStageName=Maturity; FractionRemovedOnCut=0; FractionRemovedOnHarvest=0; FractionRemovedOnGraze=0; FractionRemovedOnPrune=0
          VariableReference DailyThermalTimeValue: VariableName=[Phenology].ThermalTime
        ExpressionFunction Protein
          Expression=([Grain].Live.N + [Grain].Dead.N)/([Grain].Live.Wt + [Grain].Dead.Wt) * 100 * 5.71
        BiomassRemoval BiomassRemovalDefaults: HarvestFractionLiveToRemove=1; HarvestFractionDeadToRemove=1; HarvestFractionLiveToResidue=0; HarvestFractionDeadToResidue=0
        Constant DMConversionEfficiency: FixedValue=1
        Constant RemobilisationCost: FixedValue=0
        Constant CarbonConcentration: FixedValue=0.4
        NutrientPoolFunctions DMDemandPriorityFactors
          Constant Structural: FixedValue=1
          Constant Metabolic: FixedValue=1
          Constant Storage: FixedValue=1
        NutrientPoolFunctions NDemandPriorityFactors: same as Replacements.Oats.Grain.DMDemandPriorityFactors
      Leaf: MaxCover=1; Albedo=0.25; Gsmax350=0.011; R50=150; KDead=0.1; MaximumMainStemLeafNumber=30
        zero: CurrentExpandingLeaf, StartFractionExpanded, FractionNextleafExpanded, DeadNodesYesterday, GrowthRespiration, LAI, Depth, Width, PotentialEP, WaterDemand, TipsAtEmergence, CohortsAtInitialisation, FractionDied
        ExpressionFunction CO2internal: Expression=(163 - [IWeather].MeanT)/(5 - 0.1*[IWeather].MeanT)
        DivideFunction StomatalConductanceCO2Modifier
          VariableReference FCO2: VariableName=[Leaf].Photosynthesis.FCO2
          ExpressionFunction RelativeCO2Gradient
            Expression=([IWeather].CO2 - [Leaf].CO2internal)/(350 - [Leaf].CO2internal)
        LeafCohort InitialLeaves[1]: Rank=1; Area=200
          zero: NReallocationFactor, DMReallocationFactor, NRetranslocationFactor, DMRetranslocationFactor, ShadeInducedSenRate, SenescedFrac, DeltaPotentialArea, DeltaStressConstrainedArea, DeltaCarbonConstrainedArea, PotentialStructuralDMAllocation, PotentialMetabolicDMAllocation, MetabolicNReallocated, MetabolicWtReallocated, StorageNReallocated, StorageWtReallocated, MetabolicNRetranslocated, StorageNRetrasnlocated, DMRetranslocated, MetabolicNAllocation, StructuralDMAllocation, MetabolicDMAllocation
        LeafCohort InitialLeaves[2]: Rank=2
          zero: NReallocationFactor, DMReallocationFactor, NRetranslocationFactor, DMRetranslocationFactor, ShadeInducedSenRate, SenescedFrac, DeltaPotentialArea, DeltaStressConstrainedArea, DeltaCarbonConstrainedArea, PotentialStructuralDMAllocation, PotentialMetabolicDMAllocation, MetabolicNReallocated, MetabolicWtReallocated, StorageNReallocated, StorageWtReallocated, MetabolicNRetranslocated, StorageNRetrasnlocated, DMRetranslocated, MetabolicNAllocation, StructuralDMAllocation, MetabolicDMAllocation, Area
        LeafCohortParameters CohortParameters: ExpansionStressValue=0; CellDivisionStressValue=0; LagAccelerationValue=0; SenescenceAccelerationValue=0; ShadeInducedSenescenceRateValue=0; SenessingLeafRelativeSizeValue=0
          Constant NReallocationFactor: FixedValue=1
          Constant MaintenanceRespirationFunction: FixedValue=0
          Constant NRetranslocationFactor: FixedValue=0.03
          Constant DMReallocationFactor: FixedValue=1
          Constant DMRetranslocationFactor: FixedValue=0.8
          MinimumFunction CellDivisionStress
            LinearInterpolationFunction WaterStressFactor
              XYPairs: X=[0.5, 1]; Y=[0.1, 1]
              VariableReference XValue: VariableName=[Oats].Leaf.Fw
            LinearInterpolationFunction NitrogenStressFactor
              XYPairs: X=[0, 0.5, 1]; Y=[0.1, 0.1, 1]
              VariableReference XValue: VariableName=[Oats].Leaf.Fn
          MinimumFunction ExpansionStress
            LinearInterpolationFunction WaterStress
              XYPairs: X=[0.1, 1, 1.3]; Y=[0, 1, 1]
              VariableReference XValue: VariableName=[Root].WaterTensionFactor
            LinearInterpolationFunction TemperatureEffect
              XYPairs: X=[0, 12, 14]; Y=[0, 1, 1]
              VariableReference XValue: VariableName=[Phenology].MeanTemp
            LinearInterpolationFunction NitrogenStressFactor
              XYPairs: X=[0, 0.5, 1]; Y=[0.1, 0.1, 1]
              VariableReference XValue: VariableName=[Oats].Leaf.Fn
          MultiplyFunction MaxArea
            Constant AreaLargestLeaves: FixedValue=4000; Units=mm^2
              Memo
                Default as per NZ Lincoln data set. Amended between varieties due to large variation in Oats plant type.
            LinearInterpolationFunction AgeFactor
              XYPairs: X=[3, 3.45, 4]; Y=[0.1, 0.5, 1]
              VariableReference XValue: VariableName=[Phenology].Stage
          MultiplyFunction GrowthDuration
            Constant Multiplier: FixedValue=1.75
            VariableReference Phyllochron: VariableName=[Structure].Phyllochron
            LinearInterpolationFunction AgeFactor
              XYPairs: X=[3, 4, 5]; Y=[1, 1, 1]
              VariableReference XValue: VariableName=[Phenology].Stage
          MultiplyFunction LagDuration
            LinearInterpolationFunction AgeFactor
              XYPairs: X=[3, 4, 5]; Y=[0.4, 1, 1]
              VariableReference XValue: VariableName=[Phenology].Stage
            SubtractFunction LastLeafDuration
              AddFunction ThermalTimeToRipe
                VariableReference EarlyReproductive: VariableName=[Phenology].EarlyReproductive.Target
                VariableReference GrainDevelopment: VariableName=[Phenology].GrainDevelopment.Target
                VariableReference GrainFilling: VariableName=[Phenology].GrainFilling.Target
                VariableReference Maturing: VariableName=[Phenology].Maturing.Target
                VariableReference Ripening: VariableName=[Phenology].Ripening.Target
              VariableReference SenescenceDuration: VariableName=[Leaf].CohortParameters.SenescenceDuration
          MultiplyFunction SenescenceDuration
            Constant Multiplier: FixedValue=6
            VariableReference Phyllochron: VariableName=[Structure].Phyllochron
          Constant DetachmentLagDuration: FixedValue=1000000
          Constant DetachmentDuration: FixedValue=1000000
          Constant RelativeBranchLeafSize: FixedValue=1
          LinearInterpolationFunction MaximumNConc
            XYPairs: X=[3, 4, 6]; Y=[0.08, 0.05, 0.02]
            VariableReference XValue: VariableName=[Phenology].Stage
          MultiplyFunction CriticalNConc
            LinearInterpolationFunction CriticalNConcAt350ppm
              XYPairs: X=[3, 4, 6]; Y=[0.07, 0.04, 0.015]
              VariableReference XValue: VariableName=[Phenology].Stage
            LinearInterpolationFunction CO2Factor
              XYPairs: X=[350, 700]; Y=[1, 0.93]
              VariableReference XValue: VariableName=[Weather].CO2
          LinearInterpolationFunction MinimumNConc
            XYPairs: X=[3, 4, 6]; Y=[0.01, 0.005, 0.005]
            VariableReference XValue: VariableName=[Phenology].Stage
          AddFunction LagAcceleration
            Constant One: FixedValue=1
            MultiplyFunction Stress
              Constant StressResponseCoefficient: FixedValue=1
              LinearInterpolationFunction StressFactor
                XYPairs: X=[0, 0.5]; Y=[0.5, 0]
                VariableReference XValue: VariableName=[Oats].Leaf.Fw
          AddFunction SenescenceAcceleration: same as Replacements.Oats.Leaf.CohortParameters.LagAcceleration
          LinearInterpolationFunction SpecificLeafAreaMax
            XYPairs: X=[2, 3, 4]; Y=[25000, 30000, 40000]
            Memo
              Initial SLA is determined as the average of max and min SLA
            VariableReference XValue: VariableName=[Phenology].Stage
          LinearInterpolationFunction SpecificLeafAreaMin
            XYPairs: X=[0.4, 1]; Y=[10000, 18000]
            VariableReference XValue: VariableName=[Leaf].Fn
          Constant InitialNConc: FixedValue=0
          Constant StructuralFraction: FixedValue=0.3
          Constant StorageFraction: FixedValue=0
          Constant LeafSizeShapeParameter: FixedValue=0.3
          Constant SenessingLeafRelativeSize: FixedValue=1; Units=0-1
          MultiplyFunction ShadeInducedSenescenceRate
            LinearInterpolationFunction CoverEffect
              XYPairs: X=[0, 0.9, 0.95, 1]; Y=[0, 0, 0.01, 0.03]
              VariableReference XValue: VariableName=[Leaf].CohortCurrentRankCoverAbove
            VariableReference ThermalTime: VariableName=[Phenology].ThermalTime
          ArrayFunction LagDurationAgeMultiplier: Values=1 1 1
          ArrayFunction SenescenceDurationAgeMultiplier: Values=1 1 1
          ArrayFunction LeafSizeAgeMultiplier: Values=1 1 1 1 1 1 1 1 1 1 1 1
          Constant RemobilisationCost: FixedValue=0
          Constant CarbonConcentration: FixedValue=0.4
        RUEModel Photosynthesis
          Constant RUE: FixedValue=1.6
            Memo
              WHOLE PLANT RUE = bigger than RUE calculated using above ground biomass.
              1.35 measured for Oats at Gatton 2007 (Above ground biomass only) so assume 20% more for root biomass.
          WeightedTemperatureFunction FT: MaximumTemperatureWeighting=0.75
            XYPairs: X=[0, 15, 25, 35]; Y=[0, 1, 1, 0]
          LinearInterpolationFunction FN
            XYPairs: X=[0, 1, 1.5]; Y=[0, 1, 1]
            VariableReference XValue: VariableName=[Leaf].Fn
          LinearInterpolationFunction FW
            XYPairs: X=[0, 0.5, 1]; Y=[0, 1, 1]
            VariableReference XValue: VariableName=[Leaf].Fw
          LinearInterpolationFunction FVPD
            XYPairs: X=[0, 10, 40]; Y=[1, 1, 0]
            VariableReference XValue: VariableName=[Photosynthesis].VPD
          RUECO2Function FCO2: PhotosyntheticPathway=C3
          VariableReference RadnInt: VariableName=[Leaf].RadiationIntercepted
        Constant FrostFraction: FixedValue=0
        VariableReference ThermalTime: VariableName=[Phenology].ThermalTime
        MinimumFunction FRGRFunction
          VariableReference RUE_FT: VariableName=[Leaf].Photosynthesis.FT
          MinimumFunction Others
            VariableReference RUE_FN: VariableName=[Leaf].Photosynthesis.FN
            VariableReference RUE_FVPD: VariableName=[Leaf].Photosynthesis.FVPD
        BiomassRemoval BiomassRemovalDefaults: HarvestFractionLiveToRemove=0; HarvestFractionDeadToRemove=0; HarvestFractionLiveToResidue=0.8; HarvestFractionDeadToResidue=0.8
        Constant ExtinctionCoeff: FixedValue=0.45
          Memo
            Using extinction coefficient as per measured at Gatton in 2007 (0.45).
        Constant StructuralFraction: FixedValue=0.5
        Constant DMConversionEfficiency: FixedValue=1
        Constant RemobilisationCost: FixedValue=0
        Constant CarbonConcentration: FixedValue=0.4
        Constant WidthFunction: FixedValue=0
        VariableReference DepthFunction: VariableName=[Leaf].Height
        NutrientPoolFunctions DMDemandPriorityFactors: same as Replacements.Oats.Grain.DMDemandPriorityFactors
        NutrientPoolFunctions NDemandPriorityFactors: same as Replacements.Oats.Grain.DMDemandPriorityFactors
      GenericOrgan Stem: IsAboveGround=true
        MultiplyFunction SenescenceRate
          LinearInterpolationFunction SenescenceRate
            XYPairs: X=[3, 7, 8, 9]; Y=[0, 0, 0.2, 0.5]
            VariableReference XValue: VariableName=[Phenology].Stage
        LinearInterpolationFunction MaximumNConc
          XYPairs: X=[3, 4, 4.5, 6]; Y=[0.05, 0.04, 0.015, 0.012]
          VariableReference XValue: VariableName=[Phenology].Stage
        Constant MinimumNConc: FixedValue=0.0018
        PhaseLookupValue NitrogenDemandSwitch: Start=Emergence; End=StartGrainFill
          Constant: FixedValue=1
        Constant NReallocationFactor: FixedValue=0
        PhaseLookup NRetranslocationFactor
          PhaseLookupValue VegetativeGrowth: Start=Sowing; End=Flowering
            Constant Fraction: FixedValue=0
          PhaseLookupValue ReproductiveGrowth: Start=Flowering; End=HarvestRipe
            Constant Fraction: FixedValue=0.5
        PhaseLookup DMRetranslocationFactor
          PhaseLookupValue VegetativeGrowth: Start=Emergence; End=StartGrainFill
            Constant DMRetranslocationFactor: FixedValue=0
          PhaseLookupValue ReproductiveGrowth: Start=StartGrainFill; End=EndGrainFill
            Constant DMRetranslocationFactor: FixedValue=0
        BiomassRemoval BiomassRemovalDefaults: HarvestFractionLiveToRemove=0; HarvestFractionDeadToRemove=0; HarvestFractionLiveToResidue=0.6; HarvestFractionDeadToResidue=0.6
        DivideFunction PercentWSC
          VariableReference WSC: VariableName=[Stem].Live.StorageWt
          VariableReference StemWt: VariableName=[Stem].Live.Wt
        Constant DetachmentRateFunction: FixedValue=0; Units=/d
        Constant MaintenanceRespirationFunction: FixedValue=0; Units=0-1
        Constant DMConversionEfficiency: FixedValue=1; Units=0-1
        Constant DMReallocationFactor: FixedValue=0
        VariableReference CriticalNConc: VariableName=[Stem].MinimumNConc
        Constant RemobilisationCost: FixedValue=0
        Constant CarbonConcentration: FixedValue=0.4
        NutrientDemandFunctions DMDemands
          MultiplyFunction Structural
            PartitionFractionDemandFunction DMDemandFunction
              PhaseLookup PartitionFraction
                PhaseLookupValue PreStemElongation: Start=Emergence; End=TerminalSpikelet
                  Constant StemFraction: FixedValue=0.4
                PhaseLookupValue StemElongation: Start=TerminalSpikelet; End=FlagLeaf
                  Constant StemFraction: FixedValue=0.7
                PhaseLookupValue EarEmergence: Start=FlagLeaf; End=Flowering
                  Constant StemFraction: FixedValue=0.7
            PhaseLookup StructuralFraction
              PhaseLookupValue VegetativeGrowth: Start=Sowing; End=Flowering
                Constant Fraction: FixedValue=0.7
              PhaseLookupValue ReproductiveGrowth: Start=Flowering; End=HarvestRipe
                Constant Fraction: FixedValue=0.5
          Constant Metabolic: FixedValue=0
          StorageDMDemandFunction Storage
            SubtractFunction StorageFraction
              Constant One: FixedValue=1
              VariableReference StructuralFraction: VariableName=[Stem].DMDemands.Structural.StructuralFraction
          Constant QStructuralPriority: FixedValue=1
          Constant QMetabolicPriority: FixedValue=1
          Constant QStoragePriority: FixedValue=1
        NutrientDemandFunctions NDemands
          MultiplyFunction Structural
            VariableReference MinNconc: VariableName=[Stem].minimumNconc
            VariableReference PotentialDMAllocation: VariableName=[Stem].potentialDMAllocation.Structural
          MultiplyFunction Metabolic
            SubtractFunction MetabolicNconc
              VariableReference CritNconc: VariableName=[Stem].criticalNConc
              VariableReference MinNconc: VariableName=[Stem].minimumNconc
            VariableReference PotentialDMAllocation: VariableName=[Stem].potentialDMAllocation.Structural
          StorageNDemandFunction Storage
            VariableReference NitrogenDemandSwitch: VariableName=[Stem].nitrogenDemandSwitch
            VariableReference MaxNconc: VariableName=[Stem].maximumNconc
          Constant QStructuralPriority: FixedValue=1
          Constant QMetabolicPriority: FixedValue=1
          Constant QStoragePriority: FixedValue=1
        RetranslocateNonStructural RetranslocateNitrogen
        NutrientPoolFunctions InitialWt
          Constant Structural: FixedValue=0; Units=g/m^2
          Constant Metabolic: FixedValue=0
          Constant Storage: FixedValue=0
        Constant Photosynthesis: FixedValue=0
        VariableReference initialNConcFunction: VariableName=[Stem].MinimumNConc
      Root: GrowthRespiration=0; MaintenanceRespiration=0
        RootShapeCylinder RootShape
        Constant KLModifier: FixedValue=1
        Constant SoilWaterEffect: FixedValue=1
        Constant MaxDailyNUptake: FixedValue=20
        Constant SenescenceRate: FixedValue=0.005
        Constant MaximumRootDepth: FixedValue=1000000
        Constant MaximumNConc: FixedValue=0.01
        Constant MinimumNConc: FixedValue=0.01
        PhaseLookupValue NitrogenDemandSwitch: Start=Germination; End=Maturity
          Constant: FixedValue=1
        BiomassRemoval BiomassRemovalDefaults: HarvestFractionLiveToRemove=0; HarvestFractionDeadToRemove=0; HarvestFractionLiveToResidue=1; HarvestFractionDeadToResidue=1
        Constant KNO3: FixedValue=0.02
        Constant KNH4: FixedValue=0.01
        Constant SpecificRootLength: FixedValue=105; Units=m/g
        MultiplyFunction RootFrontVelocity
          PhaseLookup PotentialRootFrontVelocity
            PhaseLookupValue PreEmergence: Start=Germination; End=Emergence
              Constant Value: FixedValue=5; Units=mm/d
            PhaseLookupValue PostEmergence: Start=Emergence; End=Maturity
              Constant Value: FixedValue=20; Units=mm/d
          WeightedTemperatureFunction TemperatureFactor: MaximumTemperatureWeighting=0.5
            XYPairs: X=[0, 15, 25, 35]; Y=[0, 1, 1, 0]
          LinearInterpolationFunction WaterFactor
            SoilWaterScale: LLModel=1
            XYPairs: X=[0, 0.25, 1]; Y=[0, 1, 1]
            VariableReference XValue: VariableName=[SoilWaterScale]
        LinearInterpolationFunction NUptakeSWFactor
          SoilWaterScale: LLModel=1
          XYPairs: X=[0, 1]; Y=[0, 1]
          Memo
            This is modelled in the same way as the old wheat model where potential N uptake is decreased as the soil dries as described by NUptakeSWFactor
          VariableReference XValue: VariableName=[SoilWaterScale]
        Constant DMConversionEfficiency: FixedValue=1
        Constant MaintenanceRespirationFunction: FixedValue=1
        Constant RemobilisationCost: FixedValue=0
        Constant CarbonConcentration: FixedValue=0.4
        NutrientDemandFunctions DMDemands
          MultiplyFunction Structural
            PartitionFractionDemandFunction DMDemandFunction
              PhaseLookup PartitionFraction
                PhaseLookupValue PreEmergence: Start=Germination; End=Emergence
                  Constant Value: FixedValue=0
                PhaseLookupValue PreFlowering: Start=Emergence; End=Flowering
                  LinearInterpolationFunction AgeFactor
                    XYPairs: X=[3, 4]; Y=[0.5, 0.2]
                    VariableReference XValue: VariableName=[Phenology].Stage
                PhaseLookupValue PostFlowering: Start=Flowering; End=EndGrainFill
                  Constant Value: FixedValue=0.2
            Constant StructuralFraction: FixedValue=1
          Constant Metabolic: FixedValue=0
          StorageDMDemandFunction Storage
            SubtractFunction StorageFraction
              Constant One: FixedValue=1
              VariableReference StructuralFraction: VariableName=[Root].DMDemands.Structural.StructuralFraction
          Constant QStructuralPriority: FixedValue=1
          Constant QMetabolicPriority: FixedValue=1
          Constant QStoragePriority: FixedValue=1
        NutrientDemandFunctions NDemands
          MultiplyFunction Structural
            VariableReference MinNconc: VariableName=[Root].minimumNconc
            VariableReference PotentialDMAllocation: VariableName=[Root].potentialDMAllocation.Structural
          MultiplyFunction Metabolic
            SubtractFunction MetabolicNconc
              VariableReference CritNconc: VariableName=[Root].criticalNConc
              VariableReference MinNconc: VariableName=[Root].minimumNconc
            VariableReference PotentialDMAllocation: VariableName=[Root].potentialDMAllocation.Structural
          StorageNDemandFunction Storage
            VariableReference NitrogenDemandSwitch: VariableName=[Root].nitrogenDemandSwitch
            VariableReference MaxNconc: VariableName=[Root].maximumNconc
          Constant QStructuralPriority: FixedValue=1
          Constant QMetabolicPriority: FixedValue=1
          Constant QStoragePriority: FixedValue=1
        VariableReference CriticalNConc: VariableName=[Root].MinimumNConc
        NutrientPoolFunctions InitialWt
          Constant Structural: FixedValue=0.005; Units=g/plant
          Constant Metabolic: FixedValue=0
          Constant Storage: FixedValue=0
      GenericOrgan Panicle: IsAboveGround=true
        Constant NReallocationFactor: FixedValue=0
        Constant NRetranslocationFactor: FixedValue=0.3
        Constant MaximumNConc: FixedValue=0.025
        Constant SenescenceRate: FixedValue=0; Units=/d
        Constant MinimumNConc: FixedValue=0.02
        BiomassRemoval BiomassRemovalDefaults: HarvestFractionLiveToRemove=0; HarvestFractionDeadToRemove=0; HarvestFractionLiveToResidue=1; HarvestFractionDeadToResidue=1
        PhaseLookupValue NitrogenDemandSwitch: Start=Emergence; End=StartGrainFill
          Constant: FixedValue=1
        PhaseLookup DMRetranslocationFactor
          PhaseLookupValue VegetativeGrowth: Start=Emergence; End=StartGrainFill
            Constant DMRetranslocationFactor: FixedValue=0
          PhaseLookupValue ReproductiveGrowth: Start=StartGrainFill; End=EndGrainFill
            Constant DMRetranslocationFactor: FixedValue=0.5
        Constant DetachmentRateFunction: FixedValue=0; Units=/d
        Constant MaintenanceRespirationFunction: FixedValue=0; Units=0-1
        Constant DMConversionEfficiency: FixedValue=1; Units=0-1
        MultiplyFunction HeadNumber
          VariableReference StemNumber: VariableName=[Structure].TotalStemPopn
          Constant PaniclesPerStem: FixedValue=0.83; Units=0-1
        Constant DMReallocationFactor: FixedValue=0
        VariableReference CriticalNConc: VariableName=[Panicle].MinimumNConc
        Constant RemobilisationCost: FixedValue=0
        Constant CarbonConcentration: FixedValue=0.4
        NutrientDemandFunctions DMDemands
          MultiplyFunction Structural
            PopulationBasedDemandFunction DMDemandFunction
              VariableReference ThermalTime: VariableName=[Phenology].ThermalTime
              MinimumFunction ExpansionStress: same as Replacements.Oats.Leaf.CohortParameters.ExpansionStress
              VariableReference OrganPopulation: VariableName=[Panicle].HeadNumber
              Constant StartStage: FixedValue=4.8
              Constant MaximumOrganWt: FixedValue=0.4; Units=g
              AddFunction GrowthDuration
                VariableReference EarlyReproductive: VariableName=[Phenology].EarlyReproductive.Target
                VariableReference GrainDevelopment: VariableName=[Phenology].GrainDevelopment.Target
            Constant StructuralFraction: FixedValue=0.9
          Constant Metabolic: FixedValue=0
          StorageDMDemandFunction Storage
            SubtractFunction StorageFraction
              Constant One: FixedValue=1
              VariableReference StructuralFraction: VariableName=[Panicle].DMDemands.Structural.StructuralFraction
          Constant QStructuralPriority: FixedValue=1
          Constant QMetabolicPriority: FixedValue=1
          Constant QStoragePriority: FixedValue=1
        NutrientDemandFunctions NDemands
          MultiplyFunction Structural
            VariableReference MinNconc: VariableName=[Panicle].minimumNconc
            VariableReference PotentialDMAllocation: VariableName=[Panicle].potentialDMAllocation.Structural
          MultiplyFunction Metabolic
            SubtractFunction MetabolicNconc
              VariableReference CritNconc: VariableName=[Panicle].criticalNConc
              VariableReference MinNconc: VariableName=[Panicle].minimumNconc
            VariableReference PotentialDMAllocation: VariableName=[Panicle].potentialDMAllocation.Structural
          StorageNDemandFunction Storage
            VariableReference NitrogenDemandSwitch: VariableName=[Panicle].nitrogenDemandSwitch
            VariableReference MaxNconc: VariableName=[Panicle].maximumNconc
          Constant QStructuralPriority: FixedValue=1
          Constant QMetabolicPriority: FixedValue=1
          Constant QStoragePriority: FixedValue=1
        RetranslocateNonStructural RetranslocateNitrogen
        NutrientPoolFunctions InitialWt: same as Replacements.Oats.Stem.InitialWt
        Constant Photosynthesis: FixedValue=0
        VariableReference initialNConcFunction: VariableName=[Panicle].MinimumNConc
      CompositeBiomass AboveGround: OrganNames=[Leaf, Stem, Panicle, Grain]; IncludeLive=true; IncludeDead=true
      CompositeBiomass AboveGroundLive: OrganNames=[Leaf, Stem, Panicle, Grain]; IncludeLive=true; IncludeDead=false
      CompositeBiomass AboveGroundDead: OrganNames=[Leaf, Stem, Panicle, Grain]; IncludeLive=false; IncludeDead=true
      CompositeBiomass BelowGround: OrganNames=[Root]; IncludeLive=true; IncludeDead=true
      CompositeBiomass Total: OrganNames=[Leaf, Stem, Root, Panicle, Grain]; IncludeLive=true; IncludeDead=true
      CompositeBiomass TotalLive: OrganNames=[Leaf, Stem, Root, Panicle, Grain]; IncludeLive=true; IncludeDead=false
      CompositeBiomass TotalDead: OrganNames=[Leaf, Stem, Root, Panicle, Grain]; IncludeLive=false; IncludeDead=true
      CompositeBiomass Ear: OrganNames=[Panicle, Grain]; IncludeLive=true; IncludeDead=true
        Memo
          The Ear composite biomass object includes the Live and dead pools of all organs within the Ear to allow output for total dry matter and Nutrient contents, including total structural, non-structural and metabolic pools.
      CompositeBiomass StemPlusPanicle: OrganNames=[Stem, Panicle]; IncludeLive=true; IncludeDead=true
      Folder Cultivars
        Memo
          Most crop parameters can be specified individually for cultivars. Customized cultivar parameters are reported in this section.
        Cultivar Drummond
          Command:
            [Phenology].MinimumLeafNumber.FixedValue = 8.5
            [Phenology].VrnSensitivity.FixedValue = 7
            [Phenology].PpSensitivity.FixedValue = 3
            [Phenology].EarlyReproductiveLongDayBase.FixedValue = 3
            [Phenology].EarlyReproductivePpSensitivity.FixedValue = 2
            [Structure].Phyllochron.BasePhyllochron.FixedValue = 75
            [Structure].BranchingRate.StressFactors.CoverEffect.XYPairs.X = 0,0.2,0.35
            [Leaf].CohortParameters.MaxArea.AreaLargestLeaves.FixedValue = 4000
            [Structure].BranchingRate.PotentialBranchingRate.Vegetative.PotentialBranchingRate.XYPairs.X = 1,2,3.99,4,5,6,7,8,9
            [Structure].BranchingRate.PotentialBranchingRate.Vegetative.PotentialBranchingRate.XYPairs.Y = 0,0,0,1,2,4,7,12,20
            [Leaf].CohortParameters.GrowthDuration.AgeFactor.XYPairs.Y = 1,1,0.1
            [Grain].MaximumPotentialGrainSize.FixedValue = 0.05
            [Grain].NumberFunction.GrainNumber.GrainsPerGramOfStem.FixedValue = 40
        Cultivar Drummond_orig
          Command:
            [Phenology].MinimumLeafNumber.FixedValue = 9
            [Phenology].VrnSensitivity.FixedValue = 0
            [Phenology].PpSensitivity.FixedValue = 10
            [Structure].Phyllochron.BasePhyllochron.FixedValue = 80
            [Structure].BranchingRate.StressFactors.CoverEffect.XYPairs.X = 0,0.2,0.35
            [Leaf].CohortParameters.MaxArea.AreaLargestLeaves.FixedValue = 4000
            [Structure].BranchingRate.PotentialBranchingRate.Vegetative.PotentialBranchingRate.XYPairs.X = 1,2,3.99,4,5,6,7,8,9
        Cultivar Milton
          Command:
            [Phenology].MinimumLeafNumber.FixedValue = 8.5
            [Phenology].VrnSensitivity.FixedValue = 7
            [Phenology].PpSensitivity.FixedValue = 3
            [Phenology].EarlyReproductiveLongDayBase.FixedValue = 2
            [Phenology].EarlyReproductivePpSensitivity.FixedValue = 0
            [Structure].Phyllochron.BasePhyllochron.FixedValue = 105
            [Leaf].CohortParameters.MaxArea.AreaLargestLeaves.FixedValue = 4000
            [Leaf].CohortParameters.SenescenceDuration.Multiplier.FixedValue = 3
            [Leaf].CohortParameters.GrowthDuration.AgeFactor.XYPairs.Y = 1,1,0.1
            [Grain].MaximumPotentialGrainSize.FixedValue = 0.05
            [Grain].NumberFunction.GrainNumber.GrainsPerGramOfStem.FixedValue = 50
            [Leaf].ExtinctionCoeff.FixedValue = 0.6
        Cultivar Hokonui
          Command:
            [Phenology].MinimumLeafNumber.FixedValue = 9
            [Phenology].VrnSensitivity.FixedValue = 0
            [Phenology].PpSensitivity.FixedValue = 10
            [Structure].Phyllochron.BasePhyllochron.FixedValue = 90
            [Leaf].CohortParameters.GrowthDuration.AgeFactor.XYPairs.Y = 1,1,0.1
        Cultivar Stampede
          Command:
            [Phenology].MinimumLeafNumber.FixedValue = 9
            [Phenology].VrnSensitivity.FixedValue = 0
            [Phenology].PpSensitivity.FixedValue = 10
            [Structure].Phyllochron.BasePhyllochron.FixedValue = 80
            [Leaf].CohortParameters.GrowthDuration.AgeFactor.XYPairs.Y = 1,1,0.1
        Cultivar Coolibah
          Command:
            [Phenology].MinimumLeafNumber.FixedValue = 9
            [Phenology].VrnSensitivity.FixedValue = 5.3
            [Phenology].PpSensitivity.FixedValue = 3.0
            [Structure].Phyllochron.BasePhyllochron.FixedValue = 90
            [Leaf].CohortParameters.MaxArea.AreaLargestLeaves.FixedValue = 5000
            [Phenology].EarlyReproductivePpSensitivity.FixedValue = 0
            [Phenology].EarlyReproductiveLongDayBase.FixedValue = 2
            [Structure].BranchingRate.StressFactors.CoverEffect.XYPairs.X = 0,0.25,0.5
          Memo
            Leaf appearance rate calibrated using data from Gatton 2007 for Taipan and Coolibah
        Cultivar Taipan
          Command:
            [Phenology].MinimumLeafNumber.FixedValue = 9
            [Phenology].VrnSensitivity.FixedValue = 10
            [Phenology].PpSensitivity.FixedValue = 7.5
            [Phenology].EarlyReproductivePpSensitivity.FixedValue = 3
            [Phenology].EarlyReproductiveLongDayBase.FixedValue = 3
            [Structure].Phyllochron.BasePhyllochron.FixedValue = 90
            [Leaf].CohortParameters.MaxArea.AreaLargestLeaves.FixedValue = 8000
          Memo
            Leaf appearance rate calibrated using data from Gatton 2007 for Taipan and Coolibah
        Cultivar Wintaroo
          Command:
            [Phenology].MinimumLeafNumber.FixedValue = 7
            [Phenology].VrnSensitivity.FixedValue = 2
            [Phenology].PpSensitivity.FixedValue = 2
            [Phenology].EarlyReproductivePpSensitivity.FixedValue = 0
            [Phenology].EarlyReproductiveLongDayBase.FixedValue = 2
            [Structure].Phyllochron.BasePhyllochron.FixedValue = 90
        Cultivar Kangaroo
          Command:
            [Phenology].MinimumLeafNumber.FixedValue = 7
            [Phenology].VrnSensitivity.FixedValue = 4
            [Phenology].PpSensitivity.FixedValue = 4
            [Phenology].EarlyReproductivePpSensitivity.FixedValue = 0
            [Phenology].EarlyReproductiveLongDayBase.FixedValue = 2
            [Structure].Phyllochron.BasePhyllochron.FixedValue = 90
        Cultivar Brusher
          Command:
            [Phenology].MinimumLeafNumber.FixedValue = 7
            [Phenology].VrnSensitivity.FixedValue = 1
            [Phenology].PpSensitivity.FixedValue = 1
            [Phenology].EarlyReproductivePpSensitivity.FixedValue = 0
            [Phenology].EarlyReproductiveLongDayBase.FixedValue = 2
            [Structure].Phyllochron.BasePhyllochron.FixedValue = 80
        Cultivar Algerian
          Command:
            [Phenology].MinimumLeafNumber.FixedValue = 9
            [Phenology].VrnSensitivity.FixedValue = 12
            [Phenology].PpSensitivity.FixedValue = 6
            [Phenology].EarlyReproductivePpSensitivity.FixedValue = 4
            [Phenology].EarlyReproductiveLongDayBase.FixedValue = 3
            [Structure].Phyllochron.BasePhyllochron.FixedValue = 105
            [Leaf].CohortParameters.MaxArea.AreaLargestLeaves.FixedValue = 5000
            [Structure].BranchingRate.StressFactors.CoverEffect.XYPairs.X = 0,0.4,0.7
        Cultivar Nugene
          Command:
            [Phenology].MinimumLeafNumber.FixedValue = 9
            [Phenology].VrnSensitivity.FixedValue = 10
            [Phenology].PpSensitivity.FixedValue = 7.5
            [Phenology].EarlyReproductivePpSensitivity.FixedValue = 3
            [Phenology].EarlyReproductiveLongDayBase.FixedValue = 3
            [Structure].Phyllochron.BasePhyllochron.FixedValue = 90
            [Leaf].CohortParameters.MaxArea.AreaLargestLeaves.FixedValue = 8000
        Cultivar Drover
          Command:
            [Phenology].MinimumLeafNumber.FixedValue = 9
            [Phenology].VrnSensitivity.FixedValue = 4
            [Phenology].PpSensitivity.FixedValue = 9
            [Phenology].EarlyReproductivePpSensitivity.FixedValue = 6
            [Phenology].EarlyReproductiveLongDayBase.FixedValue = 3
            [Structure].Phyllochron.BasePhyllochron.FixedValue = 80
            [Leaf].CohortParameters.MaxArea.AreaLargestLeaves.FixedValue = 8000
        Cultivar Genie: same as Replacements.Oats.Cultivars.Nugene
        Cultivar Aladdin: same as Replacements.Oats.Cultivars.Nugene
        Cultivar Comet: same as Replacements.Oats.Cultivars.Nugene
        Cultivar Wizard: same as Replacements.Oats.Cultivars.Nugene
        Cultivar Bond: same as Replacements.Oats.Cultivars.Nugene
        Memo ReadMe
          # Comparing cultivars Coronet and PFR 100-05

          - Data collected by **Mike George**
          - Data sits in: https://iplant.plantandfood.co.nz/project/I161208

          ## Context:
          - PFR 100-05 showed faster canopy cloure rates via drone aerial photos
          - Field trial was done to identify mechanisms.

          ##Main differences between cultivars were:

          - Larger leaves by PRR 100-05 (45-80% larger)
          - Taller stems by PFR 100-05 (50% taller)

          ## Observations

          - We agreed to keep only leaf size as genotype difference. Height also differed as:
          - [Structure].HeightModel.PotentialHeight.XYPairs.Y = 13,204,820,820
          - [Structure].HeightModel.PotentialHeight.XYPairs.Y = 20,300,1200,1200

          ## Modifications (by RC, RZ, EK)
          - Changed sowing depth to 40 mm to delay emergence
          - Changed depth at which fertiliser N was applied to 10 cm (initially 40 cm which was an error)
          - Removed the initialisation of the second leaf
          - Changed maximum leaf area to match observations (cultivar-specific)
          - Changed tillering dynamics (cultivar-specific)
          - Changed phyllochron to improve leaf tip appearance (cultivar-specific)
          - Changed the extinction coefficient (cultivar-specific)
          - Changed stem height for a closer fit with measured values
          - Changed stem maximum N conc
        Cultivar Coronet_SAE_Oats_2020
          Command:
            [Phenology].MinimumLeafNumber.FixedValue = 9
            [Phenology].VrnSensitivity.FixedValue = 0
            [Phenology].PpSensitivity.FixedValue = 0
            [Structure].Phyllochron.BasePhyllochron.FixedValue = 110
            [Leaf].ExtinctionCoeff.FixedValue = 0.5
            [Leaf].CohortParameters.MaxArea.AreaLargestLeaves.FixedValue = 3073
            [Leaf].InitialLeaves[1].Area = 28.4
            [Leaf].CohortParameters.MaxArea.AgeFactor.XYPairs.X = 3,3.5,4.0,4.5,4.9
            [Leaf].CohortParameters.MaxArea.AgeFactor.XYPairs.Y = 0.1,0.1,0.4,1,0.55
            [Structure].HeightModel.PotentialHeight.XYPairs.Y = 10,150,550,750
            [Structure].BranchingRate.PotentialBranchingRate.Vegetative.PotentialBranchingRate.XYPairs.X = 1,2,3,4,5,6,7,8
            [Structure].BranchingRate.PotentialBranchingRate.Vegetative.PotentialBranchingRate.XYPairs.Y = 0,1,1,0,0,0,0,0
            [Oats].Structure.BranchingRate.StressFactors.CoverEffect.XYPairs.X = 1,1,1
            [Oats].Leaf.CohortParameters.SpecificLeafAreaMax.XYPairs.X = 3,4.3,4.5,4.8
            [Oats].Leaf.CohortParameters.SpecificLeafAreaMax.XYPairs.Y = 15000,20000,23000,25000
            [Stem].MaximumNConc.XYPairs.Y = 0.045,0.04,0.01
            [Stem].MaximumNConc.XYPairs.X = 3.0, 4.2, 5
            [Oats].Structure.BranchMortality.MortalityPhase.Mortality.MortalityPerDegDay.XYPairs.Y[1] = 0.0008
        Cultivar CROA146
          Command:
            [Phenology].MinimumLeafNumber.FixedValue = 9
            [Phenology].VrnSensitivity.FixedValue = 0
            [Phenology].PpSensitivity.FixedValue = 0
            [Structure].Phyllochron.BasePhyllochron.FixedValue = 110
            [Leaf].ExtinctionCoeff.FixedValue = 0.5
            [Leaf].CohortParameters.MaxArea.AreaLargestLeaves.FixedValue = 4105
            [Leaf].InitialLeaves[1].Area = 41.0
            [Leaf].CohortParameters.MaxArea.AgeFactor.XYPairs.X = 3,3.2,4.0,4.4,4.7
            [Leaf].CohortParameters.MaxArea.AgeFactor.XYPairs.Y = 0.12,0.2,1,1,0.55
            [Structure].HeightModel.PotentialHeight.XYPairs.Y = 10,150,550,750
            [Structure].BranchingRate.PotentialBranchingRate.Vegetative.PotentialBranchingRate.XYPairs.X = 1,2,3,4,5,6,7,8
            [Structure].BranchingRate.PotentialBranchingRate.Vegetative.PotentialBranchingRate.XYPairs.Y = 0,0,0,0,0,1.7,0,0
            [Oats].Structure.BranchingRate.StressFactors.CoverEffect.XYPairs.X = 1,1,1
            [Oats].Leaf.CohortParameters.SpecificLeafAreaMax.XYPairs.X = 3,3.5,4
            [Oats].Leaf.CohortParameters.SpecificLeafAreaMax.XYPairs.Y = 18000,20000,25000
            [Oats].Leaf.CohortParameters.GrowthDuration.AgeFactor.XYPairs.X = 3, 4.5, 4.6
            [Oats].Leaf.CohortParameters.GrowthDuration.AgeFactor.XYPairs.Y = 1, 1, 0.2
        Cultivar 107_32
          Command:
            [Phenology].MinimumLeafNumber.FixedValue = 9
            [Phenology].VrnSensitivity.FixedValue = 0
            [Phenology].PpSensitivity.FixedValue = 0
            [Structure].Phyllochron.BasePhyllochron.FixedValue = 110
            [Leaf].ExtinctionCoeff.FixedValue = 0.5
            [Leaf].CohortParameters.MaxArea.AreaLargestLeaves.FixedValue = 4289
            [Leaf].InitialLeaves[1].Area = 68.5
            [Leaf].CohortParameters.MaxArea.AgeFactor.XYPairs.X = 3,3.2,4.0,4.3,4.6
            [Leaf].CohortParameters.MaxArea.AgeFactor.XYPairs.Y = 0.12,0.2,1,1,0.55
            [Structure].HeightModel.PotentialHeight.XYPairs.Y = 10,150,550,750
            [Structure].BranchingRate.PotentialBranchingRate.Vegetative.PotentialBranchingRate.XYPairs.X = 1,2,3,4,5,6,7,8
            [Structure].BranchingRate.PotentialBranchingRate.Vegetative.PotentialBranchingRate.XYPairs.Y = 0,0,0,0,0,1.7,0,0
            [Oats].Structure.BranchingRate.StressFactors.CoverEffect.XYPairs.X = 1,1,1
            [Oats].Leaf.CohortParameters.SpecificLeafAreaMax.XYPairs.X = 3,3.5,4
            [Oats].Leaf.CohortParameters.SpecificLeafAreaMax.XYPairs.Y = 18000,20000,25000
            [Oats].Leaf.CohortParameters.GrowthDuration.AgeFactor.XYPairs.X = 3, 4.5, 4.6
            [Oats].Leaf.CohortParameters.GrowthDuration.AgeFactor.XYPairs.Y = 1, 1, 0.2
        Cultivar Armstrong
          Command:
            [Phenology].MinimumLeafNumber.FixedValue = 9
            [Phenology].VrnSensitivity.FixedValue = 0
            [Phenology].PpSensitivity.FixedValue = 0
            [Structure].Phyllochron.BasePhyllochron.FixedValue = 135
            [Leaf].ExtinctionCoeff.FixedValue = 0.5
            [Leaf].CohortParameters.MaxArea.AreaLargestLeaves.FixedValue = 4417
            [Leaf].InitialLeaves[1].Area = 54.6
            [Leaf].CohortParameters.MaxArea.AgeFactor.XYPairs.X = 3,3.2,4.0,4.3,4.9
            [Leaf].CohortParameters.MaxArea.AgeFactor.XYPairs.Y = 0.12,0.2,1,1,0.25
            [Structure].HeightModel.PotentialHeight.XYPairs.Y = 10,150,550,750
            [Structure].BranchingRate.PotentialBranchingRate.Vegetative.PotentialBranchingRate.XYPairs.X = 1,2,3,4,5,6,7,8
            [Structure].BranchingRate.PotentialBranchingRate.Vegetative.PotentialBranchingRate.XYPairs.Y = 0,0,0,0,0,1.7,0,0
            [Oats].Structure.BranchingRate.StressFactors.CoverEffect.XYPairs.X = 1,1,1
            [Oats].Leaf.CohortParameters.SpecificLeafAreaMax.XYPairs.X = 3,3.5,4
            [Oats].Leaf.CohortParameters.SpecificLeafAreaMax.XYPairs.Y = 18000,20000,25000
            [Oats].Leaf.CohortParameters.GrowthDuration.AgeFactor.XYPairs.X = 3, 4.5, 4.6
            [Oats].Leaf.CohortParameters.GrowthDuration.AgeFactor.XYPairs.Y = 1, 1, 0.2
        Cultivar 100_05
          Command:
            [Phenology].MinimumLeafNumber.FixedValue = 10.1
            [Phenology].VrnSensitivity.FixedValue = 0
            [Phenology].PpSensitivity.FixedValue = 0
            [Structure].Phyllochron.BasePhyllochron.FixedValue = 110
            [Leaf].ExtinctionCoeff.FixedValue = 0.5
            [Leaf].CohortParameters.MaxArea.AreaLargestLeaves.FixedValue = 5814
            [Leaf].InitialLeaves[1].Area = 71.2
            [Leaf].CohortParameters.MaxArea.AgeFactor.XYPairs.X = 3,3.8,4.5,4.6,4.7
            [Leaf].CohortParameters.MaxArea.AgeFactor.XYPairs.Y = 0.1,0.4,1,0.9,0.45
            [Structure].HeightModel.PotentialHeight.XYPairs.Y = 10,150,550,750
            [Structure].BranchingRate.PotentialBranchingRate.Vegetative.PotentialBranchingRate.XYPairs.X = 1,2,3,4,5,6,7,8
            [Structure].BranchingRate.PotentialBranchingRate.Vegetative.PotentialBranchingRate.XYPairs.Y = 0,1,1,0,0,0,0,0
            [Oats].Structure.BranchingRate.StressFactors.CoverEffect.XYPairs.X = 1,1,1
            [Oats].Leaf.CohortParameters.SpecificLeafAreaMax.XYPairs.X = 3,4.3,4.5,4.8
            [Oats].Leaf.CohortParameters.SpecificLeafAreaMax.XYPairs.Y = 15000,20000,23000,25000
            [Stem].MaximumNConc.XYPairs.Y = 0.045,0.035,0.01
            [Stem].MaximumNConc.XYPairs.X = 3.0, 4.2, 4.8
            [Oats].Structure.BranchMortality.MortalityPhase.Mortality.MortalityPerDegDay.XYPairs.Y[1] = 0.0022
        Cultivar Milton2
          Command:
            [Phenology].MinimumLeafNumber.FixedValue = 9
            [Phenology].VrnSensitivity.FixedValue = 0
            [Phenology].PpSensitivity.FixedValue = 0
            [Structure].Phyllochron.BasePhyllochron.FixedValue = 110
            [Leaf].ExtinctionCoeff.FixedValue = 0.5
            [Leaf].CohortParameters.MaxArea.AreaLargestLeaves.FixedValue = 3593
            [Leaf].InitialLeaves[1].Area = 45.0
            [Leaf].CohortParameters.MaxArea.AgeFactor.XYPairs.X = 3,3.2,4.0,4.5,4.8
            [Leaf].CohortParameters.MaxArea.AgeFactor.XYPairs.Y = 0.12,0.2,1,1,0.3
            [Structure].HeightModel.PotentialHeight.XYPairs.Y = 10,150,550,750
            [Structure].BranchingRate.PotentialBranchingRate.Vegetative.PotentialBranchingRate.XYPairs.X = 1,2,3,4,5,6,7,8
            [Structure].BranchingRate.PotentialBranchingRate.Vegetative.PotentialBranchingRate.XYPairs.Y = 0,0,0,0,0,1.7,0,0
            [Oats].Structure.BranchingRate.StressFactors.CoverEffect.XYPairs.X = 1,1,1
            [Oats].Leaf.CohortParameters.SpecificLeafAreaMax.XYPairs.X = 3,3.5,4
            [Oats].Leaf.CohortParameters.SpecificLeafAreaMax.XYPairs.Y = 18000,20000,25000
            [Oats].Leaf.CohortParameters.GrowthDuration.AgeFactor.XYPairs.X = 3, 4.5, 4.6
            [Oats].Leaf.CohortParameters.GrowthDuration.AgeFactor.XYPairs.Y = 1, 1, 0.2
        Cultivar PFR_100_05
          Command:
            [Phenology].MinimumLeafNumber.FixedValue = 9
            [Phenology].VrnSensitivity.FixedValue = 0
            [Phenology].PpSensitivity.FixedValue = 0
            [Phenology].EarlyReproductiveLongDayBase.FixedValue = 0
            [Phenology].EarlyReproductivePpSensitivity.FixedValue = 0
            [Structure].Phyllochron.BasePhyllochron.FixedValue = 105
            [Leaf].ExtinctionCoeff.FixedValue = 0.6
            [Leaf].CohortParameters.MaxArea.AreaLargestLeaves.FixedValue = 2500
            [Leaf].InitialLeaves1.Area = 340
            [Leaf].InitialLeaves2.Area = 660
            [Leaf].CohortParameters.MaxArea.AgeFactor.XYPairs.X = 3,4,4.3
            [Leaf].CohortParameters.MaxArea.AgeFactor.XYPairs.Y =  0.05,1,0.05
        Cultivar Coronet
          Command:
            [Phenology].MinimumLeafNumber.FixedValue = 9
            [Phenology].VrnSensitivity.FixedValue = 0
            [Phenology].PpSensitivity.FixedValue = 0
            [Phenology].EarlyReproductiveLongDayBase.FixedValue = 0
            [Phenology].EarlyReproductivePpSensitivity.FixedValue = 0
            [Structure].Phyllochron.BasePhyllochron.FixedValue = 105
            [Leaf].ExtinctionCoeff.FixedValue = 0.6
            [Leaf].CohortParameters.MaxArea.AreaLargestLeaves.FixedValue = 1640
            [Leaf].InitialLeaves1.Area = 200
            [Leaf].InitialLeaves2.Area = 400
            [Leaf].CohortParameters.MaxArea.AgeFactor.XYPairs.X = 3,4,4.3
            [Leaf].CohortParameters.MaxArea.AgeFactor.XYPairs.Y = 0.05,1,0.05
        Cultivar Qingyin2
          Command:
            [Phenology].MinimumLeafNumber.FixedValue = 8.55
            [Phenology].VrnSensitivity.FixedValue = 1.5
            [Phenology].PpSensitivity.FixedValue = 4.5
            [Structure].Phyllochron.BasePhyllochron.FixedValue = 40
            [Phenology].GrainFilling.Target.FixedValue = 100
            [Leaf].Photosynthesis.RUE.FixedValue = 2.8
            [Leaf].ExtinctionCoeff.FixedValue = 0.65
            [Leaf].CohortParameters.MaxArea.AreaLargestLeaves.FixedValue = 4417
            [Phenology].Germinating.MinSoilTemperature.FixedValue = 0
            [Oats].Phenology.Emerging.Target.ShootLag.FixedValue = 40
            [Oats].Phenology.Emerging.Target.DepthxRate.ShootRate.FixedValue =2
      Constant MortalityRate: FixedValue=0
      Constant SeedMortalityRate: FixedValue=0
    Plant Maize: PlantType=Maize
      Memo Introduction
        _Brown, H.E., Teixeira, E.I., Huth, N.I. and Holzworth, D.P._
      Folder CultivarFolder
        Folder 555
          Cultivar 555_1197AMXT
            Command:
              [Phenology].Juvenile.Target.FixedValue = 260
              [Phenology].Photosensitive.Target.XYPairs.Y = 0, 0 ,0
              [Phenology].FlagLeafToFlowering.Target.FixedValue = 1
              [Phenology].FloweringToGrainFilling.Target.FixedValue = 170
              [Phenology].GrainFilling.Target.FixedValue = 560
              [Phenology].Maturing.Target.FixedValue = 50
              [Phenology].MaturityToHarvestRipe.Target.FixedValue = 50
              [Leaf].Photosynthesis.RUE.FixedValue = 2.25
              [Stem].DMDemands.Structural.DMDemandFunction.PartitionFraction.XYPairs.Y = 0.1, 1, 1, 1,0
              [Leaf].CohortParameters.SenescenceDuration.XYPairs.Y = 200, 300, 1100
              [Leaf].CohortParameters.DMRetranslocationFactor.FixedValue = 0.025
              [Maize].Grain.MaximumGrainsPerCob.FixedValue = 640
              [Maize].Grain.MaximumPotentialGrainSize.FixedValue = 0.32 //0.31
              [Grain].MinimumNConc.FixedValue = 0.00955 //0.0125
              [Grain].MaximumNConc.InitialPhase.InitialNconc.FixedValue=0.03
              [Maize].Root.SpecificRootLength.FixedValue = 135
              [Maize].Root.RootFrontVelocity.PotentialRootFrontVelocity.PreFlowering.RootFrontVelocity.FixedValue = 25
              [Root].RootFrontVelocity.AFPSFactor.XYPairs.X = 0, 0.05, 1
              [Root].RootFrontVelocity.AFPSFactor.XYPairs.Y = 0, 1, 1
          Cultivar 555_DKC60
            Command:
              [Phenology].Juvenile.Target.FixedValue = 260
              [Phenology].Photosensitive.Target.XYPairs.Y = 0, 0 ,0
              [Phenology].FlagLeafToFlowering.Target.FixedValue = 1
              [Phenology].FloweringToGrainFilling.Target.FixedValue = 170
              [Phenology].GrainFilling.Target.FixedValue = 560
              [Phenology].Maturing.Target.FixedValue = 50
              [Phenology].MaturityToHarvestRipe.Target.FixedValue = 50
              [Leaf].Photosynthesis.RUE.FixedValue = 2.20
              [Stem].DMDemands.Structural.DMDemandFunction.PartitionFraction.XYPairs.Y = 0.1, 1, 1, 1,0
              [Leaf].CohortParameters.SenescenceDuration.XYPairs.Y = 200, 300, 1100
              [Leaf].CohortParameters.DMRetranslocationFactor.FixedValue = 0.025
              [Maize].Grain.MaximumGrainsPerCob.FixedValue = 690
              [Maize].Grain.MaximumPotentialGrainSize.FixedValue = 0.31
              [Grain].MinimumNConc.FixedValue = 0.00875 //0.0125
              [Grain].MaximumNConc.InitialPhase.InitialNconc.FixedValue=0.03
              [Maize].Root.SpecificRootLength.FixedValue = 135
              [Maize].Root.RootFrontVelocity.PotentialRootFrontVelocity.PreFlowering.RootFrontVelocity.FixedValue = 25
              [Root].RootFrontVelocity.AFPSFactor.XYPairs.X = 0, 0.05, 1
              [Root].RootFrontVelocity.AFPSFactor.XYPairs.Y = 0, 1, 1
          Cultivar 555_DKC63
            Command:
              [Phenology].Juvenile.Target.FixedValue = 285 //270
              [Phenology].Photosensitive.Target.XYPairs.Y = 0, 0 ,0
              [Phenology].FlagLeafToFlowering.Target.FixedValue = 1
              [Phenology].FloweringToGrainFilling.Target.FixedValue = 170
              [Phenology].GrainFilling.Target.FixedValue = 650 //690
              [Phenology].Maturing.Target.FixedValue = 50
              [Phenology].MaturityToHarvestRipe.Target.FixedValue = 50
              [Leaf].Photosynthesis.RUE.FixedValue = 2.0 //2.1
              [Stem].DMDemands.Structural.DMDemandFunction.PartitionFraction.XYPairs.Y = 0.1, 1, 1, 1,0
              [Leaf].CohortParameters.SenescenceDuration.XYPairs.Y = 200, 300, 550
              [Leaf].CohortParameters.DMRetranslocationFactor.FixedValue = 0.025
              [Maize].Grain.MaximumGrainsPerCob.FixedValue = 700 //650
              [Maize].Grain.MaximumPotentialGrainSize.FixedValue = 0.32 //0.30
              [Grain].MinimumNConc.FixedValue = 0.0115
              [Grain].MaximumNConc.InitialPhase.InitialNconc.FixedValue=0.03
              [Maize].Root.SpecificRootLength.FixedValue = 135
              [Maize].Root.RootFrontVelocity.PotentialRootFrontVelocity.PreFlowering.RootFrontVelocity.FixedValue = 25
              [Root].RootFrontVelocity.AFPSFactor.XYPairs.X = 0, 0.05, 1
              [Root].RootFrontVelocity.AFPSFactor.XYPairs.Y = 0, 1, 1
          Cultivar 555_NK0748
            Command:
              [Phenology].Juvenile.Target.FixedValue = 270
              [Phenology].Photosensitive.Target.XYPairs.Y = 0, 0 ,0
              [Phenology].FlagLeafToFlowering.Target.FixedValue = 1
              [Phenology].FloweringToGrainFilling.Target.FixedValue = 170
              [Phenology].GrainFilling.Target.FixedValue = 690
              [Phenology].Maturing.Target.FixedValue = 50
              [Phenology].MaturityToHarvestRipe.Target.FixedValue = 50
              [Leaf].Photosynthesis.RUE.FixedValue = 2.2 //2.1
              [Stem].DMDemands.Structural.DMDemandFunction.PartitionFraction.XYPairs.Y = 0.1, 1, 1, 1,0
              [Leaf].CohortParameters.SenescenceDuration.XYPairs.Y = 200, 300, 550
              [Leaf].CohortParameters.DMRetranslocationFactor.FixedValue = 0.025
              [Maize].Grain.MaximumGrainsPerCob.FixedValue = 640 //600
              [Maize].Grain.MaximumPotentialGrainSize.FixedValue = 0.31 //0.305
              [Grain].MinimumNConc.FixedValue = 0.0125
              [Grain].MaximumNConc.InitialPhase.InitialNconc.FixedValue=0.03
              [Maize].Root.SpecificRootLength.FixedValue = 135
              [Maize].Root.RootFrontVelocity.PotentialRootFrontVelocity.PreFlowering.RootFrontVelocity.FixedValue = 25
              [Root].RootFrontVelocity.AFPSFactor.XYPairs.X = 0, 0.05, 1
              [Root].RootFrontVelocity.AFPSFactor.XYPairs.Y = 0, 1, 1
          Cultivar 555_P1108Q
            Command:
              [Phenology].Juvenile.Target.FixedValue = 270 //270
              [Phenology].Photosensitive.Target.XYPairs.Y = 0, 0 ,0
              [Phenology].FlagLeafToFlowering.Target.FixedValue = 1
              [Phenology].FloweringToGrainFilling.Target.FixedValue = 170
              [Phenology].GrainFilling.Target.FixedValue = 660 //690
              [Phenology].Maturing.Target.FixedValue = 50
              [Phenology].MaturityToHarvestRipe.Target.FixedValue = 50
              [Leaf].Photosynthesis.RUE.FixedValue = 2.0 //2.1
              [Stem].DMDemands.Structural.DMDemandFunction.PartitionFraction.XYPairs.Y = 0.1, 1, 1, 1,0
              [Leaf].CohortParameters.SenescenceDuration.XYPairs.Y = 200, 300, 950
              [Leaf].CohortParameters.DMRetranslocationFactor.FixedValue = 0.025
              [Maize].Grain.MaximumGrainsPerCob.FixedValue = 650 //670
              [Maize].Grain.MaximumPotentialGrainSize.FixedValue = 0.32 //0.3
              [Grain].MinimumNConc.FixedValue = 0.0115
              [Grain].MaximumNConc.InitialPhase.InitialNconc.FixedValue=0.03
              [Maize].Root.SpecificRootLength.FixedValue = 135
              [Maize].Root.RootFrontVelocity.PotentialRootFrontVelocity.PreFlowering.RootFrontVelocity.FixedValue = 22
              [Root].RootFrontVelocity.AFPSFactor.XYPairs.X = 0, 0.05, 1
              [Root].RootFrontVelocity.AFPSFactor.XYPairs.Y = 0, 1, 1
          Cultivar 555_R9734
            Command:
              [Phenology].Juvenile.Target.FixedValue = 260
              [Phenology].Photosensitive.Target.XYPairs.Y = 0, 0 ,0
              [Phenology].FlagLeafToFlowering.Target.FixedValue = 1
              [Phenology].FloweringToGrainFilling.Target.FixedValue = 170
              [Phenology].GrainFilling.Target.FixedValue = 720
              [Phenology].Maturing.Target.FixedValue = 50
              [Phenology].MaturityToHarvestRipe.Target.FixedValue = 50
              [Leaf].Photosynthesis.RUE.FixedValue = 2.2 //2.2
              [Stem].DMDemands.Structural.DMDemandFunction.PartitionFraction.XYPairs.Y = 0.1, 1, 1, 1,0
              [Leaf].CohortParameters.SenescenceDuration.XYPairs.Y = 200, 300, 750
              [Leaf].CohortParameters.DMRetranslocationFactor.FixedValue = 0.025
              [Maize].Grain.MaximumGrainsPerCob.FixedValue = 580 //580
              [Maize].Grain.MaximumPotentialGrainSize.FixedValue = 0.28 //0.28
              [Grain].MinimumNConc.FixedValue = 0.0115
              [Grain].MaximumNConc.InitialPhase.InitialNconc.FixedValue=0.03
              [Maize].Root.SpecificRootLength.FixedValue = 135
              [Maize].Root.RootFrontVelocity.PotentialRootFrontVelocity.PreFlowering.RootFrontVelocity.FixedValue = 25
              [Root].RootFrontVelocity.AFPSFactor.XYPairs.X = 0, 0.05, 1
              [Root].RootFrontVelocity.AFPSFactor.XYPairs.Y = 0, 1, 1
        Cultivar Hycorn_53
          Command:
            [Phenology].Juvenile.Target.FixedValue = 190
            [Phenology].Photosensitive.Target.XYPairs.X = 0, 12.5, 24
            [Phenology].Photosensitive.Target.XYPairs.Y = 0, 0, 124
            [Phenology].FlagLeafToFlowering.Target.FixedValue = 10
            [Phenology].FloweringToGrainFilling.Target.FixedValue = 170
            [Phenology].GrainFilling.Target.FixedValue = 520
            [Rachis].DMDemands.Structural.DMDemandFunction.MaximumOrganWt.FixedValue = 25
            [Grain].MaximumGrainsPerCob.FixedValue =  550
        Cultivar Pioneer_33M54
          Command:
            [Phenology].GrainFilling.Target.FixedValue = 550
            [Phenology].Juvenile.Target.FixedValue = 270
        Cultivar Pioneer_38H20
          Command:
            [Phenology].Juvenile.Target.FixedValue = 210
            [Phenology].GrainFilling.Target.FixedValue = 550
        Cultivar Pioneer_34K77
          Command:
            [Phenology].Juvenile.Target.FixedValue = 280
            [Phenology].GrainFilling.Target.FixedValue = 550
          Memo
            VShort duration variety released in New Zealand by Pioneer
        Cultivar Pioneer_39V43
          Command:
            [Phenology].Juvenile.Target.FixedValue = 100
            [Phenology].GrainFilling.Target.FixedValue = 500
            [Phenology].FloweringToGrainFilling.Target.FixedValue = 170
            [Structure].Phyllochron.Phyllochron.Phyllochron.XYPairs.X = 1, 4, 4.2, 10.5, 11
            [Structure].Phyllochron.Phyllochron.Phyllochron.XYPairs.Y = 26, 26, 46, 46, 70
            [Rachis].DMDemands.Structural.DMDemandFunction.MaximumOrganWt.FixedValue = 18
            [Structure].HeightModel.PotentialHeight.XYPairs.X = 3, 4, 5, 6
            [Structure].HeightModel.PotentialHeight.XYPairs.Y = 20, 40, 50, 1300
          Memo
            VShort duration variety released in New Zealand by Pioneer
        Cultivar Atrium
          Command:
            [Phenology].Juvenile.Target.FixedValue = 150
            [Phenology].GrainFilling.Target.FixedValue = 500
            [Phenology].FloweringToGrainFilling.Target.FixedValue = 170
            [Structure].Phyllochron.Phyllochron.Phyllochron.XYPairs.X = 1, 4, 4.2, 10.5, 11
            [Structure].Phyllochron.Phyllochron.Phyllochron.XYPairs.Y = 26, 26, 46, 46, 70
            [Rachis].DMDemands.Structural.DMDemandFunction.MaximumOrganWt.FixedValue = 18
            [Structure].HeightModel.PotentialHeight.XYPairs.X = 3, 4, 5, 6
            [Structure].HeightModel.PotentialHeight.XYPairs.Y = 20, 40, 50, 2370
          Memo
            Maize variety used in trials at Wageningen University
        Cultivar Laila
          Command:
            [Phenology].Juvenile.Target.FixedValue = 211
            [Phenology].Photosensitive.Target.XYPairs.X = 0, 12.5, 24
            [Phenology].Photosensitive.Target.XYPairs.Y = 0, 0, 0
            [Phenology].FlagLeafToFlowering.Target.FixedValue = 1
            [Phenology].FloweringToGrainFilling.Target.FixedValue = 170
            [Phenology].GrainFilling.Target.FixedValue = 812
            [Phenology].Maturing.Target.FixedValue = 1
            [Phenology].MaturityToHarvestRipe.Target.FixedValue = 1
            [Rachis].DMDemands.Structural.DMDemandFunction.MaximumOrganWt.FixedValue = 36
            [Grain].MaximumGrainsPerCob.FixedValue =  720
        Cultivar GH_5019WX
          Command:
            [Phenology].Juvenile.Target.FixedValue = 225
            [Phenology].Photosensitive.Target.XYPairs.X = 0, 12.5, 24.0
            [Phenology].Photosensitive.Target.XYPairs.Y = 0, 0, 124
            [Phenology].FlagLeafToFlowering.Target.FixedValue = 101
            [Phenology].FloweringToGrainFilling.Target.FixedValue = 170
            [Phenology].GrainFilling.Target.FixedValue = 694
            [Rachis].DMDemands.Structural.DMDemandFunction.MaximumOrganWt.FixedValue = 25
            [Grain].MaximumGrainsPerCob.FixedValue = 550
        Cultivar Hycorn_40
          Command:
            [Phenology].Juvenile.Target.FixedValue = 190
            [Phenology].Photosensitive.Target.XYPairs.X = 0, 12.5, 24
            [Phenology].Photosensitive.Target.XYPairs.Y = 0, 0, 124
            [Phenology].FlagLeafToFlowering.Target.FixedValue = 50
            [Phenology].FloweringToGrainFilling.Target.FixedValue = 170
            [Phenology].GrainFilling.Target.FixedValue = 713
            [Rachis].DMDemands.Structural.DMDemandFunction.MaximumOrganWt.FixedValue = 25
            [Grain].MaximumGrainsPerCob.FixedValue =  550
        Cultivar GH_5009
          Command:
            [Phenology].Juvenile.Target.FixedValue = 190
            [Phenology].Photosensitive.Target.XYPairs.X = 0, 12.5, 24
            [Phenology].Photosensitive.Target.XYPairs.Y = 0, 0, 300
            [Phenology].FlagLeafToFlowering.Target.FixedValue = 50
            [Phenology].FloweringToGrainFilling.Target.FixedValue = 170
            [Phenology].GrainFilling.Target.FixedValue = 713
            [Rachis].DMDemands.Structural.DMDemandFunction.MaximumOrganWt.FixedValue = 25
            [Grain].MaximumGrainsPerCob.FixedValue =  550
        Cultivar Dekalb_XL82
          Command:
            [Phenology].Juvenile.Target.FixedValue = 211
            [Phenology].Photosensitive.Target.XYPairs.X = 0, 12.5, 24
            [Phenology].Photosensitive.Target.XYPairs.Y = 0, 0, 472
            [Phenology].FlagLeafToFlowering.Target.FixedValue = 101
            [Phenology].FloweringToGrainFilling.Target.FixedValue = 170
            [Phenology].GrainFilling.Target.FixedValue = 813
            [Rachis].DMDemands.Structural.DMDemandFunction.MaximumOrganWt.FixedValue = 25
            [Grain].MaximumGrainsPerCob.FixedValue = 550
        Cultivar malawi_local
          Command:
            [Phenology].Juvenile.Target.FixedValue = 280
            [Phenology].Photosensitive.Target.XYPairs.X = 0, 12.5, 24
            [Phenology].Photosensitive.Target.XYPairs.Y = 0, 0, 264.5
            [Phenology].FlagLeafToFlowering.Target.FixedValue = 10
            [Phenology].FloweringToGrainFilling.Target.FixedValue = 170
            [Phenology].GrainFilling.Target.FixedValue = 600
            [Rachis].DMDemands.Structural.DMDemandFunction.MaximumOrganWt.FixedValue = 14
            [Grain].MaximumGrainsPerCob.FixedValue = 360
            [Grain].MaximumPotentialGrainSize.FixedValue = 0.217
          Memo
            The variety malawi_local is a Malawian medium-late maturing local variety.  Photoperiod response is taken from Ellis et al Crop Sci 32:1225 for SR52.
        Cultivar mh19
          Command:
            [Phenology].Juvenile.Target.FixedValue = 290
            [Phenology].Photosensitive.Target.XYPairs.X = 0, 12.5, 24
            [Phenology].Photosensitive.Target.XYPairs.Y = 0, 0, 264.5
            [Phenology].FlagLeafToFlowering.Target.FixedValue = 10
            [Phenology].FloweringToGrainFilling.Target.FixedValue = 170
            [Phenology].GrainFilling.Target.FixedValue = 570
            [Rachis].DMDemands.Structural.DMDemandFunction.MaximumOrganWt.FixedValue = 14
            [Grain].MaximumGrainsPerCob.FixedValue = 504
            [Grain].MaximumPotentialGrainSize.FixedValue = 0.361
          Memo
            The variety mh19 is a Malawian medium-late maturing hybrid.  Photoperiod response is taken from Ellis et al Crop Sci 32:1225 for SR52.
        Cultivar mh17
          Command:
            [Phenology].Juvenile.Target.FixedValue = 290
            [Phenology].Photosensitive.Target.XYPairs.X = 0, 12.5, 24
            [Phenology].Photosensitive.Target.XYPairs.Y = 0, 0, 264.5
            [Phenology].FlagLeafToFlowering.Target.FixedValue = 10
            [Phenology].FloweringToGrainFilling.Target.FixedValue = 170
            [Phenology].GrainFilling.Target.FixedValue = 570
            [Rachis].DMDemands.Structural.DMDemandFunction.MaximumOrganWt.FixedValue = 14
            [Grain].MaximumGrainsPerCob.FixedValue = 504
            [Grain].MaximumPotentialGrainSize.FixedValue = 0.361
          Memo
            The variety mh17 is a Malawian medium-late maturing hybrid.  Photoperiod response is taken from Ellis et al Crop Sci 32:1225 for SR52.
        Cultivar mh16
          Command:
            [Phenology].Juvenile.Target.FixedValue = 290
            [Phenology].Photosensitive.Target.XYPairs.X = 0, 12.5, 24
            [Phenology].Photosensitive.Target.XYPairs.Y = 0, 0, 264.5
            [Phenology].FlagLeafToFlowering.Target.FixedValue = 10
            [Phenology].FloweringToGrainFilling.Target.FixedValue = 170
            [Phenology].GrainFilling.Target.FixedValue = 570
            [Rachis].DMDemands.Structural.DMDemandFunction.MaximumOrganWt.FixedValue = 14
            [Grain].MaximumGrainsPerCob.FixedValue = 504
            [Grain].MaximumPotentialGrainSize.FixedValue = 0.361
          Memo
            The variety mh16 is a Malawian medium-late maturing hybrid.  Photoperiod response is taken from Ellis et al Crop Sci 32:1225 for SR52.
        Cultivar mh12
          Command:
            [Phenology].Juvenile.Target.FixedValue = 290
            [Phenology].Photosensitive.Target.XYPairs.X = 0, 12.5, 24
            [Phenology].Photosensitive.Target.XYPairs.Y = 0, 0, 264.5
            [Phenology].FlagLeafToFlowering.Target.FixedValue = 10
            [Phenology].FloweringToGrainFilling.Target.FixedValue = 170
            [Phenology].GrainFilling.Target.FixedValue = 570
            [Rachis].DMDemands.Structural.DMDemandFunction.MaximumOrganWt.FixedValue = 14
            [Grain].MaximumGrainsPerCob.FixedValue = 504
            [Grain].MaximumPotentialGrainSize.FixedValue = 0.361
          Memo
            The variety mh12 is a Malawian medium-late maturing hybrid.  Photoperiod response is taken from Ellis et al Crop Sci 32:1225 for SR52.
        Cultivar sc623
          Command:
            [Phenology].Juvenile.Target.FixedValue = 280
            [Phenology].Photosensitive.Target.XYPairs.X = 0, 12.5, 24
            [Phenology].Photosensitive.Target.XYPairs.Y = 0, 0, 264.5
            [Phenology].FlagLeafToFlowering.Target.FixedValue = 10
            [Phenology].FloweringToGrainFilling.Target.FixedValue = 170
            [Phenology].GrainFilling.Target.FixedValue = 550
            [Rachis].DMDemands.Structural.DMDemandFunction.MaximumOrganWt.FixedValue = 14
            [Grain].MaximumGrainsPerCob.FixedValue = 504
            [Grain].MaximumPotentialGrainSize.FixedValue = 0.361
          Memo
            The variety sc623 is a Zimbabwean medium-late maturing hybrid.  Photoperiod response is taken from Ellis et al Crop Sci 32:1225 for SR52.
        Cultivar sc625
          Command:
            [Phenology].Juvenile.Target.FixedValue = 280
            [Phenology].Photosensitive.Target.XYPairs.X = 0, 12.5, 24
            [Phenology].Photosensitive.Target.XYPairs.Y = 0, 0, 264.5
            [Phenology].FlagLeafToFlowering.Target.FixedValue = 10
            [Phenology].FloweringToGrainFilling.Target.FixedValue = 170
            [Phenology].GrainFilling.Target.FixedValue = 570
            [Rachis].DMDemands.Structural.DMDemandFunction.MaximumOrganWt.FixedValue = 14
            [Grain].MaximumGrainsPerCob.FixedValue = 504
            [Grain].MaximumPotentialGrainSize.FixedValue = 0.361
          Memo
            The variety sc625 is a Zimbabwean medium-late maturing hybrid.  Photoperiod response is taken from Ellis et al Crop Sci 32:1225 for SR52.
        Cultivar sc601
          Command:
            [Phenology].Juvenile.Target.FixedValue = 280
            [Phenology].Photosensitive.Target.XYPairs.X = 0, 12.5, 24
            [Phenology].Photosensitive.Target.XYPairs.Y = 0, 0, 264.5
            [Phenology].FlagLeafToFlowering.Target.FixedValue = 10
            [Phenology].FloweringToGrainFilling.Target.FixedValue = 170
            [Phenology].GrainFilling.Target.FixedValue = 560
            [Rachis].DMDemands.Structural.DMDemandFunction.MaximumOrganWt.FixedValue = 14
            [Grain].MaximumGrainsPerCob.FixedValue = 495
            [Grain].MaximumPotentialGrainSize.FixedValue = 0.361
          Memo
            The variety sc601 is a Zimbabwean medium-late maturing hybrid.  Photoperiod response is taken from Ellis et al Crop Sci 32:1225 for SR52.
        Cultivar CG4141
          Command:
            [Phenology].Juvenile.Target.FixedValue = 233
            [Phenology].Photosensitive.Target.XYPairs.X = 0, 12.5, 24
            [Phenology].Photosensitive.Target.XYPairs.Y = 0, 0, 264.5
            [Phenology].FlagLeafToFlowering.Target.FixedValue = 10
            [Phenology].FloweringToGrainFilling.Target.FixedValue = 170
            [Phenology].GrainFilling.Target.FixedValue = 550
            [Rachis].DMDemands.Structural.DMDemandFunction.MaximumOrganWt.FixedValue = 14
            [Grain].MaximumGrainsPerCob.FixedValue = 468
            [Grain].MaximumPotentialGrainSize.FixedValue = 0.361
          Memo
            The variety CG4141 is a Zimbabwean early-medium maturing hybrid.  Photoperiod response is taken from Ellis et al Crop Sci 32:1225 for SR52.
        Cultivar mh18
          Command:
            [Phenology].Juvenile.Target.FixedValue = 260
            [Phenology].Photosensitive.Target.XYPairs.X = 0, 12.5, 24
            [Phenology].Photosensitive.Target.XYPairs.Y = 0, 0, 264.5
            [Phenology].FlagLeafToFlowering.Target.FixedValue = 10
            [Phenology].FloweringToGrainFilling.Target.FixedValue = 170
            [Phenology].GrainFilling.Target.FixedValue = 550
            [Rachis].DMDemands.Structural.DMDemandFunction.MaximumOrganWt.FixedValue = 14
            [Grain].MaximumGrainsPerCob.FixedValue = 486
            [Grain].MaximumPotentialGrainSize.FixedValue = 0.361
          Memo
            The variety mh18 is a Zimbabwean early-medium maturing hybrid.  Photoperiod response is taken from Ellis et al Crop Sci 32:1225 for SR52.
        Cultivar r215
          Command:
            [Phenology].Juvenile.Target.FixedValue = 250
            [Phenology].Photosensitive.Target.XYPairs.X = 0, 12.5, 24
            [Phenology].Photosensitive.Target.XYPairs.Y = 0, 0, 264.5
            [Phenology].FlagLeafToFlowering.Target.FixedValue = 10
            [Phenology].FloweringToGrainFilling.Target.FixedValue = 170
            [Phenology].GrainFilling.Target.FixedValue = 550
            [Rachis].DMDemands.Structural.DMDemandFunction.MaximumOrganWt.FixedValue = 14
            [Grain].MaximumGrainsPerCob.FixedValue = 468
            [Grain].MaximumPotentialGrainSize.FixedValue = 0.361
          Memo
            The variety r215 is a Zimbabwean early-medium maturing hybrid.  Photoperiod response is taken from Ellis et al Crop Sci 32:1225 for SR52.
        Cultivar Melkassa
          Command:
            [Phenology].Juvenile.Target.FixedValue = 230
            [Phenology].Photosensitive.Target.XYPairs.X = 0, 12.5, 24
            [Phenology].Photosensitive.Target.XYPairs.Y = 0, 0, 264.5
            [Phenology].FlagLeafToFlowering.Target.FixedValue = 10
            [Phenology].FloweringToGrainFilling.Target.FixedValue = 160
            [Phenology].GrainFilling.Target.FixedValue = 550
            [Rachis].DMDemands.Structural.DMDemandFunction.MaximumOrganWt.FixedValue = 14
            [Grain].MaximumGrainsPerCob.FixedValue = 387
            [Grain].MaximumPotentialGrainSize.FixedValue = 0.33
          Memo
            The variety Melkassa is a local early-medium maturing Ethiopian variety.
        Cultivar sr52
          Command:
            [Phenology].Juvenile.Target.FixedValue = 250
            [Phenology].Photosensitive.Target.XYPairs.X = 0, 12.5, 24
            [Phenology].Photosensitive.Target.XYPairs.Y = 0, 0, 264.5
            [Phenology].FlagLeafToFlowering.Target.FixedValue = 10
            [Phenology].FloweringToGrainFilling.Target.FixedValue = 170
            [Phenology].GrainFilling.Target.FixedValue = 550
            [Rachis].DMDemands.Structural.DMDemandFunction.MaximumOrganWt.FixedValue = 14
            [Grain].MaximumGrainsPerCob.FixedValue = 468
            [Grain].MaximumPotentialGrainSize.FixedValue = 0.361
          Memo
            The variety sr52 is a Zimbabwean early-medium maturing hybrid.  Photoperiod response is taken from Ellis et al Crop Sci 32:1225 for SR52.
        Cultivar sc501
          Command:
            [Phenology].Juvenile.Target.FixedValue = 250
            [Phenology].Photosensitive.Target.XYPairs.X = 0, 12.5, 24
            [Phenology].Photosensitive.Target.XYPairs.Y = 0, 0, 264.5
            [Phenology].FlagLeafToFlowering.Target.FixedValue = 10
            [Phenology].FloweringToGrainFilling.Target.FixedValue = 170
            [Phenology].GrainFilling.Target.FixedValue = 550
            [Rachis].DMDemands.Structural.DMDemandFunction.MaximumOrganWt.FixedValue = 14
            [Grain].MaximumGrainsPerCob.FixedValue = 468
            [Grain].MaximumPotentialGrainSize.FixedValue = 0.361
          Memo
            The variety sc501 is a Zimbabwean early-medium maturing hybrid.  Photoperiod response is taken from Ellis et al Crop Sci 32:1225 for SR52.
        Cultivar r201
          Command:
            [Phenology].Juvenile.Target.FixedValue = 230
            [Phenology].Photosensitive.Target.XYPairs.X = 0, 12.5, 24
            [Phenology].Photosensitive.Target.XYPairs.Y = 0, 0, 264.5
            [Phenology].FlagLeafToFlowering.Target.FixedValue = 10
            [Phenology].FloweringToGrainFilling.Target.FixedValue = 170
            [Phenology].GrainFilling.Target.FixedValue = 550
            [Rachis].DMDemands.Structural.DMDemandFunction.MaximumOrganWt.FixedValue = 14
            [Grain].MaximumGrainsPerCob.FixedValue = 450
            [Grain].MaximumPotentialGrainSize.FixedValue = 0.375
          Memo
            The variety r201 is a Zimbabwean early maturing hybrid.  Photoperiod response is taken from Ellis et al Crop Sci 32:1225 for SR52.
        Cultivar sc401
          Command:
            [Phenology].Juvenile.Target.FixedValue = 230
            [Phenology].Photosensitive.Target.XYPairs.X = 0, 12.5, 24
            [Phenology].Photosensitive.Target.XYPairs.Y = 0, 0, 264.5
            [Phenology].FlagLeafToFlowering.Target.FixedValue = 10
            [Phenology].FloweringToGrainFilling.Target.FixedValue = 170
            [Phenology].GrainFilling.Target.FixedValue = 550
            [Rachis].DMDemands.Structural.DMDemandFunction.MaximumOrganWt.FixedValue = 14
            [Grain].MaximumGrainsPerCob.FixedValue = 450
            [Grain].MaximumPotentialGrainSize.FixedValue = 0.375
          Memo
            The variety NSCM_41 is a Zimbabwean early maturing hybrid.  Photoperiod response is taken from Ellis et al Crop Sci 32:1225 for SR52.
        Cultivar NSCM_41: same as Replacements.Maize.CultivarFolder.sc401
        Cultivar Makueni
          Command:
            [Phenology].Juvenile.Target.FixedValue = 150
            [Phenology].Photosensitive.Target.XYPairs.X = 0, 12.5, 24
            [Phenology].Photosensitive.Target.XYPairs.Y = 0, 0, 115
            [Phenology].FlagLeafToFlowering.Target.FixedValue = 10
            [Phenology].FloweringToGrainFilling.Target.FixedValue = 120
            [Phenology].GrainFilling.Target.FixedValue = 530
            [Rachis].DMDemands.Structural.DMDemandFunction.MaximumOrganWt.FixedValue = 14
            [Grain].MaximumGrainsPerCob.FixedValue = 432
            [Grain].MaximumPotentialGrainSize.FixedValue = 0.375
          Memo
            The variety Makueni Composite is a kenyan variety with similar phenology but slightly higher cob size than Katumani composite.
        Cultivar Katumani
          Command:
            [Phenology].Juvenile.Target.FixedValue = 150
            [Phenology].Photosensitive.Target.XYPairs.X = 0, 12.5, 24
            [Phenology].Photosensitive.Target.XYPairs.Y = 0, 0, 115
            [Phenology].FlagLeafToFlowering.Target.FixedValue = 10
            [Phenology].FloweringToGrainFilling.Target.FixedValue = 120
            [Phenology].GrainFilling.Target.FixedValue = 530
            [Rachis].DMDemands.Structural.DMDemandFunction.MaximumOrganWt.FixedValue = 14
            [Grain].MaximumGrainsPerCob.FixedValue = 405
            [Grain].MaximumPotentialGrainSize.FixedValue = 0.375
          Memo
            The variety Katumani Composite B was formed in 1966 and released in 1968 as part of the maize breeding work undertaken at the Katumani Research Station in Kenya which started in 1956.  Katumani Composite B was an advanced generation of Katumani Synthetic V X Katumani Synthetic VI.  It has slight photoperiod sensitivity and relatively small potential cob size.
        Cultivar Pioneer_3153
        Cultivar Pioneer_39G12
          Command:
            [Phenology].Juvenile.Target.FixedValue = 180
            [Phenology].GrainFilling.Target.FixedValue = 500
            [Grain].MaximumGrainsPerCob.FixedValue = 550
            [Grain].NumberFunction.GrowthRateFactor.XYPairs.X = 0.2,2,4,10
            [Grain].NumberFunction.GrowthRateFactor.XYPairs.Y = 0,0.6,1,1
            [Grain].MaximumPotentialGrainSize.FixedValue = 0.25
        Folder Generic
          Cultivar B_80
            Command:
              [Phenology].Juvenile.Target.FixedValue = 135
              [Phenology].Photosensitive.Target.XYPairs.X = 0, 12.5, 24
              [Phenology].Photosensitive.Target.XYPairs.Y = 0, 0, 0
              [Phenology].FlagLeafToFlowering.Target.FixedValue = 1
              [Phenology].FloweringToGrainFilling.Target.FixedValue = 170
              [Phenology].GrainFilling.Target.FixedValue = 430
              [Phenology].Maturing.Target.FixedValue = 1
              [Phenology].MaturityToHarvestRipe.Target.FixedValue = 100
              [Rachis].DMDemands.Structural.DMDemandFunction.MaximumOrganWt.FixedValue = 36
          Cultivar B_90
            Command:
              [Phenology].Juvenile.Target.FixedValue = 155
              [Phenology].Photosensitive.Target.XYPairs.X = 0, 12.5, 24
              [Phenology].Photosensitive.Target.XYPairs.Y = 0, 0, 0
              [Phenology].FlagLeafToFlowering.Target.FixedValue = 1
              [Phenology].FloweringToGrainFilling.Target.FixedValue = 170
              [Phenology].GrainFilling.Target.FixedValue = 530
              [Phenology].Maturing.Target.FixedValue = 1
              [Phenology].MaturityToHarvestRipe.Target.FixedValue = 100
              [Rachis].DMDemands.Structural.DMDemandFunction.MaximumOrganWt.FixedValue = 36
          Cultivar B_95
            Command:
              [Phenology].Juvenile.Target.FixedValue = 170
              [Phenology].Photosensitive.Target.XYPairs.X = 0, 12.5, 24
              [Phenology].Photosensitive.Target.XYPairs.Y = 0, 0, 0
              [Phenology].FlagLeafToFlowering.Target.FixedValue = 1
              [Phenology].FloweringToGrainFilling.Target.FixedValue = 170
              [Phenology].GrainFilling.Target.FixedValue = 578
              [Phenology].Maturing.Target.FixedValue = 1
              [Phenology].MaturityToHarvestRipe.Target.FixedValue = 100
              [Rachis].DMDemands.Structural.DMDemandFunction.MaximumOrganWt.FixedValue = 36
          Cultivar B_100
            Command:
              [Phenology].Juvenile.Target.FixedValue = 185
              [Phenology].Photosensitive.Target.XYPairs.X = 0, 12.5, 24
              [Phenology].Photosensitive.Target.XYPairs.Y = 0, 0, 0
              [Phenology].FlagLeafToFlowering.Target.FixedValue = 1
              [Phenology].FloweringToGrainFilling.Target.FixedValue = 170
              [Phenology].GrainFilling.Target.FixedValue = 630
              [Phenology].Maturing.Target.FixedValue = 1
              [Phenology].MaturityToHarvestRipe.Target.FixedValue = 100
              [Rachis].DMDemands.Structural.DMDemandFunction.MaximumOrganWt.FixedValue = 36
          Cultivar B_103
            Command:
              [Phenology].Juvenile.Target.FixedValue = 188
              [Phenology].Photosensitive.Target.XYPairs.X = 0, 12.5, 24
              [Phenology].Photosensitive.Target.XYPairs.Y = 0, 0, 0
              [Phenology].FlagLeafToFlowering.Target.FixedValue = 1
              [Phenology].FloweringToGrainFilling.Target.FixedValue = 170
              [Phenology].GrainFilling.Target.FixedValue = 654
              [Phenology].Maturing.Target.FixedValue = 1
              [Phenology].MaturityToHarvestRipe.Target.FixedValue = 100
              [Rachis].DMDemands.Structural.DMDemandFunction.MaximumOrganWt.FixedValue = 36
          Cultivar B_105
            Command:
              [Phenology].Juvenile.Target.FixedValue = 192
              [Phenology].Photosensitive.Target.XYPairs.X = 0, 12.5, 24
              [Phenology].Photosensitive.Target.XYPairs.Y = 0, 0, 0
              [Phenology].FlagLeafToFlowering.Target.FixedValue = 1
              [Phenology].FloweringToGrainFilling.Target.FixedValue = 170
              [Phenology].GrainFilling.Target.FixedValue = 673
              [Phenology].Maturing.Target.FixedValue = 1
              [Phenology].MaturityToHarvestRipe.Target.FixedValue = 100
              [Rachis].DMDemands.Structural.DMDemandFunction.MaximumOrganWt.FixedValue = 36
          Cultivar B_108
            Command:
              [Phenology].Juvenile.Target.FixedValue = 199
              [Phenology].Photosensitive.Target.XYPairs.X = 0, 12.5, 24
              [Phenology].Photosensitive.Target.XYPairs.Y = 0, 0, 0
              [Phenology].FlagLeafToFlowering.Target.FixedValue = 1
              [Phenology].FloweringToGrainFilling.Target.FixedValue = 170
              [Phenology].GrainFilling.Target.FixedValue = 701
              [Phenology].Maturing.Target.FixedValue = 1
              [Phenology].MaturityToHarvestRipe.Target.FixedValue = 100
              [Rachis].DMDemands.Structural.DMDemandFunction.MaximumOrganWt.FixedValue = 36
          Cultivar B_110
            Command:
              [Phenology].Juvenile.Target.FixedValue = 210
              [Phenology].Photosensitive.Target.XYPairs.X = 0, 12.5, 24
              [Phenology].Photosensitive.Target.XYPairs.Y = 0, 0, 0
              [Phenology].FlagLeafToFlowering.Target.FixedValue = 1
              [Phenology].FloweringToGrainFilling.Target.FixedValue = 170
              [Phenology].GrainFilling.Target.FixedValue = 730
              [Phenology].Maturing.Target.FixedValue = 1
              [Phenology].MaturityToHarvestRipe.Target.FixedValue = 100
              [Rachis].DMDemands.Structural.DMDemandFunction.MaximumOrganWt.FixedValue = 36
          Cultivar B_112
            Command:
              [Phenology].Juvenile.Target.FixedValue = 208
              [Phenology].Photosensitive.Target.XYPairs.X = 0, 12.5, 24
              [Phenology].Photosensitive.Target.XYPairs.Y = 0, 0, 0
              [Phenology].FlagLeafToFlowering.Target.FixedValue = 1
              [Phenology].FloweringToGrainFilling.Target.FixedValue = 170
              [Phenology].GrainFilling.Target.FixedValue = 739
              [Phenology].Maturing.Target.FixedValue = 1
              [Phenology].MaturityToHarvestRipe.Target.FixedValue = 100
              [Rachis].DMDemands.Structural.DMDemandFunction.MaximumOrganWt.FixedValue = 36
          Cultivar B_115
            Command:
              [Phenology].Juvenile.Target.FixedValue = 215
              [Phenology].Photosensitive.Target.XYPairs.X = 0, 12.5, 24
              [Phenology].Photosensitive.Target.XYPairs.Y = 0, 0, 0
              [Phenology].FlagLeafToFlowering.Target.FixedValue = 1
              [Phenology].FloweringToGrainFilling.Target.FixedValue = 170
              [Phenology].GrainFilling.Target.FixedValue = 767
              [Phenology].Maturing.Target.FixedValue = 1
              [Phenology].MaturityToHarvestRipe.Target.FixedValue = 100
              [Rachis].DMDemands.Structural.DMDemandFunction.MaximumOrganWt.FixedValue = 36
          Cultivar B_120
            Command:
              [Phenology].Juvenile.Target.FixedValue = 220
              [Phenology].Photosensitive.Target.XYPairs.X = 0, 12.5, 24
              [Phenology].Photosensitive.Target.XYPairs.Y = 0, 0, 0
              [Phenology].FlagLeafToFlowering.Target.FixedValue = 1
              [Phenology].FloweringToGrainFilling.Target.FixedValue = 170
              [Phenology].GrainFilling.Target.FixedValue = 815
              [Phenology].Maturing.Target.FixedValue = 1
              [Phenology].MaturityToHarvestRipe.Target.FixedValue = 100
              [Rachis].DMDemands.Structural.DMDemandFunction.MaximumOrganWt.FixedValue = 36
          Cultivar B_130
            Command:
              [Phenology].Juvenile.Target.FixedValue = 250
              [Phenology].Photosensitive.Target.XYPairs.X = 0, 12.5, 24
              [Phenology].Photosensitive.Target.XYPairs.Y = 0, 0, 0
              [Phenology].FlagLeafToFlowering.Target.FixedValue = 1
              [Phenology].FloweringToGrainFilling.Target.FixedValue = 170
              [Phenology].GrainFilling.Target.FixedValue = 900
              [Phenology].Maturing.Target.FixedValue = 1
              [Phenology].MaturityToHarvestRipe.Target.FixedValue = 100
              [Rachis].DMDemands.Structural.DMDemandFunction.MaximumOrganWt.FixedValue = 36
          Cultivar A_80
            Command:
              [Phenology].Juvenile.Target.FixedValue = 140
              [Phenology].Photosensitive.Target.XYPairs.X = 0, 12.5, 24
              [Phenology].Photosensitive.Target.XYPairs.Y = 0, 0, 0
              [Phenology].FlagLeafToFlowering.Target.FixedValue = 1
              [Phenology].FloweringToGrainFilling.Target.FixedValue = 170
              [Phenology].GrainFilling.Target.FixedValue = 420
              [Phenology].Maturing.Target.FixedValue = 1
              [Phenology].MaturityToHarvestRipe.Target.FixedValue = 100
              [Rachis].DMDemands.Structural.DMDemandFunction.MaximumOrganWt.FixedValue = 36
          Cultivar A_90
            Command:
              [Phenology].Juvenile.Target.FixedValue = 170
              [Phenology].Photosensitive.Target.XYPairs.X = 0, 12.5, 24
              [Phenology].Photosensitive.Target.XYPairs.Y = 0, 0, 0
              [Phenology].FlagLeafToFlowering.Target.FixedValue = 1
              [Phenology].FloweringToGrainFilling.Target.FixedValue = 170
              [Phenology].GrainFilling.Target.FixedValue = 505
              [Phenology].Maturing.Target.FixedValue = 1
              [Phenology].MaturityToHarvestRipe.Target.FixedValue = 100
              [Rachis].DMDemands.Structural.DMDemandFunction.MaximumOrganWt.FixedValue = 36
          Cultivar A_95
            Command:
              [Phenology].Juvenile.Target.FixedValue = 181
              [Phenology].Photosensitive.Target.XYPairs.X = 0, 12.5, 24
              [Phenology].Photosensitive.Target.XYPairs.Y = 0, 0, 0
              [Phenology].FlagLeafToFlowering.Target.FixedValue = 1
              [Phenology].FloweringToGrainFilling.Target.FixedValue = 170
              [Phenology].GrainFilling.Target.FixedValue = 558
              [Phenology].Maturing.Target.FixedValue = 1
              [Phenology].MaturityToHarvestRipe.Target.FixedValue = 100
              [Rachis].DMDemands.Structural.DMDemandFunction.MaximumOrganWt.FixedValue = 36
          Cultivar A_100
            Command:
              [Phenology].Juvenile.Target.FixedValue = 190
              [Phenology].Photosensitive.Target.XYPairs.X = 0, 12.5, 24
              [Phenology].Photosensitive.Target.XYPairs.Y = 0, 0, 0
              [Phenology].FlagLeafToFlowering.Target.FixedValue = 1
              [Phenology].FloweringToGrainFilling.Target.FixedValue = 170
              [Phenology].GrainFilling.Target.FixedValue = 615
              [Phenology].Maturing.Target.FixedValue = 1
              [Phenology].MaturityToHarvestRipe.Target.FixedValue = 100
              [Rachis].DMDemands.Structural.DMDemandFunction.MaximumOrganWt.FixedValue = 36
          Cultivar A_103
            Command:
              [Phenology].Juvenile.Target.FixedValue = 204
              [Phenology].Photosensitive.Target.XYPairs.X = 0, 12.5, 24
              [Phenology].Photosensitive.Target.XYPairs.Y = 0, 0, 0
              [Phenology].FlagLeafToFlowering.Target.FixedValue = 1
              [Phenology].FloweringToGrainFilling.Target.FixedValue = 170
              [Phenology].GrainFilling.Target.FixedValue = 630
              [Phenology].Maturing.Target.FixedValue = 1
              [Phenology].MaturityToHarvestRipe.Target.FixedValue = 100
              [Rachis].DMDemands.Structural.DMDemandFunction.MaximumOrganWt.FixedValue = 36
          Cultivar A_105
            Command:
              [Phenology].Juvenile.Target.FixedValue = 209
              [Phenology].Photosensitive.Target.XYPairs.X = 0, 12.5, 24
              [Phenology].Photosensitive.Target.XYPairs.Y = 0, 0, 0
              [Phenology].FlagLeafToFlowering.Target.FixedValue = 1
              [Phenology].FloweringToGrainFilling.Target.FixedValue = 170
              [Phenology].GrainFilling.Target.FixedValue = 648
              [Phenology].Maturing.Target.FixedValue = 1
              [Phenology].MaturityToHarvestRipe.Target.FixedValue = 100
              [Rachis].DMDemands.Structural.DMDemandFunction.MaximumOrganWt.FixedValue = 36
          Cultivar A_108
            Command:
              [Phenology].Juvenile.Target.FixedValue = 218
              [Phenology].Photosensitive.Target.XYPairs.X = 0, 12.5, 24
              [Phenology].Photosensitive.Target.XYPairs.Y = 0, 0, 0
              [Phenology].FlagLeafToFlowering.Target.FixedValue = 1
              [Phenology].FloweringToGrainFilling.Target.FixedValue = 170
              [Phenology].GrainFilling.Target.FixedValue = 674
              [Phenology].Maturing.Target.FixedValue = 1
              [Phenology].MaturityToHarvestRipe.Target.FixedValue = 100
              [Rachis].DMDemands.Structural.DMDemandFunction.MaximumOrganWt.FixedValue = 36
          Cultivar A_110
            Command:
              [Phenology].Juvenile.Target.FixedValue = 230
              [Phenology].Photosensitive.Target.XYPairs.X = 0, 12.5, 24
              [Phenology].Photosensitive.Target.XYPairs.Y = 0, 0, 0
              [Phenology].FlagLeafToFlowering.Target.FixedValue = 1
              [Phenology].FloweringToGrainFilling.Target.FixedValue = 170
              [Phenology].GrainFilling.Target.FixedValue = 700
              [Phenology].Maturing.Target.FixedValue = 1
              [Phenology].MaturityToHarvestRipe.Target.FixedValue = 100
              [Rachis].DMDemands.Structural.DMDemandFunction.MaximumOrganWt.FixedValue = 36
          Cultivar A_112
            Command:
              [Phenology].Juvenile.Target.FixedValue = 229
              [Phenology].Photosensitive.Target.XYPairs.X = 0, 12.5, 24
              [Phenology].Photosensitive.Target.XYPairs.Y = 0, 0, 0
              [Phenology].FlagLeafToFlowering.Target.FixedValue = 1
              [Phenology].FloweringToGrainFilling.Target.FixedValue = 170
              [Phenology].GrainFilling.Target.FixedValue = 710
              [Phenology].Maturing.Target.FixedValue = 1
              [Phenology].MaturityToHarvestRipe.Target.FixedValue = 100
              [Rachis].DMDemands.Structural.DMDemandFunction.MaximumOrganWt.FixedValue = 36
          Cultivar A_115
            Command:
              [Phenology].Juvenile.Target.FixedValue = 238
              [Phenology].Photosensitive.Target.XYPairs.X = 0, 12.5, 24
              [Phenology].Photosensitive.Target.XYPairs.Y = 0, 0, 0
              [Phenology].FlagLeafToFlowering.Target.FixedValue = 1
              [Phenology].FloweringToGrainFilling.Target.FixedValue = 170
              [Phenology].GrainFilling.Target.FixedValue = 737
              [Phenology].Maturing.Target.FixedValue = 1
              [Phenology].MaturityToHarvestRipe.Target.FixedValue = 100
              [Rachis].DMDemands.Structural.DMDemandFunction.MaximumOrganWt.FixedValue = 36
          Cultivar A_120
            Command:
              [Phenology].Juvenile.Target.FixedValue = 250
              [Phenology].Photosensitive.Target.XYPairs.X = 0, 12.5, 24
              [Phenology].Photosensitive.Target.XYPairs.Y = 0, 0, 0
              [Phenology].FlagLeafToFlowering.Target.FixedValue = 1
              [Phenology].FloweringToGrainFilling.Target.FixedValue = 170
              [Phenology].GrainFilling.Target.FixedValue = 775
              [Phenology].Maturing.Target.FixedValue = 1
              [Phenology].MaturityToHarvestRipe.Target.FixedValue = 100
              [Rachis].DMDemands.Structural.DMDemandFunction.MaximumOrganWt.FixedValue = 36
          Cultivar A_130
            Command:
              [Phenology].Juvenile.Target.FixedValue = 285
              [Phenology].Photosensitive.Target.XYPairs.X = 0, 12.5, 24
              [Phenology].Photosensitive.Target.XYPairs.Y = 0, 0, 0
              [Phenology].FlagLeafToFlowering.Target.FixedValue = 1
              [Phenology].FloweringToGrainFilling.Target.FixedValue = 170
              [Phenology].GrainFilling.Target.FixedValue = 865
              [Phenology].Maturing.Target.FixedValue = 1
              [Phenology].MaturityToHarvestRipe.Target.FixedValue = 100
              [Rachis].DMDemands.Structural.DMDemandFunction.MaximumOrganWt.FixedValue = 36
          Cultivar HY_110
            Command:
              [Phenology].Juvenile.Target.FixedValue = 212
              [Phenology].Photosensitive.Target.XYPairs.X = 0, 12.5, 24
              [Phenology].Photosensitive.Target.XYPairs.Y = 0, 0, 0
              [Phenology].FlagLeafToFlowering.Target.FixedValue = 1
              [Phenology].FloweringToGrainFilling.Target.FixedValue = 170
              [Phenology].GrainFilling.Target.FixedValue = 775
              [Phenology].Maturing.Target.FixedValue = 1
              [Phenology].MaturityToHarvestRipe.Target.FixedValue = 100
              [Rachis].DMDemands.Structural.DMDemandFunction.MaximumOrganWt.FixedValue = 36
              [Leaf].Photosynthesis.RUE.FixedValue = 2.2
              [Grain].MaximumPotentialGrainSize.FixedValue = 0.36
              [Grain].MaximumGrainsPerCob.FixedValue = 850
          Cultivar LY_110
            Command:
              [Phenology].Juvenile.Target.FixedValue = 216
              [Phenology].Photosensitive.Target.XYPairs.X = 0, 12.5, 24
              [Phenology].Photosensitive.Target.XYPairs.Y = 0, 0, 0
              [Phenology].FlagLeafToFlowering.Target.FixedValue = 1
              [Phenology].FloweringToGrainFilling.Target.FixedValue = 170
              [Phenology].GrainFilling.Target.FixedValue = 705
              [Phenology].Maturing.Target.FixedValue = 1
              [Phenology].MaturityToHarvestRipe.Target.FixedValue = 100
              [Rachis].DMDemands.Structural.DMDemandFunction.MaximumOrganWt.FixedValue = 36
              [Leaf].Photosynthesis.RUE.FixedValue = 1.7
              [Grain].MaximumPotentialGrainSize.FixedValue = 0.25
              [Grain].MaximumGrainsPerCob.FixedValue = 550
          Cultivar P1197
            Command:
              [Phenology].Juvenile.Target.FixedValue = 270
              [Phenology].Photosensitive.Target.XYPairs.Y = 0,0,0
              [Phenology].FlagLeafToFlowering.Target.FixedValue = 1
              [Phenology].FloweringToGrainFilling.Target.FixedValue = 170
              [Phenology].GrainFilling.Target.FixedValue = 640
              [Phenology].Maturing.Target.FixedValue=50
              [Phenology].MaturityToHarvestRipe.Target.FixedValue=50
              [Maize].Grain.MaximumGrainsPerCob.FixedValue = 640
              [Maize].Grain.MaximumPotentialGrainSize.FixedValue = 0.32
              [Maize].Root.SpecificRootLength.FixedValue = 135
              [Maize].Root.RootFrontVelocity.PotentialRootFrontVelocity.PreFlowering.RootFrontVelocity.FixedValue=22
              [Grain].MaximumNConc.InitialPhase.InitialNconc.FixedValue=0.03
      OrganArbitrator Arbitrator
        BiomassTypeArbitrator DMArbitration
          Folder PotentialPartitioningMethods
            ReallocationMethod
            AllocateFixationMethod
            RetranslocationMethod
            SendPotentialDMAllocationsMethod
          Folder AllocationMethods
            NutrientConstrainedAllocationMethod
            DryMatterAllocationsMethod
          RelativeAllocation ArbitrationMethod
        BiomassTypeArbitrator NArbitration
          Folder PotentialPartitioningMethods
            ReallocationMethod
          Folder ActualPartitioningMethods
            AllocateFixationMethod
            RetranslocationMethod
          Folder AllocationMethods
            NitrogenAllocationsMethod
          RelativeAllocation ArbitrationMethod
          AllocateUptakesMethod
        WaterUptakeMethod
        NitrogenUptakeMethod
      Phenology
        MultiplyFunction ThermalTime
          SubDailyInterpolation BaseThermalTime: agregationMethod=0
            XYPairs Response: X=[0, 18, 26, 34, 44]; Y=[0, 10, 18, 26, 0]
            ThreeHourAirTemperature InterpolationMethod
        GerminatingPhase Germinating: Start=Sowing; End=Germination; IsEmerged=false
          Constant MinSoilTemperature: FixedValue=0
        EmergingPhase Emerging: Start=Germination; End=Emergence; IsEmerged=false; TTForTimeStep=0
          VariableReference ThermalTime: VariableName=[Phenology].ThermalTime
          AddFunction Target
            Constant ShootLag: FixedValue=55
            MultiplyFunction DepthxRate
              VariableReference SowingDepth: VariableName=[Plant].SowingData.Depth
              Constant ShootRate: FixedValue=0.6
        GenericPhase Juvenile: Start=Emergence; End=EndJuvenile; IsEmerged=true
          Constant Target: FixedValue=200; Units=deg day
          VariableReference Progression: VariableName=[Phenology].ThermalTime
        GenericPhase Photosensitive: Start=EndJuvenile; End=FloralInitiation; IsEmerged=true
          VariableReference Progression: VariableName=[Phenology].ThermalTime
          LinearInterpolationFunction Target
            Memo
              The photoperiod is likely to vary with individual maize cultivars.  Therefore, the response shown here is indicative only.  See the descriptions of individual cultivars for more detail on photoperiod responses used by the maize model.
            XYPairs: X=[0, 12.5, 24]; Y=[0, 0, 10]
            VariableReference XValue: VariableName=[Phenology].Photoperiod
        LeafAppearancePhase LeafAppearance: Start=FloralInitiation; End=FlagLeaf; IsEmerged=true
          VariableReference ThermalTime: VariableName=[Phenology].ThermalTime
          VariableReference FinalLeafNumber: VariableName=[Structure].FinalLeafNumber
          ExpressionFunction LeafNumber
            Expression=[Leaf].ExpandedCohortNo + [Leaf].NextExpandingLeafProportion
          VariableReference FullyExpandedLeafNo: VariableName=[Leaf].ExpandedCohortNo
          VariableReference InitialisedLeafNumber: VariableName=[Leaf].InitialisedCohortNo
        GenericPhase FlagLeafToFlowering: Start=FlagLeaf; End=Flowering; IsEmerged=true
          Constant Target: FixedValue=50; Units=deg day
          VariableReference Progression: VariableName=[Phenology].ThermalTime
        GenericPhase FloweringToGrainFilling: Start=Flowering; End=StartGrainFill; IsEmerged=true
          Constant Target: FixedValue=120; Units=deg day
          VariableReference Progression: VariableName=[Phenology].ThermalTime
        GenericPhase GrainFilling: Start=StartGrainFill; End=EndGrainFill; IsEmerged=true
          Constant Target: FixedValue=550; Units=deg day
          VariableReference Progression: VariableName=[Phenology].ThermalTime
        GenericPhase Maturing: Start=EndGrainFill; End=Maturity; IsEmerged=true
          Constant Target: FixedValue=10; Units=deg day
          VariableReference Progression: VariableName=[Phenology].ThermalTime
        GenericPhase MaturityToHarvestRipe: Start=Maturity; End=HarvestRipe; IsEmerged=true
          Constant Target: FixedValue=10; Units=deg day
          VariableReference Progression: VariableName=[Phenology].ThermalTime
        EndPhase ReadyForHarvesting: Start=HarvestRipe; End=Unused; IsEmerged=true
          VariableReference ThermalTime: VariableName=[Phenology].ThermalTime
        PhotoperiodFunction Photoperiod: Twilight=-6; DayLength=0
        OnEventFunction FloweringDAS: SetEvent=Flowering; ReSetEvent=never
          Memo
            A function is used to provide flowering date as days after sowing(DAS).
          Constant PreEventValue: FixedValue=0
          VariableReference PostEventValue: VariableName=[Plant].DaysAfterSowing
        OnEventFunction MaturityDAS: SetEvent=Maturity; ReSetEvent=never
          Memo
            A function is used to provide maturity date as days after sowing(DAS).
          Constant PreEventValue: FixedValue=0
          VariableReference PostEventValue: VariableName=[Plant].DaysAfterSowing
        OnEventFunction EmergenceDAS: SetEvent=Emergence; ReSetEvent=never
          Memo
            A function is used to provide maturity date as days after sowing(DAS).
          Constant PreEventValue: FixedValue=0
          VariableReference PostEventValue: VariableName=[Plant].DaysAfterSowing
        OnEventFunction HarvestDAS: SetEvent=HarvestRipe; ReSetEvent=never
          Memo
            A function is used to provide maturity date as days after sowing(DAS).
          Constant PreEventValue: FixedValue=0
          VariableReference PostEventValue: VariableName=[Plant].DaysAfterSowing
        BBCH
      Structure: CohortInitialisationStage=Germination; LeafInitialisationStage=Emergence
        Memo
          Though tillering is common in some maize varieties under certain agronomic conditions, no tillering is accounted for within this model.  Therefore all branching has been parameterised out of the current maize model.
        Constant StemSenescenceAge: FixedValue=0
        VariableReference ThermalTime: VariableName=[Phenology].ThermalTime
        PhaseLookup Phyllochron
          PhaseLookupValue Phyllochron: Start=Emergence; End=FlagLeaf
            LinearInterpolationFunction Phyllochron
              XYPairs: X=[1, 3.4, 4]; Y=[30, 30, 42]
              VariableReference XValue: VariableName=[Structure].LeafTipsAppeared
        HeightFunction HeightModel
          LinearInterpolationFunction PotentialHeight
            XYPairs: X=[3, 4, 5, 6]; Y=[20, 400, 450, 1700]
            VariableReference XValue: VariableName=[Phenology].Stage
          LinearInterpolationFunction WaterStress
            XYPairs: X=[0, 0.6]; Y=[0, 1]
            VariableReference XValue: VariableName=[Maize].Leaf.Fw
        Constant BranchingRate: FixedValue=0
        AddFunction BranchMortality
          Constant ShadeInducedBranchMortality: FixedValue=0
          Constant DroughtInducedBranchMortality: FixedValue=0
        Constant zFinalLeafNumber: FixedValue=15
        HoldFunction FinalLeafNumber: WhenToHold=FloralInitiation
          AddFunction ValueToHold
            Constant PrimordiaAtEmergence: FixedValue=6
            DivideFunction PrimordiaDuringJuvenilePhase
              AddFunction
                VariableReference JuvenilePhaseDuration: VariableName=[Phenology].Juvenile.Target
                VariableReference PhotoSensitivePhaseDuration: VariableName=[Phenology].Photosensitive.Target
              PhaseLookup MeanPlastochron
                PhaseLookupValue PreEmerg: Start=Germination; End=Emergence
                  Constant: FixedValue=15
                PhaseLookupValue PostEmerg: Start=Emergence; End=FlagLeaf
                  DivideFunction MeanPlastochron
                    AccumulateFunction AccumulatedPlastochron: StartStageName=Emergence; EndStageName=FloralInitiation; FractionRemovedOnCut=0; FractionRemovedOnHarvest=0; FractionRemovedOnGraze=0; FractionRemovedOnPrune=0
                      MultiplyFunction Plastochron
                        VariableReference Phyllochron: VariableName=[Structure].Phyllochron
                        Constant LeafTipsPerPrimordia: FixedValue=0.5
                    AccumulateFunction Days: StartStageName=Emergence; EndStageName=FloralInitiation; FractionRemovedOnCut=0; FractionRemovedOnHarvest=0; FractionRemovedOnGraze=0; FractionRemovedOnPrune=0
                      Constant: FixedValue=1
      ReproductiveOrgan Grain: GrowthRespiration=0; MaintenanceRespiration=0
        Biomass Live
        Biomass Dead
        Constant DMConversionEfficiency: FixedValue=1
        Constant RemobilisationCost: FixedValue=0
        Constant InitialGrainProportion: FixedValue=0.05
        Constant MaximumPotentialGrainSize: FixedValue=0.3; Units=g
        Constant MaximumGrainsPerCob: FixedValue=700; Units=number
        PhaseLookup DMDemandFunction
          PhaseLookupValue InitialPhase: Start=Flowering; End=StartGrainFill
            FillingRateFunction
              VariableReference NumberFunction: VariableName=[Grain].NumberFunction
              VariableReference FillingDuration: VariableName=[Phenology].FloweringToGrainFilling.Target
              VariableReference ThermalTime: VariableName=[Phenology].ThermalTime
              MultiplyFunction PotentialSizeIncrement
                VariableReference InitialProportion: VariableName=[Grain].InitialGrainProportion
                VariableReference MaximumSize: VariableName=[Grain].MaximumPotentialGrainSize
          PhaseLookupValue LinearPhase: Start=StartGrainFill; End=EndGrainFill
            FillingRateFunction
              VariableReference NumberFunction: VariableName=[Grain].NumberFunction
              VariableReference FillingDuration: VariableName=[Phenology].GrainFilling.Target
              VariableReference ThermalTime: VariableName=[Phenology].ThermalTime
              MultiplyFunction PotentialSizeIncrement
                SubtractFunction ProportionLinearPhase
                  Constant One: FixedValue=1
                  VariableReference InitialProportion: VariableName=[Grain].InitialGrainProportion
                VariableReference MaximumSize: VariableName=[Grain].MaximumPotentialGrainSize
        Constant MinimumNConc: FixedValue=0.008; Units=g/g
        PhaseLookup MaximumNConc
          PhaseLookupValue InitialPhase: Start=Flowering; End=StartGrainFill
            Constant InitialNconc: FixedValue=0.05
          PhaseLookupValue LinearPhase: Start=StartGrainFill; End=EndGrainFill
            Constant FinalNconc: FixedValue=0.013
        Constant WaterContent: FixedValue=0.12; Units=g/g
        PhaseLookup NFillingRate
          PhaseLookupValue GrainFilling: Start=Flowering; End=EndGrainFill
            FillingRateFunction
              VariableReference NumberFunction: VariableName=[Grain].NumberFunction
              AddFunction FillingDuration
                VariableReference FloweringToGrainFilling: VariableName=[Phenology].FloweringToGrainFilling.Target
                VariableReference GrainFilling: VariableName=[Phenology].GrainFilling.Target
              VariableReference ThermalTime: VariableName=[Phenology].ThermalTime
              MultiplyFunction PotentialSizeIncrement
                VariableReference MaximumFinalNConc: VariableName=[Grain].MaximumNConc.LinearPhase.FinalNconc
                VariableReference MaximumSize: VariableName=[Grain].MaximumPotentialGrainSize
        MultiplyFunction NumberFunction
          VariableReference PotentialGrainNumber: VariableName=[MaximumGrainsPerCob]
          LinearInterpolationFunction GrowthRateFactor
            XYPairs: X=[0.55, 3.3, 6.6, 10]; Y=[0, 0.6, 1, 1]
            VariableReference XValue: VariableName=[GrowthRateGrainDevelopment]
          VariableReference Population: VariableName=[Maize].Population
        ExpressionFunction YieldBuPerAcre: Expression=[Grain].Live.Wt * 10 * 56 * 0.4536 * 2.471
        AccumulateFunction GrowthGrainDevelopment: StartStageName=FlagLeaf; EndStageName=StartGrainFill; FractionRemovedOnCut=0; FractionRemovedOnHarvest=0; FractionRemovedOnGraze=0; FractionRemovedOnPrune=0
          VariableReference DailyBiomassProduction: VariableName=[Arbitrator].DM.TotalFixationSupply
        AccumulateFunction DaysGrainDevelopment: StartStageName=FlagLeaf; EndStageName=StartGrainFill; FractionRemovedOnCut=0; FractionRemovedOnHarvest=0; FractionRemovedOnGraze=0; FractionRemovedOnPrune=0
          Constant LenthOfADay: FixedValue=1; Units=days/day
        DivideFunction GrowthRateGrainDevelopment
          VariableReference AccumulatedGrowth: VariableName=[GrowthGrainDevelopment]
          VariableReference GrowthDuration: VariableName=[DaysGrainDevelopment]
          VariableReference Population: VariableName=[Maize].Population
        BiomassRemoval BiomassRemovalDefaults: HarvestFractionLiveToRemove=1; HarvestFractionDeadToRemove=0; HarvestFractionLiveToResidue=0; HarvestFractionDeadToResidue=0
        Constant CarbonConcentration: FixedValue=0.4
        NutrientPoolFunctions DMDemandPriorityFactors
          Constant Structural: FixedValue=1
          Constant Metabolic: FixedValue=1
          Constant Storage: FixedValue=1
        NutrientPoolFunctions NDemandPriorityFactors: same as Replacements.Maize.Grain.DMDemandPriorityFactors
      Root: GrowthRespiration=0; MaintenanceRespiration=0
        RootShapeCylinder RootShape
        LinearInterpolationFunction KLModifier
          Memo
            The parameter KL is is described by Meinke et al (1993) to combine elements of soil conductivity (K) with root length (L) in determining root water uptake.  Peake et al (2013) demonstrated that in maize KL varied with plant population through impacts on root length density.  Here we adjust KL linearly with plant population.
          XYPairs: X=[0, 10]; Y=[1, 1]
          VariableReference XValue: VariableName=[Maize].Population
        Constant DMConversionEfficiency: FixedValue=1
        Constant RemobilisationCost: FixedValue=0
        Constant SoilWaterEffect: FixedValue=1
          Memo
            No effect of soil water content on root growth is currently captured in the model.
        Constant MaxDailyNUptake: FixedValue=20; Units=g/m2/d
          Memo
            Maximum daily N uptake is set to an arbitrarily high value.
        Constant SenescenceRate: FixedValue=0.005; Units=/d
          Memo
            Jones and Kiniry (1986) used a constant root senescence fraction in the CERES-Maize model.
        Constant MaximumRootDepth: FixedValue=1000000
        Constant MaximumNConc: FixedValue=0.01; Units=g/g
        Constant MinimumNConc: FixedValue=0.01; Units=g/g
        MultiplyFunction RootFrontVelocity
          PhaseLookup PotentialRootFrontVelocity
            Memo
              [Hammer_etal_2009] used a constant extraction front velocity of 2.5cm per day in their analysis of historical maize yield trends in the US corn belt.
            PhaseLookupValue PreFlowering: Start=Germination; End=Flowering
              Constant RootFrontVelocity: FixedValue=25; Units=mm/d
            PhaseLookupValue PostFlowering: Start=Flowering; End=Maturity
              Constant RootFrontVelocity: FixedValue=0; Units=mm/d
          WeightedTemperatureFunction TemperatureFactor: MaximumTemperatureWeighting=0.5
            XYPairs: X=[0, 8, 15, 35, 50]; Y=[0, 0, 1, 1, 0]
          LinearInterpolationFunction WaterFactor
            SoilWaterScale: LLModel=1
            XYPairs: X=[0, 0.25, 1]; Y=[0, 1, 1]
            VariableReference XValue: VariableName=[SoilWaterScale]
          LinearInterpolationFunction AFPSFactor
            XYPairs: X=[0, 0.03, 1]; Y=[1, 1, 1]
            VariableReference XValue: VariableName=[Root].AirFilledPoreSpace
          Constant RootDepthStressFactor: FixedValue=1
        PhaseLookupValue NitrogenDemandSwitch: Start=Germination; End=Maturity
          Constant: FixedValue=1
        BiomassRemoval BiomassRemovalDefaults: HarvestFractionLiveToRemove=0; HarvestFractionDeadToRemove=0; HarvestFractionLiveToResidue=0.2; HarvestFractionDeadToResidue=0
        Constant SpecificRootLength: FixedValue=40; Units=m/g
        Constant KNO3: FixedValue=0.03
        Constant KNH4: FixedValue=0.02
        LinearInterpolationFunction NUptakeSWFactor
          XYPairs: X=[0, 1]; Y=[0, 1]
          VariableReference XValue: VariableName=[Root].RWC
        Constant MaintenanceRespirationFunction: FixedValue=0
        Constant CarbonConcentration: FixedValue=0.4
        NutrientDemandFunctions DMDemands
          MultiplyFunction Structural
            PartitionFractionDemandFunction DMDemandFunction
              LinearInterpolationFunction PartitionFraction
                XYPairs: X=[0, 2.99, 3, 6, 7]; Y=[0, 0, 0.2, 0.2, 0]
                VariableReference XValue: VariableName=[Phenology].Stage
            Constant StructuralFraction: FixedValue=1
          Constant Metabolic: FixedValue=0
          StorageDMDemandFunction Storage
            SubtractFunction StorageFraction
              Constant One: FixedValue=1
              VariableReference StructuralFraction: VariableName=[Root].DMDemands.Structural.StructuralFraction
          Constant QStructuralPriority: FixedValue=1
          Constant QMetabolicPriority: FixedValue=1
          Constant QStoragePriority: FixedValue=1
        NutrientDemandFunctions NDemands
          MultiplyFunction Structural
            VariableReference MinNconc: VariableName=[Root].minimumNconc
            VariableReference PotentialDMAllocation: VariableName=[Root].potentialDMAllocation.Structural
          MultiplyFunction Metabolic
            SubtractFunction MetabolicNconc
              VariableReference CritNconc: VariableName=[Root].criticalNConc
              VariableReference MinNconc: VariableName=[Root].minimumNconc
            VariableReference PotentialDMAllocation: VariableName=[Root].potentialDMAllocation.Structural
          StorageNDemandFunction Storage
            VariableReference NitrogenDemandSwitch: VariableName=[Root].nitrogenDemandSwitch
            VariableReference MaxNconc: VariableName=[Root].maximumNconc
          Constant QStructuralPriority: FixedValue=1
          Constant QMetabolicPriority: FixedValue=1
          Constant QStoragePriority: FixedValue=1
        VariableReference CriticalNConc: VariableName=[Root].MinimumNConc
        NutrientPoolFunctions InitialWt
          Constant Structural: FixedValue=0.2; Units=g/plant
          Constant Metabolic: FixedValue=0
          Constant Storage: FixedValue=0
      Leaf: MaxCover=1; Albedo=0.18; Gsmax350=0.009; R50=160; KDead=0.03; MaximumMainStemLeafNumber=30
        zero: CurrentExpandingLeaf, StartFractionExpanded, FractionNextleafExpanded, DeadNodesYesterday, GrowthRespiration, LAI, Depth, Width, PotentialEP, WaterDemand, TipsAtEmergence, CohortsAtInitialisation, FractionDied
        ExpressionFunction CO2internal: Expression=(163 - [IWeather].MeanT)/(5 - 0.1*[IWeather].MeanT)
        DivideFunction StomatalConductanceCO2Modifier
          VariableReference FCO2: VariableName=[Leaf].Photosynthesis.FCO2
          ExpressionFunction RelativeCO2Gradient
            Expression=([IWeather].CO2 - [Leaf].CO2internal)/(350 - [Leaf].CO2internal)
        LeafCohort InitialLeaves[1]: Rank=1; Area=380
          zero: NReallocationFactor, DMReallocationFactor, NRetranslocationFactor, DMRetranslocationFactor, ShadeInducedSenRate, SenescedFrac, DeltaPotentialArea, DeltaStressConstrainedArea, DeltaCarbonConstrainedArea, PotentialStructuralDMAllocation, PotentialMetabolicDMAllocation, MetabolicNReallocated, MetabolicWtReallocated, StorageNReallocated, StorageWtReallocated, MetabolicNRetranslocated, StorageNRetrasnlocated, DMRetranslocated, MetabolicNAllocation, StructuralDMAllocation, MetabolicDMAllocation
        LeafCohort InitialLeaves[2]: Rank=2
          zero: NReallocationFactor, DMReallocationFactor, NRetranslocationFactor, DMRetranslocationFactor, ShadeInducedSenRate, SenescedFrac, DeltaPotentialArea, DeltaStressConstrainedArea, DeltaCarbonConstrainedArea, PotentialStructuralDMAllocation, PotentialMetabolicDMAllocation, MetabolicNReallocated, MetabolicWtReallocated, StorageNReallocated, StorageWtReallocated, MetabolicNRetranslocated, StorageNRetrasnlocated, DMRetranslocated, MetabolicNAllocation, StructuralDMAllocation, MetabolicDMAllocation, Area
        LeafCohortParameters CohortParameters: ExpansionStressValue=0; CellDivisionStressValue=0; LagAccelerationValue=0; SenescenceAccelerationValue=0; ShadeInducedSenescenceRateValue=0; SenessingLeafRelativeSizeValue=0
          Constant DMReallocationFactor: FixedValue=1
          Constant RemobilisationCost: FixedValue=0
          Constant LeafSizeShapeParameter: FixedValue=0.01
          Constant MaintenanceRespirationFunction: FixedValue=0
          Constant SenessingLeafRelativeSize: FixedValue=1; Units=0-1
          BellCurveFunction MaxArea
            Memo
              Potential leaf area is calculated from leaf number using the approach of Keating and Wafula (1992).
              Individual leaf size is described using a bell-shaped curve, the parameters of which are derived from final leaf number.
            MultiplyFunction LargestLeafPosition
              VariableReference FinalLeafNumber: VariableName=[Structure].FinalLeafNumber
              Constant RelativePositionOfLargestLeaf: FixedValue=0.67
            LinearInterpolationFunction AreaMax
              XYPairs: X=[0, 2, 7, 12, 17, 22]; Y=[32530, 39259, 49659, 60000, 75000, 90000]
              VariableReference XValue: VariableName=[Structure].FinalLeafNumber
            LinearInterpolationFunction Breadth
              XYPairs: X=[5, 10, 15, 20, 25]; Y=[-0.377, -0.144, -0.059, -0.027, -0.016]
              VariableReference XValue: VariableName=[Structure].FinalLeafNumber
            Constant Skewness: FixedValue=0.00025
          Constant NReallocationFactor: FixedValue=1
          Constant NRetranslocationFactor: FixedValue=0
          Constant DMRetranslocationFactor: FixedValue=0.5
          LinearInterpolationFunction CellDivisionStress
            XYPairs: X=[0.9, 1]; Y=[1, 1]
            VariableReference XValue: VariableName=[Maize].Leaf.Fw
          MinimumFunction ExpansionStress
            LinearInterpolationFunction WaterStressEffect
              XYPairs: X=[0, 0.9, 1.3]; Y=[0, 1, 1]
              VariableReference XValue: VariableName=[Root].WaterTensionFactor
            LinearInterpolationFunction TemperatureEffect
              XYPairs: X=[0, 12, 14]; Y=[0, 1, 1]
              VariableReference XValue: VariableName=[IWeather].MeanT
            LinearInterpolationFunction NitrogenStressEffect
              XYPairs: X=[0, 0.5, 1]; Y=[0.1, 0.1, 1]
              VariableReference XValue: VariableName=[Maize].Leaf.Fn
          LinearInterpolationFunction GrowthDuration
            XYPairs: X=[0, 0.3, 0.5, 1]; Y=[1, 200, 250, 100]
            VariableReference XValue: VariableName=[Structure].RelativeNodeApperance
          LinearInterpolationFunction LagDuration
            XYPairs: X=[0, 0.5, 0.7, 0.8, 1]; Y=[300, 300, 700, 900, 1300]
            VariableReference XValue: VariableName=[Structure].RelativeNodeApperance
          LinearInterpolationFunction SenescenceDuration
            XYPairs: X=[0, 0.3, 0.5]; Y=[150, 150, 350]
            VariableReference XValue: VariableName=[Structure].RelativeNodeApperance
          Constant DetachmentLagDuration: FixedValue=1000000
          Constant DetachmentDuration: FixedValue=1000000
          AddFunction MaximumNConc
            VariableReference CriticalNConc: VariableName=[Leaf].CohortParameters.CriticalNConc
            MultiplyFunction StorageNConc
              LinearInterpolationFunction NonStructuralNConc
                XYPairs: X=[1, 10]; Y=[0.034, 0.01]
                VariableReference XValue: VariableName=[Structure].LeafTipsAppeared
              LinearInterpolationFunction WaterStressEffect
                XYPairs: X=[0.5, 0.95, 1]; Y=[0, 0, 1]
                VariableReference XValue: VariableName=[Root].WaterTensionFactor
          Constant CriticalNConc: FixedValue=0.01; Units=g/g
          Constant MinimumNConc: FixedValue=0.005; Units=g/g
          AddFunction LagAcceleration
            Constant One: FixedValue=1
            MultiplyFunction Stress
              Constant StressResponseCoefficient: FixedValue=2
              LinearInterpolationFunction StressFactor
                XYPairs: X=[0.5, 1]; Y=[1, 0]
                VariableReference XValue: VariableName=[Maize].Leaf.Fw
          AddFunction SenescenceAcceleration
            Constant One: FixedValue=1
            MultiplyFunction Stress
              Constant StressResponseCoefficient: FixedValue=0
              LinearInterpolationFunction StressFactor
                XYPairs: X=[0, 1]; Y=[1, 0]
                VariableReference XValue: VariableName=[Root].WaterTensionFactor
          LinearInterpolationFunction SpecificLeafAreaMax
            XYPairs: X=[1, 9]; Y=[30000, 20000]
            VariableReference XValue: VariableName=[Structure].LeafTipsAppeared
          LinearInterpolationFunction SpecificLeafAreaMin
            XYPairs: X=[1, 9]; Y=[25000, 15000]
            VariableReference XValue: VariableName=[Structure].LeafTipsAppeared
          Constant StructuralFraction: FixedValue=0.3
          Constant StorageFraction: FixedValue=0.1
          LinearInterpolationFunction ShadeInducedSenescenceRate
            XYPairs: X=[0, 0.7, 0.8, 0.96, 0.99]; Y=[0, 0, 0, 0, 0]
            VariableReference XValue: VariableName=[Leaf].CohortCurrentRankCoverAbove
          Constant InitialNConc: FixedValue=0; Units=g/g
          ArrayFunction LagDurationAgeMultiplier: Values=1 1 1
          ArrayFunction SenescenceDurationAgeMultiplier: Values=1 1 1
          ArrayFunction LeafSizeAgeMultiplier: Values=1 1 1 1 1 1 1 1 1 1 1 1
        RUEModel Photosynthesis
          Constant RUE: FixedValue=2
          WeightedTemperatureFunction FT: MaximumTemperatureWeighting=0.75
            XYPairs: X=[0, 8, 15, 35, 50]; Y=[0, 0, 1, 1, 0]
          LinearInterpolationFunction FVPD
            XYPairs: X=[0, 10, 50]; Y=[1, 1, 1]
            VariableReference XValue: VariableName=[Leaf].Photosynthesis.VPD
          LinearInterpolationFunction FN
            XYPairs: X=[0, 1]; Y=[0.3, 1]
            VariableReference XValue: VariableName=[Leaf].Fn
          LinearInterpolationFunction FW
            XYPairs: X=[0, 0.3]; Y=[0, 1]
            VariableReference XValue: VariableName=[Leaf].Fw
          RUECO2Function FCO2: PhotosyntheticPathway=C4
          VariableReference RadnInt: VariableName=[Leaf].RadiationIntercepted
        MultiplyFunction ExtinctionCoeff
          Memo
            Extinction coefficient is specified in terms of a potential extinction coefficient which is then discounted during periods of water stress to account for the impact of leaf curling.
          LinearInterpolationFunction PotentialExtinctionCoeff
            XYPairs: X=[0.2, 0.5, 1]; Y=[0.7, 0.5, 0.4]
            VariableReference XValue: VariableName=[Maize].SowingData.RowSpacing
          LinearInterpolationFunction WaterStressImpact
            XYPairs: X=[0, 0.7]; Y=[0.5, 1]
            VariableReference XValue: VariableName=[Maize].Leaf.Fw
        LinearInterpolationFunction FrostFraction
          XYPairs: X=[-2, 2]; Y=[1, 0]
          VariableReference XValue: VariableName=[Weather].MinT
        VariableReference ThermalTime: VariableName=[Phenology].ThermalTime
        Constant RemobilisationCost: FixedValue=0
        MinimumFunction FRGRFunction
          VariableReference FT: VariableName=[Leaf].Photosynthesis.FT
          VariableReference FN: VariableName=[Leaf].Photosynthesis.FN
          VariableReference FVPD: VariableName=[Leaf].Photosynthesis.FVPD
        Constant StructuralFraction: FixedValue=0.7
        Constant DMConversionEfficiency: FixedValue=1; Units=0-1
        BiomassRemoval BiomassRemovalDefaults: HarvestFractionLiveToRemove=0; HarvestFractionDeadToRemove=0; HarvestFractionLiveToResidue=0.3; HarvestFractionDeadToResidue=0
        Constant CarbonConcentration: FixedValue=0.4
        Constant WidthFunction: FixedValue=0
        VariableReference DepthFunction: VariableName=[Leaf].Height
        NutrientPoolFunctions DMDemandPriorityFactors: same as Replacements.Maize.Grain.DMDemandPriorityFactors
        NutrientPoolFunctions NDemandPriorityFactors: same as Replacements.Maize.Grain.DMDemandPriorityFactors
      GenericOrgan Husk: IsAboveGround=true
        Constant NReallocationFactor: FixedValue=0
        Constant RemobilisationCost: FixedValue=0
        Constant NRetranslocationFactor: FixedValue=0.1
        Constant MaximumNConc: FixedValue=0.007; Units=g/g
        Constant SenescenceRate: FixedValue=0; Units=/d
        Constant MinimumNConc: FixedValue=0.005; Units=g/g
        Constant DMRetranslocationFactor: FixedValue=0.1
        BiomassRemoval BiomassRemovalDefaults: HarvestFractionLiveToRemove=0.5; HarvestFractionDeadToRemove=0; HarvestFractionLiveToResidue=0.1; HarvestFractionDeadToResidue=0
        Constant DetachmentRateFunction: FixedValue=0; Units=/d
        Constant MaintenanceRespirationFunction: FixedValue=0; Units=0-1
        Constant DMConversionEfficiency: FixedValue=1; Units=0-1
        Constant DMReallocationFactor: FixedValue=0
        VariableReference CriticalNConc: VariableName=[Husk].MinimumNConc
        PhaseLookupValue NitrogenDemandSwitch: Start=Emergence; End=StartGrainFill
          Constant: FixedValue=1
        Constant CarbonConcentration: FixedValue=0.4
        NutrientDemandFunctions DMDemands
          MultiplyFunction Structural
            PopulationBasedDemandFunction DMDemandFunction
              VariableReference ThermalTime: VariableName=[Phenology].ThermalTime
              Constant StartStage: FixedValue=5.5
              Constant GrowthDuration: FixedValue=300
              Constant MaximumOrganWt: FixedValue=25
              VariableReference OrganPopulation: VariableName=[Rachis].CobNumber
              Constant SenescenceRate: FixedValue=0; Units=/d
              LinearInterpolationFunction ExpansionStress2
                XYPairs: X=[0, 0.35]; Y=[0, 1]
                VariableReference XValue: VariableName=[Maize].Leaf.Fw
              MinimumFunction ExpansionStress
                LinearInterpolationFunction WaterStressEffect
                  XYPairs: X=[0.1, 0.7, 1.3]; Y=[0, 1, 1]
                  VariableReference XValue: VariableName=[Root].WaterTensionFactor
                LinearInterpolationFunction TemperatureEffect
                  XYPairs: X=[0, 12, 14]; Y=[0, 1, 1]
                  VariableReference XValue: VariableName=[IWeather].MeanT
                LinearInterpolationFunction NitrogenStressEffect
                  XYPairs: X=[0, 0.5, 1]; Y=[0.1, 0.1, 1]
                  VariableReference XValue: VariableName=[Maize].Leaf.Fn
            PhaseLookup StructuralFraction
              PhaseLookupValue PreStemElongation: Start=Emergence; End=StartGrainFill
                Constant StemFraction: FixedValue=0.5
              PhaseLookupValue StemElongation: Start=StartGrainFill; End=HarvestRipe
                Constant StemFraction: FixedValue=1
          Constant Metabolic: FixedValue=0
          StorageDMDemandFunction Storage
            SubtractFunction StorageFraction
              Constant One: FixedValue=1
              VariableReference StructuralFraction: VariableName=[Husk].DMDemands.Structural.StructuralFraction
          Constant QStructuralPriority: FixedValue=1
          Constant QMetabolicPriority: FixedValue=1
          Constant QStoragePriority: FixedValue=1
        NutrientDemandFunctions NDemands
          MultiplyFunction Structural
            VariableReference MinNconc: VariableName=[Husk].minimumNconc
            VariableReference PotentialDMAllocation: VariableName=[Husk].potentialDMAllocation.Structural
          MultiplyFunction Metabolic
            SubtractFunction MetabolicNconc
              VariableReference CritNconc: VariableName=[Husk].criticalNConc
              VariableReference MinNconc: VariableName=[Husk].minimumNconc
            VariableReference PotentialDMAllocation: VariableName=[Husk].potentialDMAllocation.Structural
          StorageNDemandFunction Storage
            VariableReference NitrogenDemandSwitch: VariableName=[Husk].nitrogenDemandSwitch
            VariableReference MaxNconc: VariableName=[Husk].maximumNconc
          Constant QStructuralPriority: FixedValue=1
          Constant QMetabolicPriority: FixedValue=1
          Constant QStoragePriority: FixedValue=1
        RetranslocateNonStructural RetranslocateNitrogen
        NutrientPoolFunctions InitialWt
          Constant Structural: FixedValue=0; Units=g/m^2
          Constant Metabolic: FixedValue=0
          Constant Storage: FixedValue=0
        Constant Photosynthesis: FixedValue=0
        VariableReference initialNConcFunction: VariableName=[Husk].MinimumNConc
      GenericOrgan Rachis: IsAboveGround=true
        MultiplyFunction CobNumber
          VariableReference StemNumber: VariableName=[Structure].TotalStemPopn
          Constant CobsPerStem: FixedValue=1.1
        DivideFunction CobSize
          VariableReference CobMass: VariableName=[Rachis].Live.Wt
          VariableReference CobNumber: VariableName=[Rachis].CobNumber
        Constant NReallocationFactor: FixedValue=0
        Constant RemobilisationCost: FixedValue=0
        Constant NRetranslocationFactor: FixedValue=0.1
        Constant MaximumNConc: FixedValue=0.008; Units=g/g
        Constant SenescenceRate: FixedValue=0; Units=/d
        Constant MinimumNConc: FixedValue=0.003; Units=g/g
        LinearInterpolationFunction ExpansionStress
          XYPairs: X=[0.1, 0.7]; Y=[0, 1]
          VariableReference XValue: VariableName=[Maize].Leaf.Fw
        BiomassRemoval BiomassRemovalDefaults: HarvestFractionLiveToRemove=0.5; HarvestFractionDeadToRemove=0; HarvestFractionLiveToResidue=0.1; HarvestFractionDeadToResidue=0
        Constant DetachmentRateFunction: FixedValue=0; Units=/d
        Constant MaintenanceRespirationFunction: FixedValue=0; Units=0-1
        Constant DMConversionEfficiency: FixedValue=1; Units=0-1
        Constant DMReallocationFactor: FixedValue=0
        Constant DMRetranslocationFactor: FixedValue=0
        VariableReference CriticalNConc: VariableName=[Rachis].MinimumNConc
        PhaseLookupValue NitrogenDemandSwitch: Start=Emergence; End=StartGrainFill
          Constant: FixedValue=1
        Constant CarbonConcentration: FixedValue=0.4
        NutrientDemandFunctions DMDemands
          MultiplyFunction Structural
            PopulationBasedDemandFunction DMDemandFunction
              VariableReference ThermalTime: VariableName=[Phenology].ThermalTime
              Constant StartStage: FixedValue=5.5
              Constant GrowthDuration: FixedValue=300
              Constant MaximumOrganWt: FixedValue=23
              VariableReference OrganPopulation: VariableName=[Rachis].CobNumber
              MinimumFunction ExpansionStress: same as Replacements.Maize.Husk.DMDemands.Structural.DMDemandFunction.ExpansionStress
            Constant StructuralFraction: FixedValue=1; Units=g/g
          Constant Metabolic: FixedValue=0
          StorageDMDemandFunction Storage
            SubtractFunction StorageFraction
              Constant One: FixedValue=1
              VariableReference StructuralFraction: VariableName=[Rachis].DMDemands.Structural.StructuralFraction
          Constant QStructuralPriority: FixedValue=1
          Constant QMetabolicPriority: FixedValue=1
          Constant QStoragePriority: FixedValue=1
        NutrientDemandFunctions NDemands
          MultiplyFunction Structural
            VariableReference MinNconc: VariableName=[Rachis].minimumNconc
            VariableReference PotentialDMAllocation: VariableName=[Rachis].potentialDMAllocation.Structural
          MultiplyFunction Metabolic
            SubtractFunction MetabolicNconc
              VariableReference CritNconc: VariableName=[Rachis].criticalNConc
              VariableReference MinNconc: VariableName=[Rachis].minimumNconc
            VariableReference PotentialDMAllocation: VariableName=[Rachis].potentialDMAllocation.Structural
          StorageNDemandFunction Storage
            VariableReference NitrogenDemandSwitch: VariableName=[Rachis].nitrogenDemandSwitch
            VariableReference MaxNconc: VariableName=[Rachis].maximumNconc
          Constant QStructuralPriority: FixedValue=1
          Constant QMetabolicPriority: FixedValue=1
          Constant QStoragePriority: FixedValue=1
        RetranslocateNonStructural RetranslocateNitrogen
        NutrientPoolFunctions InitialWt: same as Replacements.Maize.Husk.InitialWt
        Constant Photosynthesis: FixedValue=0
        VariableReference initialNConcFunction: VariableName=[Rachis].MinimumNConc
      GenericOrgan Stem: IsAboveGround=true
        Constant RemobilisationCost: FixedValue=0
        LinearInterpolationFunction MaximumNConc
          XYPairs: X=[0, 0.7, 1]; Y=[0.025, 0.025, 0.005]
          VariableReference XValue: VariableName=[Structure].RelativeNodeApperance
        Constant MinimumNConc: FixedValue=0.004; Units=g/g
        PhaseLookupValue NitrogenDemandSwitch: Start=Emergence; End=StartGrainFill
          Constant: FixedValue=1
        Constant NReallocationFactor: FixedValue=0
        PhaseLookup NRetranslocationFactor
          PhaseLookupValue PreStemElongation: Start=Emergence; End=FlagLeaf
            Constant StemFraction: FixedValue=0
          PhaseLookupValue StemElongation: Start=FlagLeaf; End=HarvestRipe
            Constant NRetranslocationFactor: FixedValue=0.05
        Constant DMRetranslocationFactor: FixedValue=0.1
        BiomassRemoval BiomassRemovalDefaults: HarvestFractionLiveToRemove=0.5; HarvestFractionDeadToRemove=0; HarvestFractionLiveToResidue=0.1; HarvestFractionDeadToResidue=0
        Constant DetachmentRateFunction: FixedValue=0; Units=/d
        Constant SenescenceRate: FixedValue=0; Units=/d
        Constant MaintenanceRespirationFunction: FixedValue=0; Units=0-1
        Constant DMConversionEfficiency: FixedValue=1; Units=0-1
        Constant DMReallocationFactor: FixedValue=0
        AddFunction CriticalNConc
          VariableReference MinimumNConc: VariableName=[Stem].MinimumNConc
          MultiplyFunction MetabolicNConc
            SubtractFunction NonStructuralNConc
              VariableReference MaximumNConc: VariableName=[Stem].MaximumNConc
              VariableReference MinimumNConc: VariableName=[Stem].MinimumNConc
            Constant Proportion: FixedValue=0.2
        Constant CarbonConcentration: FixedValue=0.4
        NutrientDemandFunctions DMDemands
          MultiplyFunction Structural
            PartitionFractionDemandFunction DMDemandFunction
              LinearInterpolationFunction PartitionFraction
                XYPairs: X=[3, 5, 6, 7, 7.0001]; Y=[0.1, 0.1, 1, 1, 0]
                VariableReference XValue: VariableName=[Phenology].Stage
            PhaseLookup StructuralFraction: same as Replacements.Maize.Husk.DMDemands.Structural.StructuralFraction
          Constant Metabolic: FixedValue=0
          StorageDMDemandFunction Storage
            SubtractFunction StorageFraction
              Constant One: FixedValue=1
              VariableReference StructuralFraction: VariableName=[Stem].DMDemands.Structural.StructuralFraction
          Constant QStructuralPriority: FixedValue=1
          Constant QMetabolicPriority: FixedValue=1
          Constant QStoragePriority: FixedValue=1
        NutrientDemandFunctions NDemands
          MultiplyFunction Structural
            VariableReference MinNconc: VariableName=[Stem].minimumNconc
            VariableReference PotentialDMAllocation: VariableName=[Stem].potentialDMAllocation.Structural
          MultiplyFunction Metabolic
            SubtractFunction MetabolicNconc
              VariableReference CritNconc: VariableName=[Stem].criticalNConc
              VariableReference MinNconc: VariableName=[Stem].minimumNconc
            VariableReference PotentialDMAllocation: VariableName=[Stem].potentialDMAllocation.Structural
          StorageNDemandFunction Storage
            VariableReference NitrogenDemandSwitch: VariableName=[Stem].nitrogenDemandSwitch
            VariableReference MaxNconc: VariableName=[Stem].maximumNconc
          Constant QStructuralPriority: FixedValue=1
          Constant QMetabolicPriority: FixedValue=1
          Constant QStoragePriority: FixedValue=1
        RetranslocateNonStructural RetranslocateNitrogen
        NutrientPoolFunctions InitialWt: same as Replacements.Maize.Husk.InitialWt
        Constant Photosynthesis: FixedValue=0
        VariableReference initialNConcFunction: VariableName=[Stem].MinimumNConc
      CompositeBiomass AboveGround: OrganNames=[Leaf, Stem, Husk, Grain, Rachis]; IncludeLive=true; IncludeDead=true
        Memo
          The AboveGround composite biomass object includes all organs occurring above the soil surface to allow output for total dry matter and Nutrient contents, including total structural, non-structural and metabolic pools.
      CompositeBiomass BelowGround: OrganNames=[Root]; IncludeLive=true; IncludeDead=true
        Memo
          The BelowGround composite biomass object includes all root biomass pools to allow output for total dry matter and Nutrient contents, including total structural, non-structural and metabolic pools.
      CompositeBiomass Total: OrganNames=[Leaf, Stem, Husk, Grain, Rachis, Root]; IncludeLive=true; IncludeDead=true
        Memo
          The Total composite biomass object includes all organs (above+below ground) to allow output for total dry matter and Nutrient contents, including total structural, non-structural and metabolic pools.
      CompositeBiomass TotalLive: OrganNames=[Leaf, Stem, Husk, Grain, Rachis, Root]; IncludeLive=true; IncludeDead=false
        Memo
          The TotalLive composite biomass object includes the Live pools of all organs (above+below ground) to allow output for total dry matter and Nutrient contents, including total structural, non-structural and metabolic pools.
      CompositeBiomass TotalDead: OrganNames=[Leaf, Stem, Husk, Grain, Rachis, Root]; IncludeLive=false; IncludeDead=true
        Memo
          The TotalDead composite biomass object includes the Dead pools of all organs (above+below ground) to allow output for total dry matter and Nutrient contents, including total structural, non-structural and metabolic pools.
      CompositeBiomass EarLive: OrganNames=[Husk, Grain, Rachis]; IncludeLive=true; IncludeDead=false
        Memo
          The EarLive composite biomass object includes the Live pools of all organs within the Ear to allow output for total dry matter and Nutrient contents, including total structural, non-structural and metabolic pools.
      CompositeBiomass AboveGroundLive: OrganNames=[Leaf, Stem, Husk, Grain, Rachis]; IncludeLive=true; IncludeDead=false
        Memo
          The AboveGroundLive composite biomass object includes the Live pools of all organs occurring above the soil surface to allow output for total dry matter and Nutrient contents, including total structural, non-structural and metabolic pools.
      CompositeBiomass AboveGroundDead: OrganNames=[Leaf, Stem, Husk, Grain, Rachis]; IncludeLive=false; IncludeDead=true
        Memo
          The AboveGroundDead composite biomass object includes the Dead pools of all organs occurring above the soil surface to allow output for total dry matter and Nutrient contents, including total structural, non-structural and metabolic pools.
      Memo Future Development Needs
        #Future Development requirements

        * Phenology not responding to stress events.  Requires better data sets for quantifying the effects of water and nitrogen on leaf apperance and the timing of development stages.
        * Phosphorus response
        * Improved parameterisation of supply and demand for N and DM from organs and arbitration of these resources.
        * Heat Stress responses in grain number
        * More validation under a wider range of environments with more detailed datasets
        * Seedling mortality
        * Water demand (MicroClimate) needs validation
      CompositeBiomass Spike: OrganNames=[Husk, Rachis]; IncludeLive=true; IncludeDead=false
        Memo
          The SpikeLive composite biomass object includes the Live pools of then non-grain organs within the reproductive spike to allow output for total dry matter and Nutrient contents, including total structural, non-structural and metabolic pools.
      Constant MortalityRate: FixedValue=0
      Constant SeedMortalityRate: FixedValue=0
  Folder Oats (disabled)
    Simulation Oats_HNI2
      Clock: Start=2018-01-01; End=2018-12-31
      Summary
      Weather
        FileName=/home/juice/programming/research/Oats_and_Winter_wheat/Oats_Ma/qinghai.met
      SoilArbitrator
      MicroClimate: a_interception=0; b_interception=1; c_interception=0; d_interception=0; SoilHeatFluxFraction=0.4; MinimumHeightDiffForNewLayer=0; NightInterceptionFraction=0.5; ReferenceHeight=2
      Zone Field: Area=1; Slope=0; AspectAngle=0; Altitude=50
        Report Report_HNI2
          VariableNames:
            [Clock].Today
            [Oats].Phenology.Zadok.Stage
            [Oats].Phenology.CurrentStageName
            [Oats].AboveGround.Wt*10 as AGB
            [Oats].Grain.Total.Wt*10 as Yield
            [Oats].Grain.Size
            [Oats].Grain.Number
            [Oats].Grain.Total.Wt
            [Oats].Grain.Total.N
            [Oats].Total.Wt
            [Oats].AboveGround.N*10 as Nuptake
            AGB / (Nuptake +0.0001) as NUE
            [Weather].Rain
            sum of [Weather].Rain from [Oats].Sowing to [Oats].Harvesting as P
            sum of [Irrigation].IrrigationApplied from [Oats].Sowing to [Oats].Harvesting as I
            P + I  as WU
            AGB / (WU +0.0001) as WUE
          EventNames:
            [Clock].EndOfDay
        Fertiliser
        Soil: ASCOrder=NA; ASCSubOrder=NA; SoilType=Haplic Leptosols; Site=NA; NearestTown=NA; Region=NA; State=NA; Country=China; NaturalVegetation=NA; ApsoilNumber=9999; Latitude=36.375; Longitude=99.125; LocationAccuracy=+- 250 m; YearOfSampling=2019; DataSource=ISRIC SoilGrids
          Water: Thickness=[150, 150, 150, 150, 200, 200, 200, 200, 300, 300]; FilledFromTop=true
            InitialValues=[0.21, 0.205, 0.198, 0.193, 0.19, 0.19, 0.19, 0.19, 0.19, 0.19]
          Physical
            Thickness  ParticleSizeSand  ParticleSizeSilt  ParticleSizeClay  Rocks  BD     AirDry  LL15   DUL    SAT    KS
            150        45.7              39.5              15.3              0      0.891  0.07    0.21   0.436  0.588  59.311
            150        45                39                16.5              0      0.968  0.068   0.205  0.419  0.565  51.804
            150        45                39                17                0      1.079  0.066   0.198  0.394  0.532  48.885
            150        45                39                17                0      1.117  0.064   0.193  0.384  0.518  48.885
            200        45                39                16.8              0      1.143  0.063   0.19   0.379  0.51   50.323
            200        45                39                16.2              0      1.155  0.063   0.19   0.379  0.51   53.328
            200        45.1              38.9              16.1              0      1.162  0.063   0.19   0.379  0.509  54.264
            200        45.3              38.7              16.3              0      1.165  0.063   0.19   0.379  0.507  53.02
            300        45.6              38.5              16.6              0      1.168  0.063   0.19   0.379  0.505  51.505
            300        45.9              38.1              16.9              0      1.171  0.063   0.19   0.378  0.501  49.743
            Rocks source: Calculated
            SoilCrop RiceSoil
              LL=[0.21, 0.205, 0.199, 0.208, 0.228, 0.253, 0.278, 0.303, 0.335, 0.37]
              KL=[0.06, 0.06, 0.06, 0.055, 0.048, 0.04, 0.032, 0.024, 0.014, 0.003]
              XF=[1, 1, 1, 1, 1, 1, 1, 1, 1, 1]
            SoilCrop WheatSoil: same as Oats.Oats_HNI2.Field.Soil.Physical.RiceSoil
            SoilCrop TeffSoil: same as Oats.Oats_HNI2.Field.Soil.Physical.RiceSoil
            SoilCrop SugarcaneSoil
              LL=[0.21, 0.205, 0.198, 0.202, 0.212, 0.226, 0.241, 0.255, 0.273, 0.295]
              KL=[0.06, 0.06, 0.06, 0.057, 0.053, 0.048, 0.044, 0.039, 0.033, 0.027]
              XF=[1, 1, 1, 1, 1, 1, 1, 1, 1, 1]
            SoilCrop MaizeSoil: same as Oats.Oats_HNI2.Field.Soil.Physical.RiceSoil
            SoilCrop SoybeanSoil: same as Oats.Oats_HNI2.Field.Soil.Physical.RiceSoil
            SoilCrop OilPalmSoil: same as Oats.Oats_HNI2.Field.Soil.Physical.SugarcaneSoil
            SoilCrop CassavaSoil: same as Oats.Oats_HNI2.Field.Soil.Physical.RiceSoil
            SoilCrop PlantainForageSoil: same as Oats.Oats_HNI2.Field.Soil.Physical.SugarcaneSoil
            SoilCrop SunflowerSoil
              LL=[0.211, 0.221, 0.229, 0.24, 0.257, 0.279, 0.301, 0.323, 0.351, 0.376]
              KL=[0.1, 0.093, 0.084, 0.075, 0.065, 0.053, 0.041, 0.029, 0.015, 0.001]
              XF=[1, 1, 1, 1, 1, 1, 1, 1, 1, 1]
            SoilCrop CanolaSoil: same as Oats.Oats_HNI2.Field.Soil.Physical.RiceSoil
            SoilCrop SorghumSoil
              LL=[0.21, 0.205, 0.198, 0.204, 0.218, 0.237, 0.256, 0.275, 0.298, 0.327]
              KL=[0.07, 0.07, 0.07, 0.066, 0.06, 0.053, 0.045, 0.039, 0.03, 0.019]
              XF=[1, 1, 1, 1, 1, 1, 1, 1, 1, 1]
            SoilCrop MilletSoil: same as Oats.Oats_HNI2.Field.Soil.Physical.SorghumSoil
            SoilCrop PeanutSoil
              LL=[0.21, 0.205, 0.198, 0.193, 0.206, 0.237, 0.269, 0.3, 0.339, 0.376]
              KL=[0.06, 0.06, 0.06, 0.06, 0.055, 0.045, 0.035, 0.025, 0.012, 0.001]
              XF=[1, 1, 1, 1, 1, 1, 1, 1, 1, 1]
            SoilCrop BarleySoil
              LL=[0.21, 0.205, 0.198, 0.207, 0.223, 0.246, 0.268, 0.29, 0.318, 0.351]
              KL=[0.07, 0.07, 0.07, 0.065, 0.058, 0.049, 0.041, 0.033, 0.023, 0.01]
              XF=[1, 1, 1, 1, 1, 1, 1, 1, 1, 1]
            SoilCrop CottonSoil
              LL=[0.21, 0.205, 0.198, 0.193, 0.19, 0.2, 0.221, 0.242, 0.269, 0.3]
              KL=[0.1, 0.1, 0.1, 0.1, 0.1, 0.094, 0.083, 0.072, 0.058, 0.042]
              XF=[1, 1, 1, 1, 1, 1, 1, 1, 1, 1]
            SoilCrop OatsSoil: same as Oats.Oats_HNI2.Field.Soil.Physical.RiceSoil
            SoilCrop ChickpeaSoil
              LL=[0.21, 0.205, 0.198, 0.193, 0.205, 0.234, 0.263, 0.292, 0.328, 0.369]
              KL=[0.06, 0.06, 0.06, 0.06, 0.055, 0.046, 0.037, 0.028, 0.016, 0.003]
              XF=[1, 1, 1, 1, 1, 1, 1, 1, 1, 1]
            SoilCrop MungbeanSoil
              LL=[0.21, 0.205, 0.198, 0.199, 0.228, 0.266, 0.303, 0.341, 0.375, 0.378]
              KL=[0.06, 0.06, 0.06, 0.058, 0.048, 0.036, 0.024, 0.012, 0.001, 0]
              XF=[1, 1, 1, 1, 1, 1, 1, 1, 1, 0]
            SoilCrop Pigeon PeaSoil: same as Oats.Oats_HNI2.Field.Soil.Physical.PeanutSoil
            SoilCrop CowpeaSoil: same as Oats.Oats_HNI2.Field.Soil.Physical.RiceSoil
            SoilCrop FababeanSoil
              LL=[0.21, 0.205, 0.198, 0.193, 0.193, 0.217, 0.244, 0.271, 0.304, 0.345]
              KL=[0.08, 0.08, 0.08, 0.08, 0.079, 0.069, 0.057, 0.046, 0.031, 0.014]
              XF=[1, 1, 1, 1, 1, 1, 1, 1, 1, 1]
            SoilCrop LucerneSoil
              LL=[0.21, 0.205, 0.198, 0.193, 0.19, 0.19, 0.19, 0.192, 0.211, 0.237]
              KL=[0.1, 0.1, 0.1, 0.1, 0.1, 0.1, 0.1, 0.099, 0.089, 0.075]
              XF=[1, 1, 1, 1, 1, 1, 1, 1, 1, 1]
            SoilCrop LupinSoil: same as Oats.Oats_HNI2.Field.Soil.Physical.RiceSoil
            SoilCrop LentilSoil: same as Oats.Oats_HNI2.Field.Soil.Physical.RiceSoil
            SoilCrop TriticaleSoil
              LL=[0.21, 0.205, 0.211, 0.232, 0.259, 0.293, 0.327, 0.362, 0.379, 0.378]
              KL=[0.07, 0.07, 0.065, 0.056, 0.045, 0.032, 0.019, 0.006, 0, 0]
              XF=[1, 1, 1, 1, 1, 1, 1, 1, 0, 0]
            SoilCrop EucalyptusSoil
              LL=[0.21, 0.205, 0.198, 0.194, 0.193, 0.195, 0.197, 0.199, 0.201, 0.204]
              KL=[0.08, 0.08, 0.08, 0.079, 0.079, 0.078, 0.077, 0.076, 0.075, 0.074]
              XF=[1, 1, 1, 1, 1, 1, 1, 1, 1, 1]
            SoilCrop GliricidiaSoil
              LL=[0.21, 0.205, 0.198, 0.195, 0.196, 0.2, 0.204, 0.208, 0.213, 0.218]
              KL=[0.08, 0.08, 0.08, 0.079, 0.077, 0.076, 0.074, 0.072, 0.07, 0.068]
              XF=[1, 1, 1, 1, 1, 1, 1, 1, 1, 1]
            SoilCrop PinusSoil: same as Oats.Oats_HNI2.Field.Soil.Physical.EucalyptusSoil
            SoilCrop SCRUMSoil: same as Oats.Oats_HNI2.Field.Soil.Physical.RiceSoil
          WaterBalance SoilWater: SummerDate=1-may; SummerU=6; SummerCona=6; WinterDate=1-oct; WinterU=2; WinterCona=2; DiffusConst=43.92; DiffusSlope=19.65; Salb=0.13; CN2Bare=73; CNRed=20; CNCov=0; DischargeWidth=5; CatchmentArea=10; PSIDul=-100; Thickness=[150, 150, 150, 150, 200, 200, 200, 200, 300, 300]
            SWCON=[0.383, 0.383, 0.393, 0.396, 0.36, 0.364, 0.365, 0.363, 0.31, 0.308]
          Organic: FOMCNRatio=40; CarbonUnits=Total
            Thickness  Carbon  SoilCNRatio  FBiom  FInert  FOM
            150        5.403   13.1         0.04   0.614   0
            150        4.199   13.1         0.031  0.727   0
            150        3.252   13.1         0.014  0.842   0
            150        2.902   13.1         0.01   0.911   0
            200        2.697   13.1         0.01   0.958   0
            200        2.621   13.1         0.01   0.976   0
            200        2.534   13.1         0.01   0.99    0
            200        2.434   13.1         0.01   0.99    0
            300        2.31    13.1         0.01   0.99    0
            300        2.162   13.1         0.01   0.99    0
          Chemical: PHUnits=Water
            Thickness  PH    CEC
            150        8.03  19.30375
            150        8.1   16.86825
            150        8.1   14.871
            150        8.1   14.0835
            200        8.12  13.5689
            200        8.18  13.23765
            200        8.2   13.0219
            200        8.2   12.8637
            300        8.2   12.6849
            300        8.2   12.4521
            CEC source: Calculated
          Nutrient
          Solute NO3: Thickness=[150, 150, 150, 150, 200, 200, 200, 200, 300, 300]; InitialValues=[10, 0, 0, 0, 0, 0, 0, 0, 0, 0]; InitialValuesUnits=ppm; WaterTableConcentration=0; D0=0; DepthConstant=0; MaxDepthSoluteAccessible=0; RunoffEffectivenessAtMovingSolute=0; MaxEffectiveRunoff=0
          Solute NH4: Thickness=[150, 150, 150, 150, 200, 200, 200, 200, 300, 300]; InitialValues=[0, 0, 0, 0, 0, 0, 0, 0, 0, 0]; InitialValuesUnits=ppm; WaterTableConcentration=0; D0=0; DepthConstant=0; MaxDepthSoluteAccessible=0; RunoffEffectivenessAtMovingSolute=0; MaxEffectiveRunoff=0
          Solute Urea: Thickness=[150, 150, 150, 150, 200, 200, 200, 200, 300, 300]; InitialValues=[0, 0, 0, 0, 0, 0, 0, 0, 0, 0]; InitialValuesUnits=kg/ha; WaterTableConcentration=0; D0=0; DepthConstant=0; MaxDepthSoluteAccessible=0; RunoffEffectivenessAtMovingSolute=0; MaxEffectiveRunoff=0
          SoilTemperature Temperature
        SurfaceOrganicMatter: InitialResidueName=wheat_stubble; InitialResidueType=wheat; InitialResidueMass=500; InitialStandingFraction=0; InitialCPR=0; InitialCNR=100
        Operations
          2018-05-13  [oats].Sow(Qingyin2,180,30,10)
          2018-07-02  [Fertiliser].Apply(60,"UreaN", 10)
          2018-06-13  [irrigation].Apply(50,100)
          2018-07-05  [irrigation].Apply(50,100)
        Manager Fertilise at sowing
          Crop = [Oats]
          FertiliserType = UreaN
          Amount = 60
```csharp
using Models.Soils;
using System;
using System.Linq;
using Models.Core;
using Models.PMF;
namespace Models
{
    [Serializable]
    public class Script : Model
    {
        [Link] Clock Clock;
        [Link] Fertiliser Fertiliser;
        
        [Description("Crop to be fertilised")]
        public IPlant Crop { get; set; }

        [Description("Type of fertiliser to apply? ")] 
        [Display(Type = DisplayType.FertiliserType)]public string FertiliserType { get; set; }
    
        [Description("Amount of fertiliser to be applied (kg/ha)")]
        public double Amount { get; set; }
        
        [EventSubscribe("Sowing")]
        private void OnSowing(object sender, EventArgs e)
        {
            Model crop = sender as Model;
            if (Crop != null && crop.Name.ToLower() == (Crop as IModel).Name.ToLower())
                Fertiliser.Apply(amount: Amount, type: FertiliserType);
        }
    }
}
```
        Manager Harvest
          Crop = [Oats]
```csharp
using APSIM.Shared.Utilities;
using Models.Utilities;
using Models.Soils;
using Models.PMF;
using Models.Core;
using System;
using System.Linq;

namespace Models
{
    [Serializable] 
    public class Script : Model
    {
        [Description("Crop")]
        public IPlant Crop { get; set; }
        
        [EventSubscribe("DoManagement")]
        private void OnDoManagement(object sender, EventArgs e)
        {
            if (Crop.IsReadyForHarvesting)
            {
                Crop.Harvest();
                Crop.EndCrop();
            }
        }
    }
}
```
        Irrigation
        Plant Oats: PlantType=Wheat
          Memo Introduction
            _Allan Peake, Hamish Brown, Rob Zyskowski, Edmar I. Teixeira, Neil Huth_

            The APSIM oats model has been developed using the Plant Modelling Framework (PMF) of [brown_plant_2014]. This new framework provides a library of plant organ and process submodels that can be coupled, at runtime, to construct a model in much the same way that models can be coupled to construct a simulation. This means that dynamic composition of lower level process and organ classes (e.g. photosynthesis, leaf) into larger constructions (e.g. maize, wheat, sorghum) can be achieved by the model developer without additional coding.

            The oats model consists of:

            * a phenology model to simulate development through sequential growth phases
            * a structure model to simulate plant morphology
            * a collection of organs to simulate the various plant parts
            * an arbitrator to allocate resources (N, biomass) to the various plant organs

            This work builds upon an earlier APSIM Oats model that was constructed in 2007 and then published at the Australian Agronomy Conference in 2008 using data from Gatton, Tarlee and Pinery ([unkovich_development_2008]). However numerous changes have been made in the APSIM NextGen version, so simulations run under APSIM 7.10 and previous versions will give different predictions when run with APSIM NextGen.

            The Oats model is broadly based on APSIM Wheat models such as NWheat ([Asseng200225], [KeatingNWheat]), NWheatS ([Asseng1998163]), Cropmod-Wheat ([Wang2002GenericCropModel]), and the earlier versions developed within the Plant Modelling Framework ([brown_plant_2014]).
          OrganArbitrator Arbitrator: same as Replacements.Maize.Arbitrator
          Phenology
            Memo
              Oat crops exhibit a range of developmental responses to environment and these are strongly influences by genotype characteristics.
              Temperature effects development increasing development rates and decreasing phase durations as temperatures increase.  These effects are captured by thermal time.  However, Oat crops also exhibit vernalisation and photoperiod sensitivities in their Vegetative phase and further photoperiod sensitivity in the EarlyReproductive phase.  Photoperiod responses are seen as a reduction in the length of a phase for a photoperiod sensitive genotype in response to a longer photoperiod.  Vernalisation responses are more complicated as they are driven by temperature but interact with photoperiod.  For vernalisation sensitive varieties (Winter types) exposure to cool temperatures or short photoperiods during the Vegetative phase will reduce the thermal time duration of the vegetative phase.

              As used in the APSIM wheat model, we draw on the Kirby Framework to capture these vernalisation and photoperiod responses.  This framework assumes that the timing of anthesis is a result of the timing of flag leaf and an additional thermal time passage from there to anthesis.  It also assumes the timing of flag leaf is a result of the Final Leaf Number which sets a target, and leaf appearance rate, which sets the rate of progress toward this target.  Leaf appearance rate is a function of Thermal time and a genotype specific Phyllochron which changes with Haun stage as described by [Jamieson_LeafAppearance_1995].

              Final Leaf Number (FLN) is modelled as the sum of three numbers:

              FLN = MinLeafNumber + VernalLeaves + PhotoLeaves

              Where MinLeafNumber is the number of leaves that a wheat crop will produce when vernalisation is satisified early in the crops duration (before 2nd true leaf) and it is grown in a long photoperiod.  VernalLeaves are the number of leaves that are added due to vernalisation effects.  For insensitive varieties this will always be zero but this is potentially a larger number for sensitivie varieties and the number progresively decreases as the crop encounters more vernalisation.  PhotoLeaves are the number of leaves that are added to the minimum leaf number as a result of short day exposure.  For insensitive varieties this will be zero but is potential larger for more sensitivie varieties and decreases as day length increases.  More detailed explinations of the components of phenology are provided below.
            DivideFunction MeanTemp
              AddFunction TempSum
                VariableReference MaxT: VariableName=[Weather].MaxT
                VariableReference MinT: VariableName=[Weather].MinT
              Constant Two: FixedValue=2
            SubDailyInterpolation ThermalTime: agregationMethod=0
              XYPairs Response: X=[0, 30, 40]; Y=[0, 30, 0]
              Memo
                Thermal time determines the rate of developmental progress through many of the crops phases and is used by organs to determing potential growth rates.
              ThreeHourAirTemperature InterpolationMethod
            MultiplyFunction DailyVernalisation
              Memo
                Vernalisation responses are based on those described by [Brown_Anthesis_2013].   Vernalisation is assumed to be related to the expression of the Vrn1 Gene.  Its experssion is accumulated daily and daily upregulation as a function of development (DeltaHaunStage) and a TempResponseProfile that declines exponentially from a maximum at 1^o^C to zero at 0^o^C and at 20^o^C.
              VariableReference DeltaHaunStage: VariableName=[Structure].DeltaHaunStage
              SubDailyInterpolation TempResponseProfile: agregationMethod=0
                XYPairs Response
                  X=[0, 1, 2, 3, 4, 5, 6, 7, 8, 9, 10, 11, 12, 13, 14, 15, 16, 17, 18, 19, 20, 30, 32]
                  Y=[0, 1.205, 1.037, 0.893, 0.768, 0.661, 0.569, 0.49, 0.422, 0.363, 0.312, 0.269, 0.231, 0.199, 0.171, 0.148, 0.127, 0.109, 0.094, 0.081, 0, 0, -0.5]
                ThreeHourAirTemperature InterpolationMethod
            PhotoperiodFunction Photoperiod: Twilight=-6; DayLength=0
            PhaseLookup PerceivedPhotoPeriod
              PhaseLookupValue ApexBelowGround: Start=Germination; End=Emergence
                Constant Photoperiod: FixedValue=0; Units=h
              PhaseLookupValue ApexAboveGround: Start=Emergence; End=HarvestRipe
                VariableReference Photoperiod: VariableName=[Phenology].Photoperiod
            MinimumFunction Vrn1
              Memo
                Vrn1 accumulation begins when Vrn4 experssion is down-regulated to zero and stops, assuming vernalisation saturation, at a value of 1
              Constant Saturation: FixedValue=1; Units=Relative Experssion
              AccumulateFunction CurrentExpression: StartStageName=Germination; EndStageName=TerminalSpikelet; FractionRemovedOnCut=0; FractionRemovedOnHarvest=0; FractionRemovedOnGraze=0; FractionRemovedOnPrune=0
                LessThanFunction Vernalisation
                  VariableReference If_Vrn4: VariableName=[Phenology].Vrn4
                  VariableReference IsLessThanLag: VariableName=[Phenology].VernLag
                  Constant Return_Zero: FixedValue=0
                  VariableReference elseReturn_Vernalisation: VariableName=[Phenology].DailyVernalisation
            MinimumFunction Vrn4
              VariableReference MaxExpression: VariableName=[Phenology].VernLag
              AccumulateFunction CurrentExpression: StartStageName=Germination; EndStageName=TerminalSpikelet; FractionRemovedOnCut=0; FractionRemovedOnHarvest=0; FractionRemovedOnGraze=0; FractionRemovedOnPrune=0
                VariableReference VernalisationConditioning: VariableName=[Phenology].DailyVernalisation
            Constant MinimumLeafNumber: FixedValue=7; Units=Leaves
              Memo
                Number of leaves the plant will produce when fully vernalised early and grown in long photoperiod
            Constant VrnSensitivity: FixedValue=0; Units=Leaves
              Memo
                The difference between Inherent earlyness leaf number and the number of leaves produced when the plant is unvernalised and grown in long photoperiod
            Constant VernLag: FixedValue=1; Units=Unitless
              Memo
                The amount of vernalising temperature required before vernalisation response will be evident.  Value of relative to the amount offl vernalisation temperature required from the end of the lag until vernalisation saturation.  A value of 0 means there is no lag, a value of 1 means the lag is the same (in vernal time) as the vernalisation requirement and a value of 2 means the lag is twice as long as the vernalisation response phase
            Constant PpSensitivity: FixedValue=3; Units=Leaves
              Memo
                The reduction in leaf number going from 8 to 16 h Pp
            Constant EarlyReproductivePpSensitivity: FixedValue=3
              Memo
                The phyllochrons duration for the plant to go from flag leaf ligual appearance at 16 h Pp compared to the phyllochron duration for the same phase at 8 h Pp.
            Constant EarlyReproductiveLongDayBase: FixedValue=3
              Memo
                The phyllochrons duration for the plant to go from flag leaf ligual appearance at 16 h Pp.
            GerminatingPhase Germinating: Start=Sowing; End=Germination; IsEmerged=false
              Constant MinSoilTemperature: FixedValue=0
            EmergingPhase Emerging: Start=Germination; End=Emergence; IsEmerged=false; TTForTimeStep=0
              VariableReference ThermalTime: VariableName=[Phenology].ThermalTime
              AddFunction Target
                Constant ShootLag: FixedValue=40
                MultiplyFunction DepthxRate
                  VariableReference SowingDepth: VariableName=[Plant].SowingData.Depth
                  Constant ShootRate: FixedValue=4
            GenericPhase Vegetative: Start=Emergence; End=TerminalSpikelet; IsEmerged=true
              Memo
                The duration of the vegetative phase is set by a target Haun Stage for the occurence of Terminal Spikelet and the rate of leaf appearance.
              VariableReference Progression: VariableName=[Phenology].ThermalTime
              MultiplyFunction Target
                VariableReference Phyllochron: VariableName=[Structure].MeanPhyllochron
                VariableReference HSTS: VariableName=[Structure].HaunStageTerminalSpikelet
              Memo Memo1
                HaunStageTerminalSpiklet decreases as vernalisation is accumulated and as photoperiod extends, capturing the effect of these responses on the duration of the Vegetative phase
            LeafAppearancePhase StemElongation: Start=TerminalSpikelet; End=FlagLeaf; IsEmerged=true
              Memo
                The Final leaf number is fixed at Terminal Spikelet and leaves contune to appear at a rate set by thermal time and phyllochron until flag leaf liguale appears and this phase is completed.
              VariableReference ThermalTime: VariableName=[Phenology].ThermalTime
              VariableReference FinalLeafNumber: VariableName=[Structure].FinalLeafNumber
              ExpressionFunction LeafNumber
                Expression=[Leaf].ExpandedCohortNo + [Leaf].NextExpandingLeafProportion
              VariableReference FullyExpandedLeafNo: VariableName=[Leaf].ExpandedCohortNo
              VariableReference InitialisedLeafNumber: VariableName=[Leaf].InitialisedCohortNo
            GenericPhase EarlyReproductive: Start=FlagLeaf; End=Flowering; IsEmerged=true
              VariableReference Progression: VariableName=[Phenology].ThermalTime
              MultiplyFunction Target
                VariableReference Phyllochron: VariableName=[Structure].Phyllochron.BasePhyllochron
                AddFunction Phyllochrons
                  VariableReference LongDayBase: VariableName=[Phenology].EarlyReproductiveLongDayBase
                  MultiplyFunction IncreaseDueToShortPhotoPeriod
                    LinearInterpolationFunction PhotoPeriodResponse
                      XYPairs: X=[11, 16]; Y=[1, 0]
                      VariableReference XValue: VariableName=[Phenology].Photoperiod
                    VariableReference PpSensitivity: VariableName=[Phenology].EarlyReproductivePpSensitivity
            GenericPhase GrainDevelopment: Start=Flowering; End=StartGrainFill; IsEmerged=true
              Constant Target: FixedValue=20
              VariableReference Progression: VariableName=[Phenology].ThermalTime
            GenericPhase GrainFilling: Start=StartGrainFill; End=EndGrainFill; IsEmerged=true
              Constant Target: FixedValue=650
              VariableReference Progression: VariableName=[Phenology].ThermalTime
            GenericPhase Maturing: Start=EndGrainFill; End=Maturity; IsEmerged=true
              Constant Target: FixedValue=30
              VariableReference Progression: VariableName=[Phenology].ThermalTime
            GenericPhase Ripening: Start=Maturity; End=HarvestRipe; IsEmerged=true
              Constant Target: FixedValue=100
              VariableReference Progression: VariableName=[Phenology].ThermalTime
            EndPhase ReadyForHarvesting: Start=HarvestRipe; End=Unused; IsEmerged=true
              VariableReference ThermalTime: VariableName=[Phenology].ThermalTime
            ZadokPMF Zadok
            OnEventFunction FlagLeafDAS: SetEvent=FlagLeaf; ReSetEvent=never
              Memo
                A function is used to provide the date of flag leaf (fully emerged) as days after sowing(DAS).
              Constant PreEventValue: FixedValue=0
              VariableReference PostEventValue: VariableName=[Plant].DaysAfterSowing
            OnEventFunction FloweringDAS: same as Replacements.Maize.Phenology.FloweringDAS
            OnEventFunction MaturityDAS: same as Replacements.Maize.Phenology.MaturityDAS
          Structure: CohortInitialisationStage=Germination; LeafInitialisationStage=Emergence
            VariableReference ThermalTime: VariableName=[Phenology].ThermalTime
            MultiplyFunction Phyllochron
              Memo Rational
                This is the thermal time between the emergence of leaf tips.  The model used here is based on [Jamieson_SIRIUS_1998] where leaf appearace could be described by a base phyllochron determined between leaves 2 and 7 and a phyllochron that was 70% of base phyllochron for leaves < 2 and 130% of base phyllochron for leaves > 7
              LinearInterpolationFunction LeafStageFactor
                XYPairs: X=[0, 2, 3, 6, 8, 11, 12]; Y=[0.75, 0.75, 1, 1, 1.4, 1.4, 1.4]
                  Memo
                    Changing 4th line from 7:1 to 6:1.
                    Leaf appearance rate calibrated using data from Gatton 2007 for Taipan and Coolibah
                VariableReference XValue: VariableName=[Leaf].AppearedCohortNo
              Constant BasePhyllochron: FixedValue=90; Units=oC.d
              LinearInterpolationFunction PhotoPeriodEffect
                XYPairs: X=[8, 12, 14]; Y=[1.6, 1, 1]
                VariableReference XValue: VariableName=[Phenology].Photoperiod
            MultiplyFunction BranchingRate
              Memo
                Potential branching rate is determined by the commonly observed pattern of tillering in wheat, in which each tiller emerges with the third leaf on its parent axis (e.g. first tiller emerges at the same time as the third leaf on the main stem, the first secondary tiller appears with the third leaf on tiller 1).  This is described as a simple function of main stem leaf number. This function is varied occasionally between Oat cultivars due to the wide range of plant habits.
              PhaseLookup PotentialBranchingRate
                PhaseLookupValue Vegetative: Start=Emergence; End=TerminalSpikelet
                  LinearInterpolationFunction PotentialBranchingRate
                    XYPairs: X=[1, 2, 3, 4, 5, 6, 7, 8]; Y=[0, 0, 1, 2, 4, 7, 12, 20]
                    VariableReference XValue: VariableName=[Structure].LeafTipsAppeared
                PhaseLookupValue Reproductive: Start=TerminalSpikelet; End=HarvestRipe
                  Constant Zero: FixedValue=0
              MinimumFunction StressFactors
                LinearInterpolationFunction NitrogenEffect
                  Memo
                    Inadequate Nitrogen supply is assumed to affect tillering prior to any effect on photosynthesis or leaf size.
                  XYPairs: X=[0.5, 1]; Y=[0, 1]
                  VariableReference XValue: VariableName=[Arbitrator].FN
                LinearInterpolationFunction CoverEffect
                  Memo
                    Tillering is said to cease once a threshold fraction of incoming radiation has been achieved.  This captures shading effects on tillering described by [evers2006cessation].
                  XYPairs: X=[0, 0.1, 0.5]; Y=[1, 1, 0]
                  VariableReference XValue: VariableName=[Leaf].CoverTotal
                LinearInterpolationFunction WaterStressEffect
                  XYPairs: X=[0, 1]; Y=[0, 1]
                  VariableReference XValue: VariableName=[Root].WaterTensionFactor
            PhaseLookup BranchMortality
              PhaseLookupValue MortalityPhase: Start=TerminalSpikelet; End=Flowering
                MultiplyFunction Mortality
                  LinearInterpolationFunction MortalityPerDegDay
                    XYPairs: X=[0, 0.005]; Y=[0.002, 0]
                    VariableReference XValue: VariableName=[Structure].MeanTillerGrowthRate
                  VariableReference ThermalTime: VariableName=[Phenology].ThermalTime
            HeightFunction HeightModel
              LinearInterpolationFunction PotentialHeight
                XYPairs: X=[3, 3.8, 5, 6]; Y=[20, 300, 1100, 1200]
                VariableReference XValue: VariableName=[Phenology].Stage
              LinearInterpolationFunction WaterStress
                XYPairs: X=[0.3, 1]; Y=[0, 1]
                VariableReference XValue: VariableName=[Oats].Leaf.Fw
            MovingAverageFunction MeanTillerGrowthRate: NumberOfDays=5; StageToStartMovingAverage=Emergence
              Memo
                This is calculated to represent the supply of asslimilate to individual tillers over the past 5 days to use as an index to determine tiller mortality.  When tiller numbers are high or total crop assimilate supply is small there will not be enough assimilate to maintain all of the tillers so the model will senesce some.
              DivideFunction TillerGrowthRate
                VariableReference DailyGrowth: VariableName=[Arbitrator].DM.TotalFixationSupply
                VariableReference ThermalTime: VariableName=[Phenology].ThermalTime
                VariableReference StemPopulation: VariableName=[Structure].TotalStemPopn
            MovingAverageFunction MeanPhyllochron: NumberOfDays=300; StageToStartMovingAverage=Emergence
              VariableReference Phyllochron: VariableName=[Structure].Phyllochron
            HoldFunction FinalLeafNumber: WhenToHold=TerminalSpikelet
              AddFunction FinalNodeNumber
                VariableReference MinLeafNumber: VariableName=[Phenology].MinimumLeafNumber
                MultiplyFunction VernalLeaves
                  VariableReference UnVernalisedLeaves: VariableName=[Phenology].VrnSensitivity
                  SubtractFunction VernalisationReductionFactor
                    Constant One: FixedValue=1
                    VariableReference RelativeVrn1Expression: VariableName=[Phenology].Vrn1
                MultiplyFunction PhotoPLeaves
                  VariableReference ShortPpLeaves: VariableName=[Phenology].PpSensitivity
                  LinearInterpolationFunction PhotoPeriodReductionFactor
                    XYPairs: X=[10, 16]; Y=[1, 0]
                    VariableReference XValue: VariableName=[Phenology].Photoperiod
            ExpressionFunction HaunStageTerminalSpikelet: Expression=([Structure].FinalLeafNumber - 2.85)/1.1
              Memo
                The Haun stage at which Terminal Spikelet occurs is determined from final leaf number using the approach described in [Brown_Anthesis_2013].
            AddFunction HaunStage
              VariableReference AppearedLeaves: VariableName=[Leaf].ExpandedCohortNo
              VariableReference ProportionOfExpandingLeaf: VariableName=[Leaf].NextExpandingLeafProportion
            Constant StemSenescenceAge: FixedValue=0
          ReproductiveOrgan Grain: GrowthRespiration=0; MaintenanceRespiration=0; RipeStage=Ripe
            Biomass Live
            Biomass Dead
            Memo
              As with Barley, Oats grain is typically harvested by farmers still in its husk (i.e. the palea and lemma remain attached to the kernel/caryopsis), while the kernel proper is typically smaller than a wheat grain grown under similar conditions. For simplicity (and in the absence of an extensive grain-oats data set) the Oats model uses the same grain size model as wheat, with the assumption that the weight of the oats kernel includes the weight of the husk (which is not included within kernel weight in the wheat model).

              Grain number prediction is also derived directly from the wheat model, estimated as a constant number of grains (default=26) per unit of stem+spike dry matter at anthesis. This approach has known limitations and investigation is underway to improve this function in the future.
            HoldFunction NumberFunction: WhenToHold=Flowering
              MultiplyFunction GrainNumber
                Constant GrainsPerGramOfStem: FixedValue=26; Units=grains
                VariableReference StemMass: VariableName=[StemPlusPanicle].Wt
            Constant InitialGrainProportion: FixedValue=0.05
              Constant InitialGrainProportion: FixedValue=0.05
            Constant MaximumPotentialGrainSize: FixedValue=0.032; Units=g
            PhaseLookup DMDemandFunction
              PhaseLookupValue InitialPhase: Start=Flowering; End=StartGrainFill
                FillingRateFunction
                  VariableReference NumberFunction: VariableName=[Grain].NumberFunction
                  VariableReference FillingDuration: VariableName=[Phenology].GrainDevelopment.Target
                  VariableReference ThermalTime: VariableName=[Phenology].ThermalTime
                  MultiplyFunction PotentialSizeIncrement
                    VariableReference InitialProportion: VariableName=[Grain].InitialGrainProportion
                    VariableReference MaximumSize: VariableName=[Grain].MaximumPotentialGrainSize
              PhaseLookupValue LinearPhase: same as Replacements.Maize.Grain.DMDemandFunction.LinearPhase
            Constant MinimumNConc: FixedValue=0.0123
            Constant MaxNConcDailyGrowth: FixedValue=0.03
            Constant MaximumNConc: FixedValue=0.03
            PhaseLookup NFillingRate
              PhaseLookupValue GrainFilling: Start=FlagLeaf; End=EndGrainFill
                FillingRateFunction
                  VariableReference NumberFunction: VariableName=[Grain].NumberFunction
                  AddFunction FillingDuration
                    VariableReference FloweringToGrainFilling: VariableName=[Phenology].GrainDevelopment.Target
                    VariableReference GrainFilling: VariableName=[Phenology].GrainFilling.Target
                  VariableReference ThermalTime: VariableName=[Phenology].ThermalTime
                  MultiplyFunction PotentialSizeIncrement
                    VariableReference MaximumSize: VariableName=[Grain].MaximumPotentialGrainSize
                    VariableReference MaximumNConc: VariableName=[Grain].MaximumNConc
            Constant WaterContent: FixedValue=0.12
            AccumulateFunction AccumThermalTime: StartStageName=FlagLeaf; EndStageName=Maturity; FractionRemovedOnCut=0; FractionRemovedOnHarvest=0; FractionRemovedOnGraze=0; FractionRemovedOnPrune=0
              VariableReference DailyThermalTimeValue: VariableName=[Phenology].ThermalTime
            ExpressionFunction Protein
              Expression=([Grain].Live.N + [Grain].Dead.N)/([Grain].Live.Wt + [Grain].Dead.Wt) * 100 * 5.71
            BiomassRemoval BiomassRemovalDefaults: HarvestFractionLiveToRemove=1; HarvestFractionDeadToRemove=1; HarvestFractionLiveToResidue=0; HarvestFractionDeadToResidue=0
            Constant DMConversionEfficiency: FixedValue=1
            Constant RemobilisationCost: FixedValue=0
            Constant CarbonConcentration: FixedValue=0.4
            NutrientPoolFunctions DMDemandPriorityFactors: same as Replacements.Maize.Grain.DMDemandPriorityFactors
            NutrientPoolFunctions NDemandPriorityFactors: same as Replacements.Maize.Grain.DMDemandPriorityFactors
          Leaf: MaxCover=1; Albedo=0.25; Gsmax350=0.011; R50=150; KDead=0.1; MaximumMainStemLeafNumber=30
            zero: CurrentExpandingLeaf, StartFractionExpanded, FractionNextleafExpanded, DeadNodesYesterday, GrowthRespiration, LAI, Depth, Width, PotentialEP, WaterDemand, TipsAtEmergence, CohortsAtInitialisation, FractionDied
            ExpressionFunction CO2internal: Expression=(163 - [IWeather].MeanT)/(5 - 0.1*[IWeather].MeanT)
            DivideFunction StomatalConductanceCO2Modifier: same as Replacements.Maize.Leaf.StomatalConductanceCO2Modifier
            LeafCohort InitialLeaves[1]: Rank=1; Area=60
              zero: NReallocationFactor, DMReallocationFactor, NRetranslocationFactor, DMRetranslocationFactor, ShadeInducedSenRate, SenescedFrac, DeltaPotentialArea, DeltaStressConstrainedArea, DeltaCarbonConstrainedArea, PotentialStructuralDMAllocation, PotentialMetabolicDMAllocation, MetabolicNReallocated, MetabolicWtReallocated, StorageNReallocated, StorageWtReallocated, MetabolicNRetranslocated, StorageNRetrasnlocated, DMRetranslocated, MetabolicNAllocation, StructuralDMAllocation, MetabolicDMAllocation
            LeafCohort InitialLeaves[2]: same as Replacements.Maize.Leaf.InitialLeaves[2]
            LeafCohortParameters CohortParameters: ExpansionStressValue=0; CellDivisionStressValue=0; LagAccelerationValue=0; SenescenceAccelerationValue=0; ShadeInducedSenescenceRateValue=0; SenessingLeafRelativeSizeValue=0
              Constant NReallocationFactor: FixedValue=1
              Constant MaintenanceRespirationFunction: FixedValue=0
              Constant NRetranslocationFactor: FixedValue=0.03
              Constant DMReallocationFactor: FixedValue=1
              Constant DMRetranslocationFactor: FixedValue=0.8
              MinimumFunction CellDivisionStress
                LinearInterpolationFunction WaterStressFactor
                  XYPairs: X=[0.5, 1]; Y=[0.1, 1]
                  VariableReference XValue: VariableName=[Oats].Leaf.Fw
                LinearInterpolationFunction NitrogenStressFactor
                  XYPairs: X=[0, 0.5, 1]; Y=[0.1, 0.1, 1]
                  VariableReference XValue: VariableName=[Oats].Leaf.Fn
              MinimumFunction ExpansionStress
                LinearInterpolationFunction WaterStress
                  XYPairs: X=[0.1, 1, 1.3]; Y=[0, 1, 1]
                  VariableReference XValue: VariableName=[Root].WaterTensionFactor
                LinearInterpolationFunction TemperatureEffect
                  XYPairs: X=[0, 12, 14]; Y=[0, 1, 1]
                  VariableReference XValue: VariableName=[Phenology].MeanTemp
                LinearInterpolationFunction NitrogenStressFactor
                  XYPairs: X=[0, 0.5, 1]; Y=[0.1, 0.1, 1]
                  VariableReference XValue: VariableName=[Oats].Leaf.Fn
              MultiplyFunction MaxArea
                Constant AreaLargestLeaves: FixedValue=4000; Units=mm^2
                  Memo
                    Default as per NZ Lincoln data set. Amended between varieties due to large variation in Oats plant type.
                LinearInterpolationFunction AgeFactor
                  XYPairs: X=[3, 3.45, 4]; Y=[0.1, 0.5, 1]
                  VariableReference XValue: VariableName=[Phenology].Stage
              MultiplyFunction GrowthDuration
                Constant Multiplier: FixedValue=1.75
                VariableReference Phyllochron: VariableName=[Structure].Phyllochron
                LinearInterpolationFunction AgeFactor
                  XYPairs: X=[3, 4, 5]; Y=[1, 1, 1]
                  VariableReference XValue: VariableName=[Phenology].Stage
              MultiplyFunction LagDuration
                LinearInterpolationFunction AgeFactor
                  XYPairs: X=[3, 4, 5]; Y=[0.4, 1, 1]
                  VariableReference XValue: VariableName=[Phenology].Stage
                SubtractFunction LastLeafDuration
                  AddFunction ThermalTimeToRipe
                    VariableReference EarlyReproductive: VariableName=[Phenology].EarlyReproductive.Target
                    VariableReference GrainDevelopment: VariableName=[Phenology].GrainDevelopment.Target
                    VariableReference GrainFilling: VariableName=[Phenology].GrainFilling.Target
                    VariableReference Maturing: VariableName=[Phenology].Maturing.Target
                    VariableReference Ripening: VariableName=[Phenology].Ripening.Target
                  VariableReference SenescenceDuration: VariableName=[Leaf].CohortParameters.SenescenceDuration
              MultiplyFunction SenescenceDuration
                Constant Multiplier: FixedValue=6
                VariableReference Phyllochron: VariableName=[Structure].Phyllochron
              Constant DetachmentLagDuration: FixedValue=1000000
              Constant DetachmentDuration: FixedValue=1000000
              Constant RelativeBranchLeafSize: FixedValue=1
              LinearInterpolationFunction MaximumNConc
                XYPairs: X=[3, 4, 6]; Y=[0.08, 0.05, 0.02]
                VariableReference XValue: VariableName=[Phenology].Stage
              MultiplyFunction CriticalNConc
                LinearInterpolationFunction CriticalNConcAt350ppm
                  XYPairs: X=[3, 4, 6]; Y=[0.07, 0.04, 0.015]
                  VariableReference XValue: VariableName=[Phenology].Stage
                LinearInterpolationFunction CO2Factor
                  XYPairs: X=[350, 700]; Y=[1, 0.93]
                  VariableReference XValue: VariableName=[Weather].CO2
              LinearInterpolationFunction MinimumNConc
                XYPairs: X=[3, 4, 6]; Y=[0.01, 0.005, 0.005]
                VariableReference XValue: VariableName=[Phenology].Stage
              AddFunction LagAcceleration
                Constant One: FixedValue=1
                MultiplyFunction Stress
                  Constant StressResponseCoefficient: FixedValue=1
                  LinearInterpolationFunction StressFactor
                    XYPairs: X=[0, 0.5]; Y=[0.5, 0]
                    VariableReference XValue: VariableName=[Oats].Leaf.Fw
              AddFunction SenescenceAcceleration: same as Oats.Oats_HNI2.Field.Oats.Leaf.CohortParameters.LagAcceleration
              LinearInterpolationFunction SpecificLeafAreaMax
                XYPairs: X=[2, 3, 4]; Y=[25000, 30000, 40000]
                Memo
                  Initial SLA is determined as the average of max and min SLA
                VariableReference XValue: VariableName=[Phenology].Stage
              LinearInterpolationFunction SpecificLeafAreaMin
                XYPairs: X=[0.4, 1]; Y=[10000, 18000]
                VariableReference XValue: VariableName=[Leaf].Fn
              Constant InitialNConc: FixedValue=0
              Constant StructuralFraction: FixedValue=0.3
              Constant StorageFraction: FixedValue=0
              Constant LeafSizeShapeParameter: FixedValue=0.3
              Constant SenessingLeafRelativeSize: FixedValue=1; Units=0-1
              MultiplyFunction ShadeInducedSenescenceRate
                LinearInterpolationFunction CoverEffect
                  XYPairs: X=[0, 0.9, 0.95, 1]; Y=[0, 0, 0.01, 0.03]
                  VariableReference XValue: VariableName=[Leaf].CohortCurrentRankCoverAbove
                VariableReference ThermalTime: VariableName=[Phenology].ThermalTime
              ArrayFunction LagDurationAgeMultiplier: Values=1 1 1
              ArrayFunction SenescenceDurationAgeMultiplier: Values=1 1 1
              ArrayFunction LeafSizeAgeMultiplier: Values=1 1 1 1 1 1 1 1 1 1 1 1
              Constant RemobilisationCost: FixedValue=0
              Constant CarbonConcentration: FixedValue=0.4
            RUEModel Photosynthesis
              Constant RUE: FixedValue=1.6
                Memo
                  WHOLE PLANT RUE = bigger than RUE calculated using above ground biomass.
                  1.35 measured for Oats at Gatton 2007 (Above ground biomass only) so assume 20% more for root biomass.
              WeightedTemperatureFunction FT: MaximumTemperatureWeighting=0.75
                XYPairs: X=[0, 15, 25, 35]; Y=[0, 1, 1, 0]
              LinearInterpolationFunction FN
                XYPairs: X=[0, 1, 1.5]; Y=[0, 1, 1]
                VariableReference XValue: VariableName=[Leaf].Fn
              LinearInterpolationFunction FW
                XYPairs: X=[0, 0.5, 1]; Y=[0, 1, 1]
                VariableReference XValue: VariableName=[Leaf].Fw
              LinearInterpolationFunction FVPD
                XYPairs: X=[0, 10, 40]; Y=[1, 1, 0]
                VariableReference XValue: VariableName=[Photosynthesis].VPD
              RUECO2Function FCO2: PhotosyntheticPathway=C3
              VariableReference RadnInt: VariableName=[Leaf].RadiationIntercepted
            Constant FrostFraction: FixedValue=0
            VariableReference ThermalTime: VariableName=[Phenology].ThermalTime
            MinimumFunction FRGRFunction
              VariableReference RUE_FT: VariableName=[Leaf].Photosynthesis.FT
              MinimumFunction Others
                VariableReference RUE_FN: VariableName=[Leaf].Photosynthesis.FN
                VariableReference RUE_FVPD: VariableName=[Leaf].Photosynthesis.FVPD
            BiomassRemoval BiomassRemovalDefaults: HarvestFractionLiveToRemove=0; HarvestFractionDeadToRemove=0; HarvestFractionLiveToResidue=0.8; HarvestFractionDeadToResidue=0.8
            Constant ExtinctionCoeff: FixedValue=0.45
              Memo
                Using extinction coefficient as per measured at Gatton in 2007 (0.45).
            Constant StructuralFraction: FixedValue=0.5
            Constant DMConversionEfficiency: FixedValue=1
            Constant RemobilisationCost: FixedValue=0
            Constant CarbonConcentration: FixedValue=0.4
            Constant WidthFunction: FixedValue=0
            VariableReference DepthFunction: VariableName=[Leaf].Height
            NutrientPoolFunctions DMDemandPriorityFactors: same as Replacements.Maize.Grain.DMDemandPriorityFactors
            NutrientPoolFunctions NDemandPriorityFactors: same as Replacements.Maize.Grain.DMDemandPriorityFactors
          GenericOrgan Stem: IsAboveGround=true
            MultiplyFunction SenescenceRate
              LinearInterpolationFunction SenescenceRate
                XYPairs: X=[3, 7, 8, 9]; Y=[0, 0, 0.2, 0.5]
                VariableReference XValue: VariableName=[Phenology].Stage
            LinearInterpolationFunction MaximumNConc
              XYPairs: X=[3, 4, 4.5, 6]; Y=[0.05, 0.04, 0.015, 0.012]
              VariableReference XValue: VariableName=[Phenology].Stage
            Constant MinimumNConc: FixedValue=0.0018
            PhaseLookupValue NitrogenDemandSwitch: Start=Emergence; End=StartGrainFill
              Constant: FixedValue=1
            Constant NReallocationFactor: FixedValue=0
            PhaseLookup NRetranslocationFactor
              PhaseLookupValue VegetativeGrowth: Start=Sowing; End=Flowering
                Constant Fraction: FixedValue=0
              PhaseLookupValue ReproductiveGrowth: Start=Flowering; End=HarvestRipe
                Constant Fraction: FixedValue=0.5
            PhaseLookup DMRetranslocationFactor
              PhaseLookupValue VegetativeGrowth: Start=Emergence; End=StartGrainFill
                Constant DMRetranslocationFactor: FixedValue=0
              PhaseLookupValue ReproductiveGrowth: Start=StartGrainFill; End=EndGrainFill
                Constant DMRetranslocationFactor: FixedValue=0
            BiomassRemoval BiomassRemovalDefaults: HarvestFractionLiveToRemove=0; HarvestFractionDeadToRemove=0; HarvestFractionLiveToResidue=0.6; HarvestFractionDeadToResidue=0.6
            DivideFunction PercentWSC
              VariableReference WSC: VariableName=[Stem].Live.StorageWt
              VariableReference StemWt: VariableName=[Stem].Live.Wt
            Constant DetachmentRateFunction: FixedValue=0; Units=/d
            Constant MaintenanceRespirationFunction: FixedValue=0; Units=0-1
            Constant DMConversionEfficiency: FixedValue=1; Units=0-1
            Constant DMReallocationFactor: FixedValue=0
            VariableReference CriticalNConc: VariableName=[Stem].MinimumNConc
            Constant RemobilisationCost: FixedValue=0
            Constant CarbonConcentration: FixedValue=0.4
            NutrientDemandFunctions DMDemands
              MultiplyFunction Structural
                PartitionFractionDemandFunction DMDemandFunction
                  PhaseLookup PartitionFraction
                    PhaseLookupValue PreStemElongation: Start=Emergence; End=TerminalSpikelet
                      Constant StemFraction: FixedValue=0.4
                    PhaseLookupValue StemElongation: Start=TerminalSpikelet; End=FlagLeaf
                      Constant StemFraction: FixedValue=0.7
                    PhaseLookupValue EarEmergence: Start=FlagLeaf; End=Flowering
                      Constant StemFraction: FixedValue=0.7
                PhaseLookup StructuralFraction
                  PhaseLookupValue VegetativeGrowth: Start=Sowing; End=Flowering
                    Constant Fraction: FixedValue=0.7
                  PhaseLookupValue ReproductiveGrowth: Start=Flowering; End=HarvestRipe
                    Constant Fraction: FixedValue=0.5
              Constant Metabolic: FixedValue=0
              StorageDMDemandFunction Storage: same as Replacements.Maize.Stem.DMDemands.Storage
              Constant QStructuralPriority: FixedValue=1
              Constant QMetabolicPriority: FixedValue=1
              Constant QStoragePriority: FixedValue=1
            NutrientDemandFunctions NDemands: same as Replacements.Maize.Stem.NDemands
            RetranslocateNonStructural RetranslocateNitrogen
            NutrientPoolFunctions InitialWt: same as Replacements.Maize.Husk.InitialWt
            Constant Photosynthesis: FixedValue=0
            VariableReference initialNConcFunction: VariableName=[Stem].MinimumNConc
          Root: GrowthRespiration=0; MaintenanceRespiration=0
            RootShapeCylinder RootShape
            Constant KLModifier: FixedValue=1
            Constant SoilWaterEffect: FixedValue=1
            Constant MaxDailyNUptake: FixedValue=20
            Constant SenescenceRate: FixedValue=0.005
            Constant MaximumRootDepth: FixedValue=1000000
            Constant MaximumNConc: FixedValue=0.01
            Constant MinimumNConc: FixedValue=0.01
            PhaseLookupValue NitrogenDemandSwitch: Start=Germination; End=Maturity
              Constant: FixedValue=1
            BiomassRemoval BiomassRemovalDefaults: HarvestFractionLiveToRemove=0; HarvestFractionDeadToRemove=0; HarvestFractionLiveToResidue=1; HarvestFractionDeadToResidue=1
            Constant KNO3: FixedValue=0.02
            Constant KNH4: FixedValue=0.01
            Constant SpecificRootLength: FixedValue=105; Units=m/g
            MultiplyFunction RootFrontVelocity
              PhaseLookup PotentialRootFrontVelocity
                PhaseLookupValue PreEmergence: Start=Germination; End=Emergence
                  Constant Value: FixedValue=5; Units=mm/d
                PhaseLookupValue PostEmergence: Start=Emergence; End=Maturity
                  Constant Value: FixedValue=20; Units=mm/d
              WeightedTemperatureFunction TemperatureFactor: MaximumTemperatureWeighting=0.5
                XYPairs: X=[0, 15, 25, 35]; Y=[0, 1, 1, 0]
              LinearInterpolationFunction WaterFactor: same as Replacements.Maize.Root.RootFrontVelocity.WaterFactor
            LinearInterpolationFunction NUptakeSWFactor
              SoilWaterScale: LLModel=1
              XYPairs: X=[0, 1]; Y=[0, 1]
              Memo
                This is modelled in the same way as the old wheat model where potential N uptake is decreased as the soil dries as described by NUptakeSWFactor
              VariableReference XValue: VariableName=[SoilWaterScale]
            Constant DMConversionEfficiency: FixedValue=1
            Constant MaintenanceRespirationFunction: FixedValue=1
            Constant RemobilisationCost: FixedValue=0
            Constant CarbonConcentration: FixedValue=0.4
            NutrientDemandFunctions DMDemands
              MultiplyFunction Structural
                PartitionFractionDemandFunction DMDemandFunction
                  PhaseLookup PartitionFraction
                    PhaseLookupValue PreEmergence: Start=Germination; End=Emergence
                      Constant Value: FixedValue=0
                    PhaseLookupValue PreFlowering: Start=Emergence; End=Flowering
                      LinearInterpolationFunction AgeFactor
                        XYPairs: X=[3, 4]; Y=[0.5, 0.2]
                        VariableReference XValue: VariableName=[Phenology].Stage
                    PhaseLookupValue PostFlowering: Start=Flowering; End=EndGrainFill
                      Constant Value: FixedValue=0.2
                Constant StructuralFraction: FixedValue=1
              Constant Metabolic: FixedValue=0
              StorageDMDemandFunction Storage: same as Replacements.Maize.Root.DMDemands.Storage
              Constant QStructuralPriority: FixedValue=1
              Constant QMetabolicPriority: FixedValue=1
              Constant QStoragePriority: FixedValue=1
            NutrientDemandFunctions NDemands: same as Replacements.Maize.Root.NDemands
            VariableReference CriticalNConc: VariableName=[Root].MinimumNConc
            NutrientPoolFunctions InitialWt
              Constant Structural: FixedValue=0.005; Units=g/plant
              Constant Metabolic: FixedValue=0
              Constant Storage: FixedValue=0
          GenericOrgan Panicle: IsAboveGround=true
            Constant NReallocationFactor: FixedValue=0
            Constant NRetranslocationFactor: FixedValue=0.3
            Constant MaximumNConc: FixedValue=0.025
            Constant SenescenceRate: FixedValue=0; Units=/d
            Constant MinimumNConc: FixedValue=0.02
            BiomassRemoval BiomassRemovalDefaults: HarvestFractionLiveToRemove=0; HarvestFractionDeadToRemove=0; HarvestFractionLiveToResidue=1; HarvestFractionDeadToResidue=1
            PhaseLookupValue NitrogenDemandSwitch: Start=Emergence; End=StartGrainFill
              Constant: FixedValue=1
            PhaseLookup DMRetranslocationFactor
              PhaseLookupValue VegetativeGrowth: Start=Emergence; End=StartGrainFill
                Constant DMRetranslocationFactor: FixedValue=0
              PhaseLookupValue ReproductiveGrowth: Start=StartGrainFill; End=EndGrainFill
                Constant DMRetranslocationFactor: FixedValue=0.5
            Constant DetachmentRateFunction: FixedValue=0; Units=/d
            Constant MaintenanceRespirationFunction: FixedValue=0; Units=0-1
            Constant DMConversionEfficiency: FixedValue=1; Units=0-1
            MultiplyFunction HeadNumber
              VariableReference StemNumber: VariableName=[Structure].TotalStemPopn
              Constant PaniclesPerStem: FixedValue=0.83; Units=0-1
            Constant DMReallocationFactor: FixedValue=0
            VariableReference CriticalNConc: VariableName=[Panicle].MinimumNConc
            Constant RemobilisationCost: FixedValue=0
            Constant CarbonConcentration: FixedValue=0.4
            NutrientDemandFunctions DMDemands
              MultiplyFunction Structural
                PopulationBasedDemandFunction DMDemandFunction
                  VariableReference ThermalTime: VariableName=[Phenology].ThermalTime
                  MinimumFunction ExpansionStress: same as Oats.Oats_HNI2.Field.Oats.Leaf.CohortParameters.ExpansionStress
                  VariableReference OrganPopulation: VariableName=[Panicle].HeadNumber
                  Constant StartStage: FixedValue=4.8
                  Constant MaximumOrganWt: FixedValue=0.4; Units=g
                  AddFunction GrowthDuration
                    VariableReference EarlyReproductive: VariableName=[Phenology].EarlyReproductive.Target
                    VariableReference GrainDevelopment: VariableName=[Phenology].GrainDevelopment.Target
                Constant StructuralFraction: FixedValue=0.9
              Constant Metabolic: FixedValue=0
              StorageDMDemandFunction Storage
                SubtractFunction StorageFraction
                  Constant One: FixedValue=1
                  VariableReference StructuralFraction: VariableName=[Panicle].DMDemands.Structural.StructuralFraction
              Constant QStructuralPriority: FixedValue=1
              Constant QMetabolicPriority: FixedValue=1
              Constant QStoragePriority: FixedValue=1
            NutrientDemandFunctions NDemands
              MultiplyFunction Structural
                VariableReference MinNconc: VariableName=[Panicle].minimumNconc
                VariableReference PotentialDMAllocation: VariableName=[Panicle].potentialDMAllocation.Structural
              MultiplyFunction Metabolic
                SubtractFunction MetabolicNconc
                  VariableReference CritNconc: VariableName=[Panicle].criticalNConc
                  VariableReference MinNconc: VariableName=[Panicle].minimumNconc
                VariableReference PotentialDMAllocation: VariableName=[Panicle].potentialDMAllocation.Structural
              StorageNDemandFunction Storage
                VariableReference NitrogenDemandSwitch: VariableName=[Panicle].nitrogenDemandSwitch
                VariableReference MaxNconc: VariableName=[Panicle].maximumNconc
              Constant QStructuralPriority: FixedValue=1
              Constant QMetabolicPriority: FixedValue=1
              Constant QStoragePriority: FixedValue=1
            RetranslocateNonStructural RetranslocateNitrogen
            NutrientPoolFunctions InitialWt: same as Replacements.Maize.Husk.InitialWt
            Constant Photosynthesis: FixedValue=0
            VariableReference initialNConcFunction: VariableName=[Panicle].MinimumNConc
          CompositeBiomass AboveGround: OrganNames=[Leaf, Stem, Panicle, Grain]; IncludeLive=true; IncludeDead=true
          CompositeBiomass AboveGroundLive: OrganNames=[Leaf, Stem, Panicle, Grain]; IncludeLive=true; IncludeDead=false
          CompositeBiomass AboveGroundDead: OrganNames=[Leaf, Stem, Panicle, Grain]; IncludeLive=false; IncludeDead=true
          CompositeBiomass BelowGround: OrganNames=[Root]; IncludeLive=true; IncludeDead=true
          CompositeBiomass Total: OrganNames=[Leaf, Stem, Root, Panicle, Grain]; IncludeLive=true; IncludeDead=true
          CompositeBiomass TotalLive: OrganNames=[Leaf, Stem, Root, Panicle, Grain]; IncludeLive=true; IncludeDead=false
          CompositeBiomass TotalDead: OrganNames=[Leaf, Stem, Root, Panicle, Grain]; IncludeLive=false; IncludeDead=true
          CompositeBiomass Ear: OrganNames=[Panicle, Grain]; IncludeLive=true; IncludeDead=true
            Memo
              The Ear composite biomass object includes the Live and dead pools of all organs within the Ear to allow output for total dry matter and Nutrient contents, including total structural, non-structural and metabolic pools.
          CompositeBiomass StemPlusPanicle: OrganNames=[Stem, Panicle]; IncludeLive=true; IncludeDead=true
          Folder Cultivars
            Memo
              Most crop parameters can be specified individually for cultivars. Customized cultivar parameters are reported in this section.
            Cultivar Drummond
              Command:
                [Phenology].MinimumLeafNumber.FixedValue = 8.5
                [Phenology].VrnSensitivity.FixedValue = 7
                [Phenology].PpSensitivity.FixedValue = 3
                [Phenology].EarlyReproductiveLongDayBase.FixedValue = 3
                [Phenology].EarlyReproductivePpSensitivity.FixedValue = 2
                [Structure].Phyllochron.BasePhyllochron.FixedValue = 75
                [Structure].BranchingRate.StressFactors.CoverEffect.XYPairs.X = 0,0.2,0.35
                [Leaf].CohortParameters.MaxArea.AreaLargestLeaves.FixedValue = 4000
                [Structure].BranchingRate.PotentialBranchingRate.Vegetative.PotentialBranchingRate.XYPairs.X = 1,2,3.99,4,5,6,7,8,9
                [Structure].BranchingRate.PotentialBranchingRate.Vegetative.PotentialBranchingRate.XYPairs.Y = 0,0,0,1,2,4,7,12,20
                [Leaf].CohortParameters.GrowthDuration.AgeFactor.XYPairs.Y = 1,1,0.1
                [Grain].MaximumPotentialGrainSize.FixedValue = 0.05
                [Grain].NumberFunction.GrainNumber.GrainsPerGramOfStem.FixedValue = 40
            Cultivar Drummond_orig
              Command:
                [Phenology].MinimumLeafNumber.FixedValue = 9
                [Phenology].VrnSensitivity.FixedValue = 0
                [Phenology].PpSensitivity.FixedValue = 10
                [Structure].Phyllochron.BasePhyllochron.FixedValue = 80
                [Structure].BranchingRate.StressFactors.CoverEffect.XYPairs.X = 0,0.2,0.35
                [Leaf].CohortParameters.MaxArea.AreaLargestLeaves.FixedValue = 4000
                [Structure].BranchingRate.PotentialBranchingRate.Vegetative.PotentialBranchingRate.XYPairs.X = 1,2,3.99,4,5,6,7,8,9
            Cultivar Milton
              Command:
                [Phenology].MinimumLeafNumber.FixedValue = 8.5
                [Phenology].VrnSensitivity.FixedValue = 7
                [Phenology].PpSensitivity.FixedValue = 3
                [Phenology].EarlyReproductiveLongDayBase.FixedValue = 2
                [Phenology].EarlyReproductivePpSensitivity.FixedValue = 0
                [Structure].Phyllochron.BasePhyllochron.FixedValue = 105
                [Leaf].CohortParameters.MaxArea.AreaLargestLeaves.FixedValue = 4000
                [Leaf].CohortParameters.SenescenceDuration.Multiplier.FixedValue = 3
                [Leaf].CohortParameters.GrowthDuration.AgeFactor.XYPairs.Y = 1,1,0.1
                [Grain].MaximumPotentialGrainSize.FixedValue = 0.05
                [Grain].NumberFunction.GrainNumber.GrainsPerGramOfStem.FixedValue = 50
                [Leaf].ExtinctionCoeff.FixedValue = 0.6
            Cultivar Hokonui
              Command:
                [Phenology].MinimumLeafNumber.FixedValue = 9
                [Phenology].VrnSensitivity.FixedValue = 0
                [Phenology].PpSensitivity.FixedValue = 10
                [Structure].Phyllochron.BasePhyllochron.FixedValue = 90
                [Leaf].CohortParameters.GrowthDuration.AgeFactor.XYPairs.Y = 1,1,0.1
            Cultivar Stampede
              Command:
                [Phenology].MinimumLeafNumber.FixedValue = 9
                [Phenology].VrnSensitivity.FixedValue = 0
                [Phenology].PpSensitivity.FixedValue = 10
                [Structure].Phyllochron.BasePhyllochron.FixedValue = 80
                [Leaf].CohortParameters.GrowthDuration.AgeFactor.XYPairs.Y = 1,1,0.1
            Cultivar Coolibah
              Command:
                [Phenology].MinimumLeafNumber.FixedValue = 9
                [Phenology].VrnSensitivity.FixedValue = 5.3
                [Phenology].PpSensitivity.FixedValue = 3.0
                [Structure].Phyllochron.BasePhyllochron.FixedValue = 90
                [Leaf].CohortParameters.MaxArea.AreaLargestLeaves.FixedValue = 5000
                [Phenology].EarlyReproductivePpSensitivity.FixedValue = 0
                [Phenology].EarlyReproductiveLongDayBase.FixedValue = 2
                [Structure].BranchingRate.StressFactors.CoverEffect.XYPairs.X = 0,0.25,0.5
              Memo
                Leaf appearance rate calibrated using data from Gatton 2007 for Taipan and Coolibah
            Cultivar Taipan
              Command:
                [Phenology].MinimumLeafNumber.FixedValue = 9
                [Phenology].VrnSensitivity.FixedValue = 10
                [Phenology].PpSensitivity.FixedValue = 7.5
                [Phenology].EarlyReproductivePpSensitivity.FixedValue = 3
                [Phenology].EarlyReproductiveLongDayBase.FixedValue = 3
                [Structure].Phyllochron.BasePhyllochron.FixedValue = 90
                [Leaf].CohortParameters.MaxArea.AreaLargestLeaves.FixedValue = 8000
              Memo
                Leaf appearance rate calibrated using data from Gatton 2007 for Taipan and Coolibah
            Cultivar Wintaroo
              Command:
                [Phenology].MinimumLeafNumber.FixedValue = 7
                [Phenology].VrnSensitivity.FixedValue = 2
                [Phenology].PpSensitivity.FixedValue = 2
                [Phenology].EarlyReproductivePpSensitivity.FixedValue = 0
                [Phenology].EarlyReproductiveLongDayBase.FixedValue = 2
                [Structure].Phyllochron.BasePhyllochron.FixedValue = 90
            Cultivar Kangaroo
              Command:
                [Phenology].MinimumLeafNumber.FixedValue = 7
                [Phenology].VrnSensitivity.FixedValue = 4
                [Phenology].PpSensitivity.FixedValue = 4
                [Phenology].EarlyReproductivePpSensitivity.FixedValue = 0
                [Phenology].EarlyReproductiveLongDayBase.FixedValue = 2
                [Structure].Phyllochron.BasePhyllochron.FixedValue = 90
            Cultivar Brusher
              Command:
                [Phenology].MinimumLeafNumber.FixedValue = 7
                [Phenology].VrnSensitivity.FixedValue = 1
                [Phenology].PpSensitivity.FixedValue = 1
                [Phenology].EarlyReproductivePpSensitivity.FixedValue = 0
                [Phenology].EarlyReproductiveLongDayBase.FixedValue = 2
                [Structure].Phyllochron.BasePhyllochron.FixedValue = 80
            Cultivar Algerian
              Command:
                [Phenology].MinimumLeafNumber.FixedValue = 9
                [Phenology].VrnSensitivity.FixedValue = 12
                [Phenology].PpSensitivity.FixedValue = 6
                [Phenology].EarlyReproductivePpSensitivity.FixedValue = 4
                [Phenology].EarlyReproductiveLongDayBase.FixedValue = 3
                [Structure].Phyllochron.BasePhyllochron.FixedValue = 105
                [Leaf].CohortParameters.MaxArea.AreaLargestLeaves.FixedValue = 5000
                [Structure].BranchingRate.StressFactors.CoverEffect.XYPairs.X = 0,0.4,0.7
            Cultivar Nugene
              Command:
                [Phenology].MinimumLeafNumber.FixedValue = 9
                [Phenology].VrnSensitivity.FixedValue = 10
                [Phenology].PpSensitivity.FixedValue = 7.5
                [Phenology].EarlyReproductivePpSensitivity.FixedValue = 3
                [Phenology].EarlyReproductiveLongDayBase.FixedValue = 3
                [Structure].Phyllochron.BasePhyllochron.FixedValue = 90
                [Leaf].CohortParameters.MaxArea.AreaLargestLeaves.FixedValue = 8000
            Cultivar Drover
              Command:
                [Phenology].MinimumLeafNumber.FixedValue = 9
                [Phenology].VrnSensitivity.FixedValue = 4
                [Phenology].PpSensitivity.FixedValue = 9
                [Phenology].EarlyReproductivePpSensitivity.FixedValue = 6
                [Phenology].EarlyReproductiveLongDayBase.FixedValue = 3
                [Structure].Phyllochron.BasePhyllochron.FixedValue = 80
                [Leaf].CohortParameters.MaxArea.AreaLargestLeaves.FixedValue = 8000
            Cultivar Genie: same as Oats.Oats_HNI2.Field.Oats.Cultivars.Nugene
            Cultivar Aladdin: same as Oats.Oats_HNI2.Field.Oats.Cultivars.Nugene
            Cultivar Comet: same as Oats.Oats_HNI2.Field.Oats.Cultivars.Nugene
            Cultivar Wizard: same as Oats.Oats_HNI2.Field.Oats.Cultivars.Nugene
            Cultivar Bond: same as Oats.Oats_HNI2.Field.Oats.Cultivars.Nugene
            Memo ReadMe
              # Comparing cultivars Coronet and PFR 100-05

              - Data collected by **Mike George**
              - Data sits in: https://iplant.plantandfood.co.nz/project/I161208

              ## Context:
              - PFR 100-05 showed faster canopy cloure rates via drone aerial photos
              - Field trial was done to identify mechanisms.

              ##Main differences between cultivars were:

              - Larger leaves by PRR 100-05 (45-80% larger)
              - Taller stems by PFR 100-05 (50% taller)

              ## Observations

              - We agreed to keep only leaf size as genotype difference. Height also differed as:
              - [Structure].HeightModel.PotentialHeight.XYPairs.Y = 13,204,820,820
              - [Structure].HeightModel.PotentialHeight.XYPairs.Y = 20,300,1200,1200

              ## Modifications (by RC, RZ, EK)
              - Changed sowing depth to 40 mm to delay emergence
              - Changed depth at which fertiliser N was applied to 10 cm (initially 40 cm which was an error)
              - Removed the initialisation of the second leaf
              - Changed maximum leaf area to match observations (cultivar-specific)
              - Changed tillering dynamics (cultivar-specific)
              - Changed phyllochron to improve leaf tip appearance (cultivar-specific)
              - Changed the extinction coefficient (cultivar-specific)
              - Changed stem height for a closer fit with measured values
              - Changed stem maximum N conc
            Cultivar Coronet_SAE_Oats_2020
              Command:
                [Phenology].MinimumLeafNumber.FixedValue = 9
                [Phenology].VrnSensitivity.FixedValue = 0
                [Phenology].PpSensitivity.FixedValue = 0
                [Structure].Phyllochron.BasePhyllochron.FixedValue = 110
                [Leaf].ExtinctionCoeff.FixedValue = 0.5
                [Leaf].CohortParameters.MaxArea.AreaLargestLeaves.FixedValue = 3073
                [Leaf].InitialLeaves[1].Area = 28.4
                [Leaf].CohortParameters.MaxArea.AgeFactor.XYPairs.X = 3,3.5,4.0,4.5,4.9
                [Leaf].CohortParameters.MaxArea.AgeFactor.XYPairs.Y = 0.1,0.1,0.4,1,0.55
                [Structure].HeightModel.PotentialHeight.XYPairs.Y = 10,150,550,750
                [Structure].BranchingRate.PotentialBranchingRate.Vegetative.PotentialBranchingRate.XYPairs.X = 1,2,3,4,5,6,7,8
                [Structure].BranchingRate.PotentialBranchingRate.Vegetative.PotentialBranchingRate.XYPairs.Y = 0,1,1,0,0,0,0,0
                [Oats].Structure.BranchingRate.StressFactors.CoverEffect.XYPairs.X = 1,1,1
                [Oats].Leaf.CohortParameters.SpecificLeafAreaMax.XYPairs.X = 3,4.3,4.5,4.8
                [Oats].Leaf.CohortParameters.SpecificLeafAreaMax.XYPairs.Y = 15000,20000,23000,25000
                [Stem].MaximumNConc.XYPairs.Y = 0.045,0.04,0.01
                [Stem].MaximumNConc.XYPairs.X = 3.0, 4.2, 5
                [Oats].Structure.BranchMortality.MortalityPhase.Mortality.MortalityPerDegDay.XYPairs.Y[1] = 0.0008
            Cultivar CROA146
              Command:
                [Phenology].MinimumLeafNumber.FixedValue = 9
                [Phenology].VrnSensitivity.FixedValue = 0
                [Phenology].PpSensitivity.FixedValue = 0
                [Structure].Phyllochron.BasePhyllochron.FixedValue = 110
                [Leaf].ExtinctionCoeff.FixedValue = 0.5
                [Leaf].CohortParameters.MaxArea.AreaLargestLeaves.FixedValue = 4105
                [Leaf].InitialLeaves[1].Area = 41.0
                [Leaf].CohortParameters.MaxArea.AgeFactor.XYPairs.X = 3,3.2,4.0,4.4,4.7
                [Leaf].CohortParameters.MaxArea.AgeFactor.XYPairs.Y = 0.12,0.2,1,1,0.55
                [Structure].HeightModel.PotentialHeight.XYPairs.Y = 10,150,550,750
                [Structure].BranchingRate.PotentialBranchingRate.Vegetative.PotentialBranchingRate.XYPairs.X = 1,2,3,4,5,6,7,8
                [Structure].BranchingRate.PotentialBranchingRate.Vegetative.PotentialBranchingRate.XYPairs.Y = 0,0,0,0,0,1.7,0,0
                [Oats].Structure.BranchingRate.StressFactors.CoverEffect.XYPairs.X = 1,1,1
                [Oats].Leaf.CohortParameters.SpecificLeafAreaMax.XYPairs.X = 3,3.5,4
                [Oats].Leaf.CohortParameters.SpecificLeafAreaMax.XYPairs.Y = 18000,20000,25000
                [Oats].Leaf.CohortParameters.GrowthDuration.AgeFactor.XYPairs.X = 3, 4.5, 4.6
                [Oats].Leaf.CohortParameters.GrowthDuration.AgeFactor.XYPairs.Y = 1, 1, 0.2
            Cultivar 107_32
              Command:
                [Phenology].MinimumLeafNumber.FixedValue = 9
                [Phenology].VrnSensitivity.FixedValue = 0
                [Phenology].PpSensitivity.FixedValue = 0
                [Structure].Phyllochron.BasePhyllochron.FixedValue = 110
                [Leaf].ExtinctionCoeff.FixedValue = 0.5
                [Leaf].CohortParameters.MaxArea.AreaLargestLeaves.FixedValue = 4289
                [Leaf].InitialLeaves[1].Area = 68.5
                [Leaf].CohortParameters.MaxArea.AgeFactor.XYPairs.X = 3,3.2,4.0,4.3,4.6
                [Leaf].CohortParameters.MaxArea.AgeFactor.XYPairs.Y = 0.12,0.2,1,1,0.55
                [Structure].HeightModel.PotentialHeight.XYPairs.Y = 10,150,550,750
                [Structure].BranchingRate.PotentialBranchingRate.Vegetative.PotentialBranchingRate.XYPairs.X = 1,2,3,4,5,6,7,8
                [Structure].BranchingRate.PotentialBranchingRate.Vegetative.PotentialBranchingRate.XYPairs.Y = 0,0,0,0,0,1.7,0,0
                [Oats].Structure.BranchingRate.StressFactors.CoverEffect.XYPairs.X = 1,1,1
                [Oats].Leaf.CohortParameters.SpecificLeafAreaMax.XYPairs.X = 3,3.5,4
                [Oats].Leaf.CohortParameters.SpecificLeafAreaMax.XYPairs.Y = 18000,20000,25000
                [Oats].Leaf.CohortParameters.GrowthDuration.AgeFactor.XYPairs.X = 3, 4.5, 4.6
                [Oats].Leaf.CohortParameters.GrowthDuration.AgeFactor.XYPairs.Y = 1, 1, 0.2
            Cultivar Armstrong
              Command:
                [Phenology].MinimumLeafNumber.FixedValue = 9
                [Phenology].VrnSensitivity.FixedValue = 0
                [Phenology].PpSensitivity.FixedValue = 0
                [Structure].Phyllochron.BasePhyllochron.FixedValue = 135
                [Leaf].ExtinctionCoeff.FixedValue = 0.5
                [Leaf].CohortParameters.MaxArea.AreaLargestLeaves.FixedValue = 4417
                [Leaf].InitialLeaves[1].Area = 54.6
                [Leaf].CohortParameters.MaxArea.AgeFactor.XYPairs.X = 3,3.2,4.0,4.3,4.9
                [Leaf].CohortParameters.MaxArea.AgeFactor.XYPairs.Y = 0.12,0.2,1,1,0.25
                [Structure].HeightModel.PotentialHeight.XYPairs.Y = 10,150,550,750
                [Structure].BranchingRate.PotentialBranchingRate.Vegetative.PotentialBranchingRate.XYPairs.X = 1,2,3,4,5,6,7,8
                [Structure].BranchingRate.PotentialBranchingRate.Vegetative.PotentialBranchingRate.XYPairs.Y = 0,0,0,0,0,1.7,0,0
                [Oats].Structure.BranchingRate.StressFactors.CoverEffect.XYPairs.X = 1,1,1
                [Oats].Leaf.CohortParameters.SpecificLeafAreaMax.XYPairs.X = 3,3.5,4
                [Oats].Leaf.CohortParameters.SpecificLeafAreaMax.XYPairs.Y = 18000,20000,25000
                [Oats].Leaf.CohortParameters.GrowthDuration.AgeFactor.XYPairs.X = 3, 4.5, 4.6
                [Oats].Leaf.CohortParameters.GrowthDuration.AgeFactor.XYPairs.Y = 1, 1, 0.2
            Cultivar 100_05
              Command:
                [Phenology].MinimumLeafNumber.FixedValue = 10.1
                [Phenology].VrnSensitivity.FixedValue = 0
                [Phenology].PpSensitivity.FixedValue = 0
                [Structure].Phyllochron.BasePhyllochron.FixedValue = 110
                [Leaf].ExtinctionCoeff.FixedValue = 0.5
                [Leaf].CohortParameters.MaxArea.AreaLargestLeaves.FixedValue = 5814
                [Leaf].InitialLeaves[1].Area = 71.2
                [Leaf].CohortParameters.MaxArea.AgeFactor.XYPairs.X = 3,3.8,4.5,4.6,4.7
                [Leaf].CohortParameters.MaxArea.AgeFactor.XYPairs.Y = 0.1,0.4,1,0.9,0.45
                [Structure].HeightModel.PotentialHeight.XYPairs.Y = 10,150,550,750
                [Structure].BranchingRate.PotentialBranchingRate.Vegetative.PotentialBranchingRate.XYPairs.X = 1,2,3,4,5,6,7,8
                [Structure].BranchingRate.PotentialBranchingRate.Vegetative.PotentialBranchingRate.XYPairs.Y = 0,1,1,0,0,0,0,0
                [Oats].Structure.BranchingRate.StressFactors.CoverEffect.XYPairs.X = 1,1,1
                [Oats].Leaf.CohortParameters.SpecificLeafAreaMax.XYPairs.X = 3,4.3,4.5,4.8
                [Oats].Leaf.CohortParameters.SpecificLeafAreaMax.XYPairs.Y = 15000,20000,23000,25000
                [Stem].MaximumNConc.XYPairs.Y = 0.045,0.035,0.01
                [Stem].MaximumNConc.XYPairs.X = 3.0, 4.2, 4.8
                [Oats].Structure.BranchMortality.MortalityPhase.Mortality.MortalityPerDegDay.XYPairs.Y[1] = 0.0022
            Cultivar Milton2
              Command:
                [Phenology].MinimumLeafNumber.FixedValue = 9
                [Phenology].VrnSensitivity.FixedValue = 0
                [Phenology].PpSensitivity.FixedValue = 0
                [Structure].Phyllochron.BasePhyllochron.FixedValue = 110
                [Leaf].ExtinctionCoeff.FixedValue = 0.5
                [Leaf].CohortParameters.MaxArea.AreaLargestLeaves.FixedValue = 3593
                [Leaf].InitialLeaves[1].Area = 45.0
                [Leaf].CohortParameters.MaxArea.AgeFactor.XYPairs.X = 3,3.2,4.0,4.5,4.8
                [Leaf].CohortParameters.MaxArea.AgeFactor.XYPairs.Y = 0.12,0.2,1,1,0.3
                [Structure].HeightModel.PotentialHeight.XYPairs.Y = 10,150,550,750
                [Structure].BranchingRate.PotentialBranchingRate.Vegetative.PotentialBranchingRate.XYPairs.X = 1,2,3,4,5,6,7,8
                [Structure].BranchingRate.PotentialBranchingRate.Vegetative.PotentialBranchingRate.XYPairs.Y = 0,0,0,0,0,1.7,0,0
                [Oats].Structure.BranchingRate.StressFactors.CoverEffect.XYPairs.X = 1,1,1
                [Oats].Leaf.CohortParameters.SpecificLeafAreaMax.XYPairs.X = 3,3.5,4
                [Oats].Leaf.CohortParameters.SpecificLeafAreaMax.XYPairs.Y = 18000,20000,25000
                [Oats].Leaf.CohortParameters.GrowthDuration.AgeFactor.XYPairs.X = 3, 4.5, 4.6
                [Oats].Leaf.CohortParameters.GrowthDuration.AgeFactor.XYPairs.Y = 1, 1, 0.2
            Cultivar PFR_100_05
              Command:
                [Phenology].MinimumLeafNumber.FixedValue = 9
                [Phenology].VrnSensitivity.FixedValue = 0
                [Phenology].PpSensitivity.FixedValue = 0
                [Phenology].EarlyReproductiveLongDayBase.FixedValue = 0
                [Phenology].EarlyReproductivePpSensitivity.FixedValue = 0
                [Structure].Phyllochron.BasePhyllochron.FixedValue = 105
                [Leaf].ExtinctionCoeff.FixedValue = 0.6
                [Leaf].CohortParameters.MaxArea.AreaLargestLeaves.FixedValue = 2500
                [Leaf].InitialLeaves1.Area = 340
                [Leaf].InitialLeaves2.Area = 660
                [Leaf].CohortParameters.MaxArea.AgeFactor.XYPairs.X = 3,4,4.3
                [Leaf].CohortParameters.MaxArea.AgeFactor.XYPairs.Y =  0.05,1,0.05
            Cultivar Coronet
              Command:
                [Phenology].MinimumLeafNumber.FixedValue = 9
                [Phenology].VrnSensitivity.FixedValue = 0
                [Phenology].PpSensitivity.FixedValue = 0
                [Phenology].EarlyReproductiveLongDayBase.FixedValue = 0
                [Phenology].EarlyReproductivePpSensitivity.FixedValue = 0
                [Structure].Phyllochron.BasePhyllochron.FixedValue = 105
                [Leaf].ExtinctionCoeff.FixedValue = 0.6
                [Leaf].CohortParameters.MaxArea.AreaLargestLeaves.FixedValue = 1640
                [Leaf].InitialLeaves1.Area = 200
                [Leaf].InitialLeaves2.Area = 400
                [Leaf].CohortParameters.MaxArea.AgeFactor.XYPairs.X = 3,4,4.3
                [Leaf].CohortParameters.MaxArea.AgeFactor.XYPairs.Y = 0.05,1,0.05
            Cultivar Qingyin2
              Command:
                [Phenology].MinimumLeafNumber.FixedValue = 8.55
                [Phenology].VrnSensitivity.FixedValue = 1.5
                [Phenology].PpSensitivity.FixedValue = 4.5
                [Structure].Phyllochron.BasePhyllochron.FixedValue = 40
                [Phenology].GrainFilling.Target.FixedValue = 100
                [Leaf].Photosynthesis.RUE.FixedValue = 2.8
                [Leaf].ExtinctionCoeff.FixedValue = 0.65
                [Leaf].CohortParameters.MaxArea.AreaLargestLeaves.FixedValue = 4417
                [Phenology].Germinating.MinSoilTemperature.FixedValue = 0
                [Oats].Phenology.Emerging.Target.ShootLag.FixedValue = 40
                [Oats].Phenology.Emerging.Target.DepthxRate.ShootRate.FixedValue =2
          Constant MortalityRate: FixedValue=0
          Constant SeedMortalityRate: FixedValue=0
  Folder 5x5x5 (disabled)
    Simulation Base2019
      Clock: Start=2018-11-01; End=2022-12-31
      Summary SummaryFile
      Weather
        FileName=/home/juice/programming/research/baselineTesting/IowaSimFiles/Ames.2024.02.08.met
      SoilArbitrator Soil Arbitrator
      Zone Field: Area=1; Slope=0; AspectAngle=0; Altitude=50
        Fertiliser
        SurfaceOrganicMatter: InitialResidueName=soybean; InitialResidueType=soybean; InitialResidueMass=2200; InitialStandingFraction=0; InitialCPR=0; InitialCNR=40
        MicroClimate: a_interception=0; b_interception=1; c_interception=0; d_interception=0; SoilHeatFluxFraction=0.4; MinimumHeightDiffForNewLayer=0; NightInterceptionFraction=0.5; ReferenceHeight=2
        Plant Maize
        Irrigation
        Manager FertiliseRule
          FertiliserType = UAN_N
          FertiliserDates = 1-may
          Amount = 180
          AmountType = False
```csharp
using Models.Soils;
using System;
using System.Linq;
using Models.Core;
using Models.PMF;
using APSIM.Shared.Utilities;
namespace Models
{
    [Serializable]
    public class Script : Model
    {
        [Link] Clock Clock;
        [Link] Fertiliser Fertiliser;
        
        [Separator("A component to apply fertiliser on one or more dates on every year of the simulation")]

        [Description("Type of fertiliser to apply? ")] 
        [Display(Type = DisplayType.FertiliserType)]public string FertiliserType { get; set; }

        [Description("Enter the fertilisation dates as dd-mmm with comma separation (any year information entered will be ignored): ")] 
        public string[] FertiliserDates { get; set; } 

        [Description("Amount of fertiliser to be applied (kg /ha)")] 
        public double Amount { get; set; }

        [Description("Is the above amount to be applied each time? (yes/ticked)? Or is it the total annual amount across all dates (no/unticked)")] 
        public bool AmountType { get; set; }
        
        [EventSubscribe("DoManagement")]
        private void OnDoManagement(object sender, EventArgs e)
        {
            foreach (string ddMMM in FertiliserDates)
            {
                if (DateUtilities.DatesEqual(ddMMM, Clock.Today))
                {
                    if (AmountType)
                        Fertiliser.Apply(amount: Amount, type: FertiliserType);
                    else
                        Fertiliser.Apply(amount: Amount / FertiliserDates.Length, type: FertiliserType);
                }
            }
        }
    }
}
```
        Manager Sowing
          Crop = [Maize]
          SowDate = 1-may
          CultivarName = 555_1197AMXT
          SowingDepth = 50
          RowSpacing = 760
          Population = 8.6
```csharp
using APSIM.Shared.Utilities;
using Models.Utilities;
using Models.Soils;
using Models.PMF;
using Models.Core;
using System;

namespace Models
{
    [Serializable]
    public class Script : Model
    {
        [Link] Clock Clock;
        [Link] Fertiliser Fertiliser;
        [Link] Summary Summary;
        [Link] Soil Soil;
        
        [Description("Crop")]
        public IPlant Crop { get; set; }

        [Description("Sowing date (d-mmm)")]
        public string SowDate { get; set; }

        [Display(Type = DisplayType.CultivarName)]
        [Description("Cultivar to be sown")]
        public string CultivarName { get; set; }

        [Description("Sowing depth (mm)")]
        public double SowingDepth { get; set; }

        [Description("Row spacing (mm)")]
        public double RowSpacing { get; set; }

        [Description("Plant population (/m2)")]
        public double Population { get; set; }

        [EventSubscribe("DoManagement")]
        private void OnDoManagement(object sender, EventArgs e)
        {
            if (DateUtilities.WithinDates(SowDate, Clock.Today, SowDate))
            {
                Crop.Sow(population: Population, cultivar: CultivarName, depth: SowingDepth, rowSpacing: RowSpacing);    
            }
        }
    }
}
```
        Manager Harvesting
          Crop = [Maize]
          script: same as in Oats.Oats_HNI2.Field.Harvest
        Manager FallTillage
          TillageDate = 12-nov
          Fraction = 0.75
          Depth = 250
```csharp
using Models.Soils;
using System;
using System.Linq;
using Models.Core;
using Models.PMF;
using APSIM.Shared.Utilities;
using Models.Surface;

namespace Models
{
    [Serializable]
    public class Script : Model
    {
        [Link] Clock Clock;
        [Link] SurfaceOrganicMatter SOM;
        
        [Description("Tillage Date")]
        public string TillageDate { get; set; }
        
        [Description("Fraction of Residues To Incorporate (0-1)")]
        public double Fraction { get; set; }

        [Description("Depth of Tillage (mm)")]
        public double Depth { get; set; }

        [EventSubscribe("DoManagement")]
        private void OnDoManagement(object sender, EventArgs e)
        {
            if (DateUtilities.WithinDates(TillageDate, Clock.Today, TillageDate))
                SOM.Incorporate(Fraction, Depth);
        }
    }
}
```
        Manager SpringTillage
          TillageDate = 28-apr
          Fraction = 0.25
          Depth = 150
          script: same as in 5x5x5.Base2019.Field.FallTillage
        Manager SWIMSetLowerBC
          LowerBCType = potential
          LowerBCValue = 2000
```csharp
using Models.Climate;
using APSIM.Shared.Utilities;
using Models.Soils.Nutrients;
using Models.Soils;
using Models.PMF;
using Models.Core;
using System.Xml.Serialization;
using System;
using System.Linq;
using Models.AgPasture;
using Models.Interfaces;

namespace Models
{
    [Serializable] 
    [System.Xml.Serialization.XmlInclude(typeof(Model))]
    public class Script : Model
    {
        [Link] Clock clock;
        [Link] ISummary summary;
        [Link] private Swim3 swim;
        //[Link] private PastureSpecies ryegrass;
        //[Link] private SimpleGrazing grazing;
        
        public enum LowerBCTypeOptions {gradient,seepage,potential,watertable};

        [Separator("Sets the lower boundary condition type (and value if set to 'potential' for SWIM3. The change is applied at the beginning of the first day of the simulation.")]
        
        [Description("What lower boundary condition is wanted?")] public LowerBCTypeOptions LowerBCType { get; set; }


        [Display(VisibleCallback = "IsBCPotentialOrWater")]
        [Description("What should the lower BC potential be set to (should be positive for a watertable) (mm)?")] public double LowerBCValue { get; set; }
        
        public bool IsBCPotentialOrWater => LowerBCType == LowerBCTypeOptions.potential || LowerBCType == LowerBCTypeOptions.watertable;





        public double SoilWaterStart  { get; set; }
        public double SoilWaterEnd  { get; set; }

        [EventSubscribe("DoDailyInitialisation")]
        private void DoDailyInitialisation(object sender, EventArgs e)
        {
        }

        [EventSubscribe("DoReportCalculations")]
        private void DoReportCalculations(object sender, EventArgs e)
        {
        }

        [EventSubscribe("DoManagement")]
        private void DoDailyCalculations(object sender, EventArgs e)
        {
            if (clock.Today == clock.StartDate)
            {
                summary.WriteMessage(this, "Script is setting lower boundary condition to " + LowerBCType, MessageType.Diagnostic);
                if (LowerBCType == LowerBCTypeOptions.gradient)
                    swim.SetLowerBCForGradient(bbcGradient: 0.0);   // in cm/cm (ibbc=0) Note that this is the default setting
                else if (LowerBCType == LowerBCTypeOptions.potential)
                    swim.SetLowerBCForGivenPotential(bbcPotential: LowerBCValue /10.0 );    //  convert to cm (ibbc=1), DUL is -100 cm so values more positive will often result in inflow to the bottom of the soil profile. Input in mm so divide here.
                else if (LowerBCType == LowerBCTypeOptions.seepage)
                    swim.SetLowerBCForSeepage(bbcPotentialSeepage: 0.0);  // in cm (ibbc=3). This is for zero-tension lysimeters
                else if (LowerBCType == LowerBCTypeOptions.watertable)
                    swim.SetLowerBCForSeepage(LowerBCValue / 10.0);  // in cm (ibbc=4). This is for water tables
                else
                    throw new Exception("Wrong lower boundary condition type");
            }
        }
    }
}
```
        Report Report_Harvest: EventNames=[Maize].Harvesting
          VariableNames:
            [Maize].SowingDate as SowingDate
            [Maize].Phenology.FloweringDAS
            [Maize].Phenology.MaturityDAS
            [Maize].Grain.Wt * 10 as Yield_kgha
            [Maize].Grain.N * 10 as GrainN_kgha
            [Maize].AboveGround.Wt * 10 as Biomass_kgha
            [Maize].AboveGround.N * 10 as BiomassN_kgha
            [Maize].Population
            sum([Soil].NO3.kgha[1:5]) as NO3_harvest_0to30cm
            [NO3].Flow[11] from [Maize].Sowing to [Maize].Harvesting as GS_leaching_150cm
            sum of sum([Soil].Nutrient.N2Oatm) from [Maize].Sowing to [Maize].Harvesting as GS_N20
            sum of sum([Soil].Nutrient.DenitrifiedN) from [Maize].Sowing to [Maize].Harvesting as GS_Denitrification
            sum of [Fertiliser].NitrogenApplied from [Maize].Sowing to [Maize].Harvesting as N_fertilizer
            sum of sum([Soil].Nutrient.MineralisedN + [SurfaceOrganicMatter].SurfaceResidue.Decomposition.MineralisedN) from [Maize].Sowing to [Maize].Harvesting as GS_NetNMineralization
        Soil: SoilType=Nicollet; NearestTown=Ames; Region=Boone; State=Iowa; Country=US; ApsoilNumber=34; Latitude=42.02204; Longitude=-93.769115; DataSource=mesured data and web soil survey; Comments=hydrological parameters and BD from Saxton and Rawls, 2006
          Physical
            Thickness  ParticleSizeSand  ParticleSizeSilt  ParticleSizeClay  Rocks     BD    AirDry  LL15   DUL    SAT         KS
            25         41.3              29.78             28.92             0         1.25  0.087   0.174  0.31   0.445       146
            25         41.3              29.78             28.92             0         1.25  0.087   0.174  0.31   0.455       146
            50         41.3              29.78             28.92             0.145161  1.25  0.087   0.174  0.3    0.42        146
            100        40.16             32.59             27.26             0.124808  1.25  0.132   0.165  0.25   0.43        146
            100        37.77             33.01             29.22             0.287634  1.25  0.12    0.12   0.22   0.35        146
            150        37.77             33.01             29.22             0.254756  1.35  0.11    0.11   0.21   0.34        146
            150        44.39             28.07             27.54             0.276675  1.35  0.102   0.102  0.22   0.33        133
            150        44.39             28.07             27.54             0.131908  1.36  0.126   0.126  0.265  0.393       133
            150        49.07             28.9              22.03             0.131908  1.36  0.133   0.133  0.261  0.393       133
            150        49.07             28.9              22.03             0.131908  1.36  0.128   0.128  0.253  0.393       388
            150        49.07             28.9              22.03             0         1.6   0.128   0.128  0.2    0.393       388
            300        49.07             28.9              22.03             0         1.6   0.09    0.09   0.2    0.393       388
            300        49.07             28.9              22.03             0.147947  1.6   0.09    0.09   0.2    0.313974    144.702
            300        49.07             28.9              22.03             0.176194  1.6   0.09    0.09   0.2    0.303565    105.594
            300        49.07             28.9              22.03             0.201861  1.6   0.09    0.09   0.2    0.29410679  77.0552
            300        49.07             28.9              22.03             0.225184  1.6   0.09    0.09   0.2    0.285512    56.2297
            300        49.07             28.9              22.03             0.246377  1.6   0.09    0.09   0.2    0.277703    41.0326
            300        49.07             28.9              22.03             0.265634  1.6   0.09    0.09   0.2    0.270607    29.9429
            300        49.07             28.9              22.03             0.283133  1.6   0.09    0.09   0.2    0.264159    21.8503
            300        49.07             28.9              22.03             0.299034  1.6   0.09    0.09   0.2    0.258299    15.9449
            Rocks source: Calculated
            SoilCrop MaizeSoil
              LL=[0.174, 0.174, 0.174, 0.165, 0.12, 0.11, 0.128378, 0.165327, 0.176555, 0.177444, 0.16031, 0.147703, 0.15799, 0.167297, 0.175587, 0.182816, 0.188, 0.188, 0.188, 0.188]
              KL=[0.08, 0.08, 0.08, 0.08, 0.08, 0.08, 0.08, 0.08, 0.08, 0.0519615, 0.0480162, 0.0422964, 0.0350564, 0.0282843, 0.022015, 0.0162927, 0.0111758, 0.0067466, 0.00313554, 0.000603434]
              XF=[1, 1, 1, 1, 1, 1, 1, 1, 1, 1, 1, 1, 1, 0.25, 0, 0, 0, 0, 0, 0]
            SoilCrop SoybeanSoil: same as 5x5x5.Base2019.Field.Soil.Physical.MaizeSoil
          Organic: FOMCNRatio=35; CarbonUnits=Total
            Thickness  Carbon  SoilCNRatio  FBiom       FInert      FOM
            25         1.976   11           0.0495      0.379308    229.5
            25         1.928   11           0.0495      0.379308    222.7
            50         1.928   11           0.0495      0.379308    209.7
            100        1.904   11           0.0495      0.41803888  186
            100        1.576   11           0.0495      0.4564836   165
            150        1.56    11           0.0495      0.4945239   137.8
            150        0.776   11           0.0470824   0.73649355  115.1
            150        0.776   11           0.0409631   0.75648885  96.1
            150        0.392   11           0.0366531   0.75725     80.3
            150        0.392   11           0.0334132   0.77675     67.1
            150        0.392   11           0.0308666   0.9698625   56
            300        0.392   11           0.0279011   0.983835    12
            300        0.392   11           0.02496552  0.999       3
            300        0.392   11           0.0227587   0.999       2
            300        0.392   11           0.0210241   0.999       1.5
            300        0.1     11           0.0196157   0.999       1
            300        0.1     11           0.0184435   0.999       0.1
            300        0.1     11           0.0174487   0.999       0.1
            300        0.1     11           0.0165911   0.999       0.1
            300        0.1     11           0.0158421   0.999       0.1
          Chemical: PHUnits=Water
            Thickness  PH    CEC
            25         7.48  25.8
            25         7.48  25.8
            50         7.48  25.8
            100        7.38  25.85
            100        7.43  26.57
            150        7.43  26.57
            150        7.73  23.41
            150        7.73  23.41
            150        8.08  33.6
            150        8.08  33.6
            150        8.08  33.6
            300        8.08  33.6
            300        8.08  33.6
            300        8.08  33.6
            300        8.08  33.6
            300        8.08  33.6
            300        8.08  33.6
            300        8.08  33.6
            300        8.08  33.6
            300        8.08  33.6
          Water: FilledFromTop=false
            Thickness=[25, 25, 50, 100, 100, 150, 150, 150, 150, 150, 150, 300, 300, 300, 300, 300, 300, 300, 300, 300]
            InitialValues=[0.31, 0.31, 0.3, 0.25, 0.22, 0.21, 0.22, 0.265, 0.261, 0.253, 0.2, 0.393, 0.285, 0.273, 0.263, 0.254, 0.246, 0.24, 0.234, 0.23]
          Nutrient
          Solute NO3: InitialValuesUnits=kg/ha; WaterTableConcentration=0; D0=0; DepthConstant=0; MaxDepthSoluteAccessible=0; RunoffEffectivenessAtMovingSolute=0; MaxEffectiveRunoff=0
            Thickness  InitialValues  Exco  FIP
            25         4.446          0     1
            25         4.338          0     1
            50         4.338          0     1
            100        4.284          0     1
            100        3.546          0     1
            150        3.51           0     1
            150        1.746          0     1
            150        1.746          0     1
            150        0.441          0     1
            150        0.441          0     1
            150        0.441          0     1
            300        0.441          0     1
            300        0.441          0     1
            300        0.441          0     1
            300        0.441          0     1
            300        0.375          0     1
            300        0.375          0     1
            300        0.375          0     1
            300        0.375          0     1
            300        0.375          0     1
          Solute NH4: InitialValuesUnits=kg/ha; WaterTableConcentration=1; D0=0; DepthConstant=0; MaxDepthSoluteAccessible=0; RunoffEffectivenessAtMovingSolute=0; MaxEffectiveRunoff=0
            Thickness  InitialValues  Exco  FIP
            25         4.446          1     1
            25         4.338          1     1
            50         4.338          1     1
            100        4.284          1     1
            100        3.546          1     1
            150        3.51           1     1
            150        1.746          1     1
            150        1.746          1     1
            150        0.441          1     1
            150        0.441          1     1
            150        0.441          1     1
            300        0.441          1     1
            300        0.441          1     1
            300        0.441          1     1
            300        0.441          1     1
            300        0.375          1     1
            300        0.375          1     1
            300        0.375          1     1
            300        0.375          1     1
            300        0.375          1     1
          Solute Urea: InitialValuesUnits=kg/ha; WaterTableConcentration=0; D0=0; DepthConstant=0; MaxDepthSoluteAccessible=0; RunoffEffectivenessAtMovingSolute=0; MaxEffectiveRunoff=0
            Thickness  InitialValues  Exco  FIP
            25         0              0     1
            25         0              0     1
            50         0              0     1
            100        0              0     1
            100        0              0     1
            150        0              0     1
            150        0              0     1
            150        0              0     1
            150        0              0     1
            150        0              0     1
            150        0              0     1
            300        0              0     1
            300        0              0     1
            300        0              0     1
            300        0              0     1
            300        0              0     1
            300        0              0     1
            300        0              0     1
            300        0              0     1
            300        0              0     1
          Swim3 Swim: Salb=0.13; CN2Bare=65; CNRed=20; CNCov=0.8; KDul=0.25; PSIDul=-250; VC=true; DTMin=0; DTMax=1440; MaxWaterIncrement=10; SpaceWeightingFactor=0; SoluteSpaceWeightingFactor=0; Dis=15; Disp=0.75; A=1; DTHC=0; DTHP=1; vcon1=7.28e-09; vcon2=7.26e-07; eo_time=06:00; eo_durn=720; default_rain_time=00:00; default_rain_duration=720; Diagnostics=false
          SoilTemperature
            Thickness=[25, 25, 50, 100, 100, 150, 150, 150, 150, 150, 150, 300, 300, 300, 300, 300, 300, 300, 300, 300]
            InitialValues=[10, 10, 10, 10, 10, 10, 10, 10, 10, 10, 10, 10, 10, 10, 10, 10, 10, 10, 10, 10]
        Manager Synchroniser
          Identifier =
```csharp
// Component responsible for connecting to our python package and managing messages recieved from the RL agent

using APSIM.Core;
using APSIM.Shared.Utilities;
using NetMQ.Sockets;
using NetMQ;
using Models.Storage;
using System.Collections.Generic;
using System.IO;
using MessagePack;
using Models.Functions;
using Models.Utilities;
using Models.Soils.Nutrients;
using Models.Surface;
using Models.Soils;
using Models.PMF;
using Models.Interfaces;
using Models.Core;
using System;
using System.Linq;

namespace Models
{
    [Serializable]
    public class Script : Model, IStructureDependency
    {
        [Link] private Clock clock;
        [Link] private Simulation simulation;
        [Link] private Summary Summary;
        [NonSerialized]
        private RequestSocket connection;
        public IStructure Structure { private get; set; }
        
        [Description("Identifier")]
        public string Identifier { get; set;}

     
        [EventSubscribe("StartOfSimulation")]
        private void OnSimulationCommencing(object sender, EventArgs e)
        {
           if (Identifier == "<undefined>") {
               Console.WriteLine("Need an endpoint to connect to");
               Summary.WriteMessage(this, "Need an endpoint to connect to", MessageType.Error);
               return;
           } 
           Identifier = "tcp://" + Identifier;
           connection = new RequestSocket(Identifier);
           connection.SendFrame("connect");
           var msg = connection.ReceiveFrameString(); 
           if (msg != "ok") { throw new Exception("Expected ok"); }
        }
        
        [EventSubscribe("EndOfDay")]
        private void OnEndOfDay(object sender, EventArgs e)
        {
           if (connection == null) { return; }
           bool moreToDo = true;
           connection.SendFrame("paused");
           while (moreToDo) {
             var msg = connection.ReceiveMultipartMessage();
             //Console.WriteLine("Got {0} parts, first = {1}", msg.FrameCount, msg[0].ConvertToString()); 
             if (msg.FrameCount <= 0) { continue ; }
              
             var command = msg[0].ConvertToString();
             if (command == "resume") { 
                moreToDo = false;
                
             } else if (command == "do" && msg.FrameCount >= 2) {
                 onDoCommand(msg);
                 connection.SendFrame("ok");
                 
             } else if (command == "set" && msg.FrameCount == 3) {
                 // set an apsim variable. 
                 //  arg 1 is the variable path (eg "[Nutrient].NO3.kgha"), 
                 //  arg 2 is the packed object                
                string variableName = MessagePackSerializer.Deserialize<string>( msg[1].Buffer );
                
                // See what type the apsim variable is
                var myType = Structure.Get(variableName, relativeTo: simulation).GetType();
                //Console.WriteLine("Got set {0}, my type is {1}", variableName, myType);
                
                object value = MessagePackSerializer.Deserialize<object>( msg[2].Buffer );
                //Console.WriteLine("Got set {0} of incoming type {1}", variableName, value.GetType());
                if (value.GetType().IsArray != myType.IsArray) 
                   throw new Exception("Array/scalar mismatch for " + variableName);
                    
                if (myType.IsArray) {
                   Type myElementType = myType.GetElementType();
                   Object[] values = (value as object[]);
                   if (isNumeric(myElementType)) {
                      var myValues = Array.ConvertAll(values, (e) => (double) e);
                      Structure.Set(variableName, myValues, relativeTo: simulation);
                   } else if (isInteger(myElementType)) {
                      var myValues = Array.ConvertAll(values, (e) => (int) e);
                      Structure.Set(variableName, myValues, relativeTo: simulation);
                   } else if (isString(myElementType)) {
                      var myValues = Array.ConvertAll(values, (e) => (string) e);
                      Structure.Set(variableName, myValues, relativeTo: simulation);
                   } else {
                      throw new Exception("Don't know what to do setting a " + myElementType + " variable");
                   }
                
                   //Type myElementType = myType.GetElementType();
                   //var values = Array.ConvertAll((object[])value, (e) => Convert.ChangeType(e, myElementType)) as System.Array;
                   //Console.WriteLine("Doing set {0} of type {1} ({2}) = ", variableName, 
                   //                  values.GetType(), values.GetType().GetElementType(),  
                   //                  values.GetValue(0).ToString());
                   //Structure.Set(variableName, values, relativeTo: simulation);
                } else {
                   Structure.Set(variableName, Convert.ChangeType(value, myType), relativeTo: simulation);
                }
                connection.SendFrame("ok");
                
             } else if (command == "get" && msg.FrameCount == 2) {
                string variableName = MessagePackSerializer.Deserialize<string>( msg[1].Buffer );
                object value = Structure.Get(variableName, relativeTo: simulation);
                if (value is IFunction function)
                    value = function.Value();
                else if (value != null && (value.GetType().IsArray || value.GetType().IsClass))
                {
                   try
                   {
                       value = ReflectionUtilities.Clone(value);
                   }
                   catch (Exception err)
                   {
                       throw new Exception($"Cannot report variable \"{variableName}\": Variable is a non-reportable type: \"{value?.GetType()?.Name}\".", err);
                   }
                }
                //Console.WriteLine("Got get '{0}' of type '{1}'", variableName, value?.GetType()); 
             
                byte[] bytes;
                if (value != null) {
                   bytes = MessagePackSerializer.Serialize(value);
                } else {
                   Console.WriteLine("Sending NA"); 
                   bytes = MessagePackSerializer.Serialize("NA"); // fixme. Probably a better way to do this
                } 

                connection.SendFrame(bytes);
             } else {
                throw new Exception("Expected resume/get/set, not '" + command + "'");
             }
           }
        }
        
        [Link] Clock Clock;
        [Link] ISoilWater SoilWater;
        [Link] Nutrient Nutrient;
        [Link] Fertiliser Fertiliser;
        [Link] Irrigation Irrigation;
        [Link] SurfaceOrganicMatter SOM;
        [Link] Report Report;

        // Handle a command:
        // addFertiliser "amount" <double> "type" <string>
        // sowCrop "cropName" <string> "cultivarName" <string> "population" <double> "sowingDepth" <double> "rowSpacing" <double> 
        // harvestCrop "cropName" <string>
        // applyIrrigation "amount" <double>
        // tillage "type" <string : (chisel|disc|planter|burn)>
        // terminate
        
        public void onDoCommand(NetMQMessage msg) {
             // msg[0] is "do"
             var cmd = MessagePackSerializer.Deserialize<string>( msg[1].Buffer);
             if (cmd == "addFertiliser") {
                 double FertAmount = 0;
                 string FertType = "";
                 for (int i = 2; i < msg.FrameCount; i += 2 ) {
                    var vname = MessagePackSerializer.Deserialize<string>( msg[i].Buffer);
                    if ( vname == "amount" ) {
                        FertAmount = MessagePackSerializer.Deserialize<double>( msg[i + 1].Buffer);
                    } else if ( vname == "type" ) {
                        FertType = MessagePackSerializer.Deserialize<string>( msg[i + 1].Buffer);
                    }
                 }
                 if (FertAmount > 0) {
                    Console.WriteLine("Fertilized {0}", FertAmount); 
                    Fertiliser.Apply(amount: FertAmount, type: "NO3N" /* fixme */);
                 }
             } else if (cmd == "sowCrop") {
                 string cropName = "";
                 string cultivarName = "default";
                 double population = 5;
                 double sowingDepth = 50;
                 double rowSpacing = 1000;
                 for (int i = 2; i < msg.FrameCount; i += 2 ) {
                    var vname = MessagePackSerializer.Deserialize<string>( msg[i].Buffer);
                    if ( vname == "cropName" ) {
                        cropName = MessagePackSerializer.Deserialize<string>( msg[i + 1].Buffer);
                    } else  if ( vname == "cultivarName" ) {
                        cultivarName = MessagePackSerializer.Deserialize<string>( msg[i + 1].Buffer);
                    } else if ( vname == "population" ) {
                        population = MessagePackSerializer.Deserialize<double>( msg[i + 1].Buffer);
                    } else if ( vname == "sowingDepth" ) {
                        sowingDepth = MessagePackSerializer.Deserialize<double>( msg[i + 1].Buffer);
                    } else if ( vname == "rowSpacing" ) {
                        rowSpacing = MessagePackSerializer.Deserialize<double>( msg[i + 1].Buffer);
                    }
                 }
                 if (cropName != "") {
                    Plant crop = Structure.GetObject("[" + cropName + "]")?.Value as Plant;
                    if (crop == null) { throw new Exception("Cant find a component called  '" + cropName + "' to sow"); } 
                    crop.Sow(population:population, cultivar:cultivarName, depth:sowingDepth, rowSpacing:rowSpacing);
                    Console.WriteLine("Sowed a {0} crop", cropName); 
                 }    
             } else if (cmd == "harvestCrop") {
                 string cropName = "";
                 for (int i = 2; i < msg.FrameCount; i += 2 ) {
                    var vname = MessagePackSerializer.Deserialize<string>( msg[i].Buffer);
                    if ( vname == "cropName" ) {
                        cropName = MessagePackSerializer.Deserialize<string>( msg[i + 1].Buffer);
                    }
                 }
                 if (cropName != "") {
                    Plant crop = Structure.GetObject("[" + cropName + "]")?.Value as Plant;
                    if (crop == null) { throw new Exception("Cant find a component called  '" + cropName + "' to harvest"); }
                    crop.Harvest();
                    Console.WriteLine("Harvested a {0} crop", cropName); 
                    crop.EndCrop();
                 } 
             } else if (cmd == "applyIrrigation") {
                 double irrigAmount = 0;
                 for (int i = 2; i < msg.FrameCount; i += 2 ) {
                    var vname = MessagePackSerializer.Deserialize<string>( msg[i].Buffer);
                    if ( vname == "amount" ) {
                        irrigAmount = MessagePackSerializer.Deserialize<double>( msg[i + 1].Buffer);
                    }
                 }
                 if (irrigAmount > 0) {
                    Irrigation.Apply(amount:irrigAmount, willRunoff:true);
                    Console.WriteLine("Irrigated {0} ", irrigAmount, "mm"); 
                 }
                 
             } else if (cmd == "tillage") {
                 string implementName = "";
                 for (int i = 2; i < msg.FrameCount; i += 2 ) {
                    var vname = MessagePackSerializer.Deserialize<string>( msg[i].Buffer);
                    if ( vname == "type" ) {
                        implementName = MessagePackSerializer.Deserialize<string>( msg[i + 1].Buffer);
                    }
                 }
                 if ( TillageTypes.ContainsKey(implementName) ) {
                    TillageType tillageType = TillageTypes[implementName];
                    SOM.Incorporate(tillageType.fraction, tillageType.depth);
                    Console.WriteLine("Tilled with a {0}", implementName); 
                 } else {
                    throw new Exception("Cant find a tillage method called  '" + implementName + "' to till with");
                 }
             } else if (cmd == "do_rewind") {
                 Console.WriteLine("Resetting"); 
                 SoilWater.Reset();
                 Nutrient.Reset();
                 SOM.Reset();
                 clock.Today = clock.StartDate.AddDays(-1);
                 
                 //Report.OnCompleted(this, null); // requires changing Models/Report.cs to allow public access
                 Summary.WriteSummaryToTextFiles(storage, "SummaryMessages.html", false);
             
             } else if (cmd == "terminate") {
                 clock.EndDate = clock.StartDate;
             }
        }
        [Link] IDataStore storage;
        
        private class TillageType {
           public double fraction;
           public double depth;
        }
        [NonSerialized]
        private static readonly Dictionary<string, TillageType> TillageTypes = new Dictionary<string, TillageType> { 
           {"chisel", new TillageType { fraction = 0.5, depth = 100 }},
           {"disc", new TillageType { fraction =  0.5, depth = 200 }},
           {"planter", new TillageType { fraction = 0.1, depth = 50 }}, 
           {"burn", new TillageType { fraction = 1.0, depth = 0}}
        };

        [EventSubscribe("EndOfSimulation")]
        private void OnSimulationEnding(object sender, EventArgs e)
        {
            if (connection == null) { return; }
            
            connection.SendFrame("finished");
            var msg = connection.ReceiveFrameString(); 
            if (msg != "ok") { throw new Exception("Expected ok at end"); }
            connection.Close();
            
            Console.WriteLine("Simulation Ending");
        }
        static bool isNumeric(Type type) {
                         switch (Type.GetTypeCode(type))
                            {
                                case TypeCode.Double:
                                case TypeCode.Single:
                                   return true;
                            }
                            return false;
                        }
                        static bool isInteger(Type type) {
                         switch (Type.GetTypeCode(type))
                            {
                                case TypeCode.Int16:
                                case TypeCode.Int32:
                                case TypeCode.Int64:
                                case TypeCode.UInt16:
                                case TypeCode.UInt32:
                                case TypeCode.UInt64:
                                   return true;
                            }
                            return false;
                        }
                        static bool isString(Type type) {
                         switch (Type.GetTypeCode(type))
                            {
                                case TypeCode.String:
                                   return true;
                            }
                            return false;
                        }       
   }
}
```
        Manager ZMQ-SowingRule
          Crop = [Maize]
          SowDate = 1-may
          CultivarName = 555_1197AMXT
          SowingDepth = 50
          RowSpacing = 760
          Population = 8.6
```csharp
// A component to sow crops according to the designated sowing date parameter

using APSIM.Numerics;
using Models.Climate;
using APSIM.Shared.Utilities;
using Models.Utilities;
using Models.Soils.Nutrients;
using Models.Soils;
using Models.PMF;
using Models.Core;
using System;
using System.Linq;
using Models.Interfaces;

namespace Models
{
    [Serializable]
    public class Script : Model
    {
        [Link] private Clock Clock;
        [Link] private Fertiliser Fertiliser;
        [Link] private Summary Summary;
        [Link(ByName = true)] private Plant Maize;
        [Link] private Soil Soil;
        private Accumulator accumulatedRain;
        [Link]
        private ISoilWater waterBalance;
        
        [Description("Crop")]
        public IPlant Crop { get; set; }

        [Description("Sowing date (d-mmm)")]
        public string SowDate { get; set; }

        [Display(Type = DisplayType.CultivarName)]
        [Description("Cultivar to be sown")]
        public string CultivarName { get; set; }

        [Description("Sowing depth (mm)")]
        public double SowingDepth { get; set; }

        [Description("Row spacing (mm)")]
        public double RowSpacing { get; set; }

        [Description("Plant population (/m2)")]
        public double Population { get; set; }
        
        /*
        [EventSubscribe("StartOfSimulation")]
        private void OnSimulationCommencing(object sender, EventArgs e)
        {
            accumulatedRain = new Accumulator(this, "[Weather].Rain", RainDays);
        }
        */
        

        [EventSubscribe("DoManagement")]
        private void OnDoManagement(object sender, EventArgs e)
        {
            // accumulatedRain.Update();
            
            if (DateUtilities.WithinDates(SowDate, Clock.Today, SowDate))
            {
               Maize.Sow(population:Population, cultivar:CultivarName, depth:SowingDepth, rowSpacing:RowSpacing);    
            }
        }
    }
}
```
        Manager ZMQ-Manager
```csharp
// Component that tracks certain relevant state variables to our RL model

using APSIM.Core;
using APSIM.Shared.Utilities;
using Models.Utilities;
using Models.Soils;
using Models.Climate;
using Models.Functions;
using Models.PMF.Struct;
using Models.PMF.Phen;
using Models.PMF;
using Models.Core;
using System;
using System.Linq;
using Models.Soils.Nutrients;

namespace Models
{
    [Serializable]
    public class Script : Model, IStructureDependency
    {
        [Link] private Simulation simulation;
        [Link] private Clock Clock;
        [Link] private Weather Weather;
        [Link] private Fertiliser Fertiliser;
        [Link] private Plant Maize;
        [Link (ByName = true)] private HoldFunction FinalLeafNumber;
        [Link (ByName=true)] private NFlow Denitrification;
        public IStructure Structure { private get; set; }
            
        public double cumsumfert {get ; set;}
        
        

        [EventSubscribe("StartOfSimulation")]
        private void OnSimulationCommencing(object sender, EventArgs e)
        {
           cumsumfert = 0;
        }
        
        [EventSubscribe("EndOfDay")]
        private void OnEndOfDay(object sender, EventArgs e) {
            var applied = Fertiliser.NitrogenApplied;
            if (applied > 0)
               cumsumfert += applied; 
        }
        
        public double dap {
        get {
           var daysSinceStart = (Clock.Today.Date - Clock.StartDate).TotalDays;
           return( daysSinceStart);
        }
        set {}}
        

        public double istage {
        get {
           if (Maize.IsAlive) {
             return( Maize.Phenology.IndexFromPhaseName(Maize.Phenology.CurrentPhaseName) );
           }
           return (-1);
        }
        set {}}

        public double vstage {
        get {
           if (Maize.IsAlive) {
              var fln = ((IFunction)Structure.Get("[Maize].Structure.FinalLeafNumber", relativeTo: simulation)).Value();
              return( fln );
           }
           return (-1);
        }
        set {}}

        public double dnit {
        get {
           double dnit = Denitrification.Value.Sum();
           return (dnit);
        }
        set {}}



    }
}
```
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